  // ************************************
  // Drivers for the left arm
  // ************************************


  #if BM_ARM_LEFT & (BM_ARM_SHOULDER_RHYTHM == OFF)
  //Sterno clavicular joint driver
  AnyKinEqInterPolDriver SCDriverLeft ={
    AnyKinMeasure& ref1 =...BodyModel.Interface.Left.SternoClavicularProtraction;
    AnyKinMeasure& ref2 =...BodyModel.Interface.Left.SternoClavicularElevation;

    Data = pi/180*{
      .JntPos.Left.SternoClavicularProtractionVec,
      .JntPos.Left.SternoClavicularElevationVec
    };
    T=.JntPos.Left.SternoClavicularTime;

   Type=Bspline;
   Reaction.Type={Off,Off};
  };
  #endif


  //Glenohumeral joint driver
  AnyKinEqInterPolDriver GHDriverLeft={
    AnyKinMeasure& ref1 =...BodyModel.Interface.Left.GlenohumeralAbduction;
    AnyKinMeasure& ref2 =...BodyModel.Interface.Left.GlenohumeralFlexion;
    AnyKinMeasure& ref3 =...BodyModel.Interface.Left.GlenohumeralExternalRotation;
    Data=pi/180*{
      .JntPos.Left.GlenohumeralAbductionVec,  //GH joint
      .JntPos.Left.GlenohumeralFlexionVec,  //GH joint
      .JntPos.Left.GlenohumeralExternalRotationVec  //GH joint
     };
 T=.JntPos.Left.GlenohumeralTime;
    Type=Bspline;

    Reaction.Type={Off,Off,Off};
  };

  //Elbow flexion driver
  AnyKinEqInterPolDriver ElbowFEDriverLeft={
  AnyKinMeasureOrg  &Elbow =...BodyModel.Interface.Left.ElbowFlexion;
    Data=pi/180*{.JntPos.Left.ElbowFlexionVec};
 T=.JntPos.Left.ElbowFlexionTime;
    Type=Bspline;

    Reaction.Type={Off};
  };

  //Elbow pronation driver
  AnyKinEqInterPolDriver ElbowPSDriverLeft={
    AnyKinMeasure& Elbow =...BodyModel.Interface.Left.ElbowPronation;
    Data = pi/180*{.JntPos.Left.ElbowPronationVec };
  Type=Bspline;

 T=.JntPos.Left.ElbowPronationTime;
    Reaction.Type={Off};
  };


  //Wrist driver
  AnyKinEqInterPolDriver WristDriverLeft ={
    AnyKinMeasure& ref1 =...BodyModel.Interface.Left.WristFlexion;
    AnyKinMeasure& ref2 =...BodyModel.Interface.Left.WristAbduction;
     T=.JntPos.Left.WristTime;

    Data = pi/180*{
         .JntPos.Left.WristFlexionVec,
         .JntPos.Left.WristAbductionVec};
    Reaction.Type={Off,Off};
    Type=Bspline;

  };
