Main.ModelSetup.BVHFileData =
{
    FileName = MOCAP_C3D_DATA_PATH +"/"+ Main.ModelSetup.TrialSpecificData.TrialFileName + ".bvh"; //add the extension to the file name here

    ModelDrawOnOff = On;
    ModelDrawScale =0.119;
    ModelDrawRGBs={{27, 158, 119},{217, 95, 2},{117, 112, 179}}/256;

    TranslationScale = 0.01;
    RotationScale = pi/180.0;

    InitialPos_FrameNo=Main.ModelSetup.TrialSpecificData.FirstFrame;

    TranslationalDataFilterIndex = -1;//no filter becuase neg number
    RotationalDataFilterIndex = -1; //no filter becuase neg number

    Rotation2PiFixOnOff = On;
    Rotation1PiFixOnOff = On;

    InterPolType = PiecewiseLinear ;
};
