#class_template OptimizeBVH_Origin (
HUMAN_SEG = "RFOOT",
ACTIVE_TIME_START,
ACTIVE_TIME_END,
NAME_PARA_OPT = BVH_Origin,
OPT_LIN_X = 1, OPT_LIN_Y = 0, OPT_LIN_Z = 1,
OPT_ROT_X = 0, OPT_ROT_Y = 1, OPT_ROT_Z = 0,
PARAMETER_OPT_STUDY = Main.Studies.ParameterIdentification,
REF_FRAME_FOR_TARGET = Main.EnvironmentModel.GlobalRef,
BVH_FILE_DATA = Main.ModelSetup.BVHFileData,
HUMAN_MODEL = Main.HumanModel
)
{
  #var AnyVec3 Target_Position = {0.0, 0.0, 0.0};
  #var AnyMat33 Target_Orientation = {{1,0,0},{0,1,0},{0,0,1}};
  AnyFolder Settings = {
    #var AnyFloat InitialGuess = {0.0,0.0,0.0,0.0,0.0,0.0};
    #var AnyVar Weight = 1;
    #var AnyFloat dt_Ratio = {0.1,0.1};
  };

  // Implement code only if HUMAN_SEG is correctly defined, else give appropriate error.
  // Error is defined at the end of the class template.
  #if  (HUMAN_SEG =="LFOOT")|(HUMAN_SEG =="RFOOT")|(HUMAN_SEG =="LHAND")|(HUMAN_SEG =="RHAND")

  AnyFolder InputArgs = {
    // warning for LoadParametersFrom value. BVH models normally don't have any parameters to be optimized. Thus, the anyset file with
    // parameters won't exist and LoadParametersFrom value is defined as blank in TrialSpecificData.any to avoid issues with
    // RunAnalysis.LoadParameters Operation. The definition of LoadParametersFrom in TrialSpecificData.any must be commented out
    // so that AnyBody can define the default value for LoadParametersFrom value. Alternatively, provide the name of the file from
    // which parameters should be loaded.
    AnyInt Warning_LoadParams = warn(neqfun(Main.ModelSetup.TrialSpecificData.LoadParametersFrom,""), strformat("\n" +
                                "------------------------------------------------------------------------------------------------------\n"+
                                "Main.ModelSetup.TrialSpecificData.LoadParametersFrom is defined as empty. Loading parameters operation will not work!\n" +
                                "Please comment its definition in TrialSpecificData.any to let AnyBody define this value automatically \n" +
                                "or, provide the name of the file from which parameters should be loaded.\n" +
                                "------------------------------------------------------------------------------------------------------"));

    // Error for ActiveTimeInterval.
    AnyInt Error_ActiveTimeInterval = assert(gtfun(ACTIVE_TIME_END,ACTIVE_TIME_START), "Please ensure ACTIVE_TIME_END is greater than ACTIVE_TIME_START");

    #if HUMAN_SEG == "LFOOT"
    // create nodes on the BVH model
    AnyRefFrame &BVHSeg = BVH_FILE_DATA.Model.Hips.LeftHip.LeftKnee.LeftAnkle.Seg;
    BVHSeg = {
      AnyRefNode Node0 = {
        sRel = {0,.LeftToe.sRel[1],0};
        AnyDrawRefFrame drw ={};
        AnyRefNode Node1 = {
          sRel = {-0.02,0,..LeftToe.sRel[2]};
          AnyDrawNode drw ={};
        };
        AnyRefNode Node2 = {
          sRel = {0.05,0,..LeftToe.sRel[2]};
          AnyDrawNode drw ={};
        };
      }; // Heel Node
    }; // BVHSeg

    // Define values for drawing the HUMAN_SEG at the target point and orientation.
    TargetFrameRef.Node0 = {
      AnyFileVar STLFilename = HUMAN_MODEL.BodyModel.Left.Leg.Seg.STL.FilenameFoot;
      AnyFloat STLPos = -..BVHSeg.Node0.sRel;
      AnyMat33 STLOrientation = RotMat(-pi/2,y);
      AnyFloat STLScale = {1,1,-1};
      AnyFunTransform3D &STLTransform = HUMAN_MODEL.BodyModel.Left.Leg.Seg.Foot.Scale;
    };
    #endif

    #if HUMAN_SEG == "RFOOT"
    // create nodes on the BVH model
    AnyRefFrame &BVHSeg = BVH_FILE_DATA.Model.Hips.RightHip.RightKnee.RightAnkle.Seg;
    BVHSeg = {
      AnyRefNode Node0 = {
        sRel = {0,.RightToe.sRel[1],0};
        AnyDrawRefFrame drw ={};
        AnyRefNode Node1 = {
          sRel = {0.02,0,..RightToe.sRel[2]};
          AnyDrawNode drw ={};
        };
        AnyRefNode Node2 = {
          sRel = {-0.05,0,..RightToe.sRel[2]};
          AnyDrawNode drw ={};
        };
      }; // Heel Node
    }; // BVHSeg

    // Define values for drawing the HUMAN_SEG at the target point and orientation.
    TargetFrameRef.Node0 = {
      AnyFolder &HumRef = HUMAN_MODEL.BodyModel.Right.Leg.Seg;
      AnyFileVar STLFilename = HUMAN_MODEL.BodyModel.Right.Leg.Seg.STL.FilenameFoot;
      AnyFloat STLPos = -..BVHSeg.Node0.sRel;
      AnyMat33 STLOrientation = RotMat(-pi/2,y);
      AnyFloat STLScale = {1,1,1};
      AnyFunTransform3D &STLTransform = HUMAN_MODEL.BodyModel.Right.Leg.Seg.Foot.Scale;
    };
    #endif

    #if HUMAN_SEG == "LHAND"
    // create nodes on the BVH model
    AnyRefFrame &BVHSeg = BVH_FILE_DATA.Model.Hips.Chest.Chest2.Chest3.Chest4.LeftCollar.LeftShoulder.LeftElbow.LeftWrist.Seg;
    BVHSeg = {
      AnyRefNode Node0 = {
        sRel = {0,0,0};
        AnyDrawRefFrame drw ={};
        AnyRefNode Node1 = {
          sRel = ..LHT1.sRel;
          AnyDrawNode drw ={};
        };
        AnyRefNode Node2 = {
          sRel = ..LHT2.sRel;
          AnyDrawNode drw ={};
        };
      }; // Wrist Node
    }; // BVHSeg

    // Define values for drawing the HUMAN_SEG at the target point and orientation.
    TargetFrameRef.Node0 = {
      AnyFileVar STLFilename = HUMAN_MODEL.BodyModel.Left.ShoulderArm.STL.FileNameHand;
      AnyFloat STLPos = -..BVHSeg.Node0.sRel+HUMAN_MODEL.BodyModel.Left.ShoulderArm.Seg.Hand.Ref.wj.sRel;
      AnyMat33 STLOrientation = RotMat(-pi/2,x)*RotMat(-pi,y);
      AnyFloat STLScale = {1,1,-1};
      AnyFunTransform3D &STLTransform = HUMAN_MODEL.Scaling.GeometricalScaling.Left.Hand.ScaleFunction;
    };
    #endif

    #if HUMAN_SEG == "RHAND"
    // create nodes on the BVH model
    AnyRefFrame &BVHSeg = BVH_FILE_DATA.Model.Hips.Chest.Chest2.Chest3.Chest4.RightCollar.RightShoulder.RightElbow.RightWrist.Seg;
    BVHSeg = {
      AnyRefNode Node0 = {
        sRel = {0,0,0};
        AnyDrawRefFrame drw ={};
        AnyRefNode Node1 = {
          sRel = ..RHT1.sRel;
          AnyDrawNode drw ={};
        };
        AnyRefNode Node2 = {
          sRel = ..RHT2.sRel;
          AnyDrawNode drw ={};
        };
      }; // Wrist Node
    }; // BVHSeg

    // Define values for drawing the HUMAN_SEG at the target point and orientation.
    TargetFrameRef.Node0 = {
      AnyFileVar STLFilename = HUMAN_MODEL.BodyModel.Right.ShoulderArm.STL.FileNameHand;
      AnyFloat STLPos = -..BVHSeg.Node0.sRel-HUMAN_MODEL.BodyModel.Right.ShoulderArm.Seg.Hand.Ref.wj.sRel;
      AnyMat33 STLOrientation = RotMat(-pi/2,x);
      AnyFloat STLScale = {1,1,1};
      AnyFunTransform3D &STLTransform = HUMAN_MODEL.Scaling.GeometricalScaling.Right.Hand.ScaleFunction;
    };
    #endif

    // Create Target nodes corresponding to the nodes defined on the BVH model
    AnyRefFrame &TargetFrameRef = REF_FRAME_FOR_TARGET;
    TargetFrameRef = {
      AnyRefNode Node0 = {
        sRel = ...Target_Position;
        ARel = ...Target_Orientation;
        AnyDrawRefFrame drw ={ScaleXYZ = 0.15*{1,1,1}; RGB = {0.65,0.65,0.65};};
        // Visualize target human segment
        AnyDrawSurf drwSurf = {
          FileName = .STLFilename;
          RelPos = .STLPos;
          RelRotMat = .STLOrientation;
          ScaleXYZ = .STLScale;
          AnyFunTransform3D &Scale = .STLTransform;
        };

      };
      AnyRefNode Node1 = {
        sRel = ..BVHSeg.Node0.Node1.sRel*...Target_Orientation'+...Target_Position;
        AnyDrawNode drw ={ScaleXYZ = 0.015*{1,1,1}; RGB = {0.65,0.65,0.65};Opacity = 0.5;};
      };
      AnyRefNode Node2 = {
        sRel = ..BVHSeg.Node0.Node2.sRel*...Target_Orientation'+...Target_Position;
        AnyDrawNode drw ={ScaleXYZ = 0.015*{1,1,1}; RGB = {0.65,0.65,0.65};Opacity = 0.5;};
      };
    }; // TargetFrameRef

  }; // InputArgs

  // Define functions needed for the parameter optimization.
  AnyFolder Functions = {
    // WeightFun makes a square wave function to consider the active time interval.
    // WeightFun is equal to the weight value in the active time interval and zero
    // outside the active time interval
    AnyFunSquareWave WeightFun =
    {
      InitialValues = {0.0} + 0*..InputArgs.Error_ActiveTimeInterval; // Enforce Active Time Interval error
      Ts = {ACTIVE_TIME_START,ACTIVE_TIME_END};
      Values = {{..Settings.Weight,0}};
      dT = ..Settings.dt_Ratio*(Ts[1]-Ts[0]);
    };

    // Create constant interpol functions that will be used to drive the linear measure between
    // BVH model nodes and target nodes to zero.
    AnyFunInterpol DriverPosNode0 = {
      Type = ConstantValue;
      T = BVH_FILE_DATA.Data.Abscissa.Sample*BVH_FILE_DATA.Header.FrameTime;
      Data = {repmat(SizesOf(T)[0], 0),
              repmat(SizesOf(T)[0], 0),
              repmat(SizesOf(T)[0], 0)};
    };
    AnyFunInterpol DriverPosNode1 = {
      Type = ConstantValue;
      T = BVH_FILE_DATA.Data.Abscissa.Sample*BVH_FILE_DATA.Header.FrameTime;
      Data = {repmat(SizesOf(T)[0], 0),
              repmat(SizesOf(T)[0], 0),
              repmat(SizesOf(T)[0], 0)};
    };
    AnyFunInterpol DriverPosNode2 = {
      Type = ConstantValue;
      T = BVH_FILE_DATA.Data.Abscissa.Sample*BVH_FILE_DATA.Header.FrameTime;
      Data = {repmat(SizesOf(T)[0], 0),
              repmat(SizesOf(T)[0], 0),
              repmat(SizesOf(T)[0], 0)};
    };

  };// Functions

  // Define a variable that will be used to set the Origin and Axes value of the BVH origin
  AnyFolder BVHOrigin = {
    AnyFloat NAME_PARA_OPT = .Settings.InitialGuess;
    AnyFixedRefFrame &BVHOriginRef = BVH_FILE_DATA.Model.GlobalRef;
    BVHOriginRef = {
      Origin = {.NAME_PARA_OPT[0], .NAME_PARA_OPT[1], .NAME_PARA_OPT[2]};
      Axes = RotMat(.NAME_PARA_OPT[3],x)
            *RotMat(.NAME_PARA_OPT[4],y)
            *RotMat(.NAME_PARA_OPT[5],z);
    };
  }; // BVH Origin

  // Insert conditionally the parameter used to set the BVH origin in the existing parameter optimization study
  // and create drivers between BVH model nodes and target nodes.
  AnyFolder &ParaOptStudy = PARAMETER_OPT_STUDY;

  ParaOptStudy = {

    #if OPT_LIN_X == 1
    AnyDesVar NAME_PARA_OPT##_LinX = {
      Val = ..BVHOrigin.NAME_PARA_OPT[0];
    };
    #endif
    #if OPT_LIN_Y == 1
    AnyDesVar NAME_PARA_OPT##_LinY = {
      Val = ..BVHOrigin.NAME_PARA_OPT[1];
    };
    #endif
    #if OPT_LIN_Z == 1
    AnyDesVar NAME_PARA_OPT##_LinZ = {
      Val = ..BVHOrigin.NAME_PARA_OPT[2];
    };
    #endif
    #if OPT_ROT_X == 1
    AnyDesVar NAME_PARA_OPT##_RotX = {
      Val = ..BVHOrigin.NAME_PARA_OPT[3];
    };
    #endif
    #if OPT_ROT_Y == 1
    AnyDesVar NAME_PARA_OPT##_RotY = {
      Val = ..BVHOrigin.NAME_PARA_OPT[4];
    };
    #endif
    #if OPT_ROT_Z == 1
    AnyDesVar NAME_PARA_OPT##_RotZ = {
      Val = ..BVHOrigin.NAME_PARA_OPT[5];
    };
    #endif

    KinematicStudyForParameterIdentification = {
      // include BVH model in the optimization study
      AnyFolder &mocapmodel = BVH_FILE_DATA;

      // Create Drivers between BVH model nodes and target nodes.
      AnyFolder NAME_PARA_OPT##_OptDrivers = {

        AnyKinMotion Node0 = {
          viewKinMeasure.Size = 0.2;
          WeightFun = {&....Functions.WeightFun,
                       &....Functions.WeightFun,
                       &....Functions.WeightFun};
          AnyKinLinear Lin = {
            AnyRefFrame &BVHPoint = .....InputArgs.BVHSeg.Node0;
            AnyRefFrame &TargetPoint = .....InputArgs.TargetFrameRef.Node0;
          };
          AnyParamFun &target = ....Functions.DriverPosNode0;
        };

        AnyKinMotion Node1 = {
          viewKinMeasure.Size = 0.2;
          WeightFun = {&....Functions.WeightFun,
                       &....Functions.WeightFun,
                       &....Functions.WeightFun};
          AnyKinLinear Lin = {
            AnyRefFrame &BVHPoint = .....InputArgs.BVHSeg.Node0.Node1;
            AnyRefFrame &TargetPoint = .....InputArgs.TargetFrameRef.Node1;
          };
          AnyParamFun &target = ....Functions.DriverPosNode1;
        };

        AnyKinMotion Node2 = {
          viewKinMeasure.Size = 0.2;
          WeightFun = {&....Functions.WeightFun,
                       &....Functions.WeightFun,
                       &....Functions.WeightFun};
          AnyKinLinear Lin = {
            AnyRefFrame &BVHPoint = .....InputArgs.BVHSeg.Node0.Node2;
            AnyRefFrame &TargetPoint = .....InputArgs.TargetFrameRef.Node2;
          };
          AnyParamFun &target = ....Functions.DriverPosNode2;
        };

      }; // OptDriver
    };//KinStudyForParaIden

  }; // ParaOptStudy

  // Error message for wrong choice of HUMAN_SEG
  #else
  AnyInt Error_HumanSeg = assert(0,strformat("Please check choice of HUMAN_SEG. Only one of \x22LFOOT\x22, \x22RFOOT\x22, \x22LHAND\x22, or \x22RHAND\x22 is allowed."));
  #endif

}; // class template
