// This file contains muscle attachment points for the clavicle segment data from VU sub 2.
// The original coordinates have been transformed from global coordinates to the segment local
// coordinate system
AnyFolder &Clavicula =.Seg.Clavicula;

Clavicula = {

  #include "../DrawSettings/SegmentAxes.any"
  AnyVec3 correction ={-0.01,0.005,0};
  AnyRefNode O_deltoideus_clavicular_part_1       = {sRel = .Scale({0.153611, 0.003833, -0.026054}+.correction+{0.01,0.005,0})*.Mirror; };//Corrected value
  AnyRefNode O_deltoideus_clavicular_part_2       = {sRel = .Scale({0.153611, 0.003833, -0.026054}+.correction+{0,0.005,0})*.Mirror; }; //Corrected value
  AnyRefNode O_deltoideus_clavicular_part_3       = {sRel = .Scale({0.141158, 0.008015, -0.021351}+.correction)*.Mirror;};
  AnyRefNode O_deltoideus_clavicular_part_4       = {sRel = .Scale({0.141158, 0.008015, -0.021351}+.correction+{-0.007,0.00,0})*.Mirror;};
  AnyRefNode O_deltoideus_clavicular_part_5       = {sRel = .Scale({0.125129, 0.012248, -0.014889}+.correction+{0,-0.005,0})*.Mirror;};
  AnyRefNode O_deltoideus_clavicular_part_6       = {sRel = .Scale({0.125129, 0.012248, -0.014889}+.correction+{-0.007,-0.005,0})*.Mirror;};

  AnyVec3 correction1 ={0.02,-0.01,0};
  AnyRefNode O_pectoralis_major_clavicular_part_1 = {sRel = .Scale({0.029694, 0.009026, -0.024971}+.correction1)*.Mirror;};
  AnyRefNode O_pectoralis_major_clavicular_part_2 = {sRel = .Scale({0.043668, 0.012786, -0.026008}+.correction1)*.Mirror;};
  AnyRefNode O_pectoralis_major_clavicular_part_3 = {sRel = .Scale({0.057700, 0.015357, -0.025905}+.correction1)*.Mirror;};
  AnyRefNode O_pectoralis_major_clavicular_part_4 = {sRel = .Scale({0.071340, 0.015905, -0.023851}+.correction1)*.Mirror;};
  AnyRefNode O_pectoralis_major_clavicular_part_5 = {sRel = .Scale({0.084030-0.0125, 0.013554, -0.019239}+.correction1)*.Mirror;};//correction

  AnyVec3 correction2 ={0.0,-0.01,0};
  AnyRefNode I_trapezius_clavicular_part_1        = {sRel = .Scale({0.147973, 0.011838, 0.001597}+.correction2)*.Mirror;};
  AnyRefNode I_trapezius_clavicular_part_2        = {sRel = .Scale({0.140579, 0.014921, 0.002398}+.correction2)*.Mirror;};
  AnyRefNode I_trapezius_clavicular_part_3        = {sRel = .Scale({0.132298, 0.017312, 0.003265}+.correction2)*.Mirror;};
  AnyRefNode I_trapezius_clavicular_part_4        = {sRel = .Scale({0.123776, 0.018878, 0.003479}+.correction2)*.Mirror;};
  AnyRefNode I_trapezius_clavicular_part_5        = {sRel = .Scale({0.115728, 0.019599, 0.002630}+.correction2)*.Mirror;};
  AnyRefNode I_trapezius_clavicular_part_6        = {sRel = .Scale({0.108808, 0.019632, 0.000784}+.correction2)*.Mirror;};

  AnyRefNode SternocleidomastoidNode = {sRel = .Scale({0.039, 0.005, -0.012})*.Mirror;};
};
