//This is the definition of the strength of the grip force of the hand
//The current strength is a guesstimate
MusPar={
  AnyMuscleModel HandGloveMomentStrength={
    F0=30; //Guesstimate!
  };
};

Mus={
  AnyMuscleGeneric RotMuscleZPos={
    AnyKinMeasure& ref=..Jnt.HandGloveRotZ;
    AnyMuscleModel &mdl=..MusPar.HandGloveMomentStrength;
    Type = NonPositive;
    EXCLUDE_MUSCLE_METABOLISM

  };

  AnyMuscleGeneric RotMuscleZNeg={
    AnyKinMeasure& ref=..Jnt.HandGloveRotZ;
    AnyMuscleModel &mdl=..MusPar.HandGloveMomentStrength;
    Type = NonNegative;
    EXCLUDE_MUSCLE_METABOLISM

  };

  AnyMuscleGeneric RotMuscleYPos={
    AnyKinMeasure& ref=..Jnt.HandGloveRotY;
    AnyMuscleModel &mdl=..MusPar.HandGloveMomentStrength;
    Type = NonPositive;
    EXCLUDE_MUSCLE_METABOLISM

  };

  AnyMuscleGeneric RotMuscleYNeg={
    AnyKinMeasure& ref=..Jnt.HandGloveRotY;
    AnyMuscleModel &mdl=..MusPar.HandGloveMomentStrength;
    Type = NonNegative;
    EXCLUDE_MUSCLE_METABOLISM

  };
  AnyMuscleGeneric RotMuscleXPos={
    AnyKinMeasure& ref=..Jnt.HandGloveRotX;
    AnyMuscleModel &mdl=..MusPar.HandGloveMomentStrength;
    Type = NonPositive;
    EXCLUDE_MUSCLE_METABOLISM

  };

  AnyMuscleGeneric RotMuscleXNeg={
    AnyKinMeasure& ref=..Jnt.HandGloveRotX;
    AnyMuscleModel &mdl=..MusPar.HandGloveMomentStrength;
    Type = NonNegative;
    EXCLUDE_MUSCLE_METABOLISM

  };
};
