// This file contains segment inertia properties and geometry used for muscle wrapping.
// The file includes a number of segment files which contains muscles attachment points and
// bonylandmarks.


AnySeg Hand ={

  AnyMat33 Mirror={{1,0,0},{0,1,0},{0,0,..Sign}};

  AnyFunTransform3D &Scale=..Scaling.Hand.ScaleFunction;
  Scale = { AnyFunTransform3D& GeomScale = .Scale; };

  r0=.WristJointSeg.RadialUlnarDeviation.sRel*.WristJointSeg.Axes0'+.WristJointSeg.r0 - Ref.wj.sRel * Axes0';//.Radius.wj.sRel*.Radius.Axes0'+.Radius.r0+;

  #include "../DrawSettings/Nodes.any"

  AnyFolder &Data = ..Data.unscaled.ModelParameters.HandSeg.SimpleHandSeg;

  AnyVar MassS = ..MassScaling.Hand.MassScale;

  AnyVar MassStandard = ..StandardParameters.Hand.Mass; // Veeger1997 subject no.4.

  Mass = MassS*MassStandard;

  AnyVar LengthStandard = 0.1;// Guesstimate..

  AnyVar Length = 0.1; // Guesstimate..
  AnyVar Radius = (Mass/(pi*Length*..StandardParameters.Hand.Density))^0.5;

  AnyVar Ixx = 0.25*Mass*Radius*Radius + 1/12*Mass*Length*Length;
  AnyVar Iyy = 0.5*Mass*Radius*Radius;
  AnyVar Izz = Ixx;
  Jii = {Ixx,Iyy,Izz};

  sCoM=Scale(Data.sCoM_pos);
  JaboutCoMOnOff = On;

  AnyRefNode AnatomicalFrame = {};
  AnyRefNode& MoCapMarkerFrameAMMR24 = AnatomicalFrame; ///< For backwards Compatibility with AMMR 2.4 MoCap Marker protocols
  AnyRefNode& ScalingNode = AnatomicalFrame;

  // Not used or duplicated in the Ref folder (kept for now)
  //AnyRefNode Hand     ={ sRel=.Scale({-0.1,0,.0})*.Mirror;};
  //AnyRefNode PalmJoint={ sRel=.Scale({-0.08,-0.02,0.0})*.Mirror;};
  //AnyRefNode Thumb3joint={ sRel=.Scale({0.0,0,0.05})*.Mirror;};

  AnyRefNode Ref={

   AnyRefNode wj={ sRel=..Scale(..Data.wj_pos*..Mirror);
     //Note:STC Issue for scaling
     ARel = {{1,0,0},
       {0,....Sign*1,0},
       {0,0,....Sign*1}
     };
   };

   AnyRefNode PalmJoint                                 = { sRel = ..Scale(..Data.PalmJoint_pos                                *..Mirror); };
   AnyRefNode Hand                                      = { sRel = ..Scale(..Data.Hand_pos                                     *..Mirror); };
   AnyRefNode Via1_ExtensorIndicis                     = { sRel = ..Scale(..Data.Via1_ExtensorIndicis_pos                    *..Mirror); };
   AnyRefNode I_ExtensorIndicis                        = { sRel = ..Scale(..Data.I_ExtensorIndicis_pos                       *..Mirror); };
   AnyRefNode I_ExtensorPollicisLongus                = { sRel = ..Scale(..Data.I_ExtensorPollicisLongus_pos               *..Mirror); };
   AnyRefNode Via1_ExtensorPollicisLongus             = { sRel = ..Scale(..Data.Via1_ExtensorPollicisLongus_pos            *..Mirror); };
   AnyRefNode I_ExtensorPollicisBrevis                = { sRel = ..Scale(..Data.I_ExtensorPollicisBrevis_pos               *..Mirror); };
   AnyRefNode Via1_ExtensorPollicisBrevis             = { sRel = ..Scale(..Data.Via1_ExtensorPollicisBrevis_pos            *..Mirror); };
   AnyRefNode I_AbductorPollicisLongus                = { sRel = ..Scale(..Data.I_AbductorPollicisLongus_pos               *..Mirror); };
   AnyRefNode Via1_AbductorPollicisLongus             = { sRel = ..Scale(..Data.Via1_AbductorPollicisLongus_pos            *..Mirror); };
   AnyRefNode I_ExtensorCarpiUlnaris                  = { sRel = ..Scale(..Data.I_ExtensorCarpiUlnaris_pos                 *..Mirror); };
   AnyRefNode I_ExtensorCarpiRadialisBrevis          = { sRel = ..Scale(..Data.I_ExtensorCarpiRadialisBrevis_pos         *..Mirror); };
   AnyRefNode Via_ExtensorCarpiRadialisBrevis        = { sRel = ..Scale(..Data.Via_ExtensorCarpiRadialisBrevis_pos       *..Mirror); };
   AnyRefNode I_ExtensorCarpiRadialisLongus          = { sRel = ..Scale(..Data.I_ExtensorCarpiRadialisLongus_pos         *..Mirror); };
   AnyRefNode I_FlexorCarpiUlnaris                    = { sRel = ..Scale(..Data.I_FlexorCarpiUlnaris_pos                   *..Mirror); };
   AnyRefNode I_FlexorCarpiRadialis                   = { sRel = ..Scale(..Data.I_FlexorCarpiRadialis_pos                  *..Mirror); };
   AnyRefNode Via_FlexorCarpiRadialis                 = { sRel = ..Scale(..Data.Via_FlexorCarpiRadialis_pos                *..Mirror); };
   AnyRefNode I_PalmarisLongus                         = { sRel = ..Scale(..Data.I_PalmarisLongus_pos                        *..Mirror); };
   AnyRefNode Via_PalmarisLongus                       = { sRel = ..Scale(..Data.Via_PalmarisLongus_pos                      *..Mirror); };
   AnyRefNode I_FlexorDigitorumSuperficialisDigit2   = { sRel = ..Scale(..Data.I_FlexorDigitorumSuperficialisDigit2_pos  *..Mirror); };
   AnyRefNode I_FlexorDigitorumSuperficialisDigit3   = { sRel = ..Scale(..Data.I_FlexorDigitorumSuperficialisDigit3_pos  *..Mirror); };
   AnyRefNode I_FlexorDigitorumSuperficialisDigit4   = { sRel = ..Scale(..Data.I_FlexorDigitorumSuperficialisDigit4_pos  *..Mirror); };
   AnyRefNode I_FlexorDigitorumSuperficialisDigit5   = { sRel = ..Scale(..Data.I_FlexorDigitorumSuperficialisDigit5_pos  *..Mirror); };
   AnyRefNode Via_FlexorDigitorumSuperficialisDigit5 = { sRel = ..Scale(..Data.Via_FlexorDigitorumSuperficialisDigit5_pos*..Mirror); };
   AnyRefNode Via_FlexorDigitorumSuperficialisDigit4 = { sRel = ..Scale(..Data.Via_FlexorDigitorumSuperficialisDigit4_pos*..Mirror); };
   AnyRefNode Via_FlexorDigitorumSuperficialisDigit3 = { sRel = ..Scale(..Data.Via_FlexorDigitorumSuperficialisDigit3_pos*..Mirror); };
   AnyRefNode Via_FlexorDigitorumSuperficialisDigit2 = { sRel = ..Scale(..Data.Via_FlexorDigitorumSuperficialisDigit2_pos*..Mirror); };
   AnyRefNode I_FlexorDigitorumProfundusDigit2       = { sRel = ..Scale(..Data.I_FlexorDigitorumProfundusDigit2_pos      *..Mirror); };
   AnyRefNode I_FlexorDigitorumProfundusDigit3       = { sRel = ..Scale(..Data.I_FlexorDigitorumProfundusDigit3_pos      *..Mirror); };
   AnyRefNode I_FlexorDigitorumProfundusDigit4       = { sRel = ..Scale(..Data.I_FlexorDigitorumProfundusDigit4_pos      *..Mirror); };
   AnyRefNode I_FlexorDigitorumProfundusDigit5       = { sRel = ..Scale(..Data.I_FlexorDigitorumProfundusDigit5_pos      *..Mirror); };
   AnyRefNode Via_FlexorDigitorumProfundusDigit5     = { sRel = ..Scale(..Data.Via_FlexorDigitorumProfundusDigit5_pos    *..Mirror); };
   AnyRefNode Via_FlexorDigitorumProfundusDigit4     = { sRel = ..Scale(..Data.Via_FlexorDigitorumProfundusDigit4_pos    *..Mirror); };
   AnyRefNode Via_FlexorDigitorumProfundusDigit3     = { sRel = ..Scale(..Data.Via_FlexorDigitorumProfundusDigit3_pos    *..Mirror); };
   AnyRefNode Via_FlexorDigitorumProfundusDigit2     = { sRel = ..Scale(..Data.Via_FlexorDigitorumProfundusDigit2_pos    *..Mirror); };
   AnyRefNode I_ExtensorDigitorumDigit2               = { sRel = ..Scale(..Data.I_ExtensorDigitorumDigit2_pos              *..Mirror); };
   AnyRefNode I_ExtensorDigitorumDigit3               = { sRel = ..Scale(..Data.I_ExtensorDigitorumDigit3_pos              *..Mirror); };
   AnyRefNode I_ExtensorDigitorumDigit4               = { sRel = ..Scale(..Data.I_ExtensorDigitorumDigit4_pos              *..Mirror); };
   AnyRefNode I_ExtensorDigitorumDigit5               = { sRel = ..Scale(..Data.I_ExtensorDigitorumDigit5_pos              *..Mirror); };
   AnyRefNode Via_ExtensorDigitorumDigit5             = { sRel = ..Scale(..Data.Via_ExtensorDigitorumDigit5_pos            *..Mirror); };
   AnyRefNode Via_ExtensorDigitorumDigit4             = { sRel = ..Scale(..Data.Via_ExtensorDigitorumDigit4_pos            *..Mirror); };
   AnyRefNode Via_ExtensorDigitorumDigit3             = { sRel = ..Scale(..Data.Via_ExtensorDigitorumDigit3_pos            *..Mirror); };
   AnyRefNode Via_ExtensorDigitorumDigit2             = { sRel = ..Scale(..Data.Via_ExtensorDigitorumDigit2_pos            *..Mirror); };
   AnyRefNode Via_ExtensorDigitiMinimi                = { sRel = ..Scale(..Data.Via_ExtensorDigitiMinimi_pos               *..Mirror); };
   AnyRefNode I_ExtensorDigitiMinimi                  = { sRel = ..Scale(..Data.I_ExtensorDigitiMinimi_pos                 *..Mirror); };
   AnyRefNode Via_FlexorPollicisLongus                = { sRel = ..Scale(..Data.Via_FlexorPollicisLongus_pos               *..Mirror); };
   AnyRefNode I_FlexorPollicisLongus                  = { sRel = ..Scale(..Data.I_FlexorPollicisLongus_pos                 *..Mirror); };

   Via1_ExtensorPollicisLongus       = {ARel=.ARel0;};
   Via1_ExtensorPollicisBrevis       = {ARel=.ARel0;};
   I_ExtensorCarpiUlnaris            = {ARel=.ARel0;};
   Via_ExtensorCarpiRadialisBrevis  = {ARel=.ARel0;};
   I_ExtensorCarpiRadialisLongus    = {ARel=.ARel0;};
   Via_ExtensorDigitorumDigit5       = {ARel=.ARel0;};
   Via_ExtensorDigitorumDigit4       = {ARel=.ARel0;};
   Via_ExtensorDigitorumDigit3       = {ARel=.ARel0;};
   Via_ExtensorDigitorumDigit2       = {ARel=.ARel0;};
   I_ExtensorDigitiMinimi            = {ARel=.ARel0;};
   Via_ExtensorDigitiMinimi          = {ARel=.ARel0;};


   AnyFloat ARel0 = RotMat(...Sign*pi/2,y)*RotMat(...Sign*pi/2,x);  // used for the SPLine.InitWrapPosVectors


   //It is used for wrapping of the flexor muscles.
   AnyRefNode FlexorMuscleCyl = {

     sRel = ..Scale(..Data.FlexorMuscleCyl_pos*..Mirror);
     AnyVec3 P3 = ..Scale(..Data.FlexorMuscleCyl_P3_pos*..Mirror);
     AnyVec3 P2 = ..Scale(..Data.FlexorMuscleCyl_P2_pos*..Mirror);

     //Calculate orientation of the cylinder
     ARel=RotMat(sRel,P3,P2)*RotMat(-90/180*pi, z)*RotMat(-90/180*pi, y);

     AnySurfCylinder cyl = {
       Radius=vnorm(.sRel-.P3);
       Length= vnorm(.sRel-.P2);
     };
   };

};//end Ref

  AnyDrawSurf DrwSurf = {
    FileName = ...Data.unscaled.STL.FileNameHand;
    RGB ??= ...ColorRef.Segments;
    ScaleXYZ = ({1,1.0,1})*.Mirror;
    AnyFunTransform3D &Scale = .Scale;
    Opacity ??= ...BonesOpacity.Hand;
  };
}; // End hand
