//This is the definition of the joints in the arm

///Definition of SternoClavicular joint SC joint
AnyKinRotational SCRot = {
  AnyRefNode &thorax_sc = ..ShoulderRef.scj;
  AnyRefNode &clavicula_sc = ..Seg.Clavicula.scj;
  Type = RotAxesAngles;
  Axis1 = y;
  Axis2 = z;
  Axis3 = x;
};

AnyKinLinear SCLin = {
  AnyRefNode &thorax_sc = ..ShoulderRef.scj;
  AnyRefNode &clavicula_sc = ..Seg.Clavicula.scj;
  Ref=0;
};

AnyKinEq SCLinCon = {
  AnyKinMeasure& SCLinCon = .SCLin;
};


///Defintion of AC joint
AnyKinRotational ACRot = {
  AnyRefNode &clavicula_ac = ..Seg.Clavicula.acj;
  AnyRefNode &scapula_ac = ..Seg.Scapula.acj;
  Type = RotAxesAngles;
  Axis1 = y;
  Axis2 = z;
  Axis3 = x;
};

AnyKinLinear ACLin = {
  AnyRefNode &clavicula_ac = ..Seg.Clavicula.acj;
  AnyRefNode &scapula_ac = ..Seg.Scapula.acj;
  Ref=0;
};

AnyKinEq ACLinCon = {
  AnyKinMeasure& SCLinCon =.ACLin;
};

///Definition of GH joint
AnyKinRotational GHRot = {
  AnyRefNode &scapula_gh = ..Seg.Scapula.gh;
  AnyRefNode &humerus_gh = ..Seg.Humerus.gh;
  Type = RotAxesAngles;
  Axis1 = y;
  Axis2 = z;
  Axis3 = y;

};

AnyKinLinear GHLin = {
  AnyRefNode &scapula_gh = ..Seg.Scapula.gh;
  AnyRefNode &humerus_gh = ..Seg.Humerus.gh;

  Ref=0; //use this for shifting between the two ref systems: scapula=0, humerus=1


};
//This file includes the glenohumeral reactions created by a number of pushing muscles
//if this file is not include the normal reactions of the GH joint should be set to "On On On"6
#include "GHReactions.any"


/**This is the reactions of the GH joint they are normally set to "Off Off Off" if the file
GHReactions.any is being used, if this is not the case the reactions should be set to "On On On"
*/
AnyKinEq GHLinCon = {
  AnyKinMeasure& GHLinCon = .GHLin;
  Reaction.Type={Off,Off,Off};
};

//Definition of elbow flexion extension joint
AnyRevoluteJoint FE = {
  Axis = x;
  AnyRefNode &HumerusFE = ..Seg.Humerus.fe;
  AnyRefNode &UlnaFE = ..Seg.Ulna.fe;


};//End FE


//Next three definitions equal to spherical joint
//Definition of proximal forearm pronation supination joint
AnyKinRotational PSRotProximal = {
  Axis1 = x;
  Axis2 = y;
  Axis3 = z;
  Type = RotAxesAngles;

  AnyRefNode &RadiusPs = ..Seg.Radius.PointPS2;
  AnyRefNode &UlnaPs = ..Seg.Ulna.ps2;
};//End pronation supination joint proximal

//Definition of forearm pronation supination joint
AnyKinLinear PSLinProximal = {
  Ref=0;

  AnyRefNode &UlnaPs = ..Seg.Ulna.ps2;
  AnyRefNode &RadiusPs = ..Seg.Radius.PointPS2;
};//End pronation supination joint proximal

AnyKinEq PSProximalConstraints = {
  AnyKinLinear &Jnt = .PSLinProximal;
  Reaction.Type = {Off,Off,Off};
};

AnyReacForce PSProximalReacForce =
{
  AnyKinMeasureOrg RadiusHumerus = {
    MeasureOrganizer = {0};
    AnyKinLinear Lin =
    {
      Ref = 0;
      AnyRefFrame &Radius = ....Seg.Radius.PS2Reac;
      AnyRefFrame &Humerus = ....Seg.Humerus.fe;
    };
  };

  AnyKinMeasureOrg RadiusUlna = {
    MeasureOrganizer = {0,2};
    AnyKinLinear Lin =
    {
      Ref = 0;
      AnyRefFrame &Ulna = ....Seg.Ulna.ps2Reac;
      AnyRefFrame &Radius = ....Seg.Radius.PS2Reac;
    };
  };
};


//This is measure which will be used by the applications
AnyKinMeasureOrg PS = {
  AnyKinRotational &Jnt = .PSRotProximal;
  MeasureOrganizer = {0};
};
//End definitions of spherical joint

AnyKinEq PSLinDistalConstraint = {

  //Definition of distal forearm pronation supination joint
  AnyKinLinear PSLinDistal = {
    Ref = 0; //Uses coordinate system of the first defined segment

    AnyRefNode &UlnaPs = ...Seg.Ulna.ps2_usRot;
    AnyRefNode &RadiusPs = ...Seg.Radius.PS;
  };//End pronation supination joint distal
  MeasureOrganizer = {0,2};
};

//
// //Definition of wrist joint
//AnyUniversalJoint WristJoint = {
//  Axis1 = y; //flexion extension
//  Axis2 = z; //abduction adduction
//  AnyRefNode &radius_wj = ..Seg.Radius.wj;
//
//  AnyRefNode &hand_wj =..Seg.Hand.wj;
//
//  radius_wj={AnyDrawRefFrame drw={};};
//  hand_wj={AnyDrawRefFrame drw={};};
//
//};//End WristJoint
//


////Definition of wrist joint
AnyRevoluteJoint WristJointFlexion = {
  Axis = y; //flexion extension
  AnyRefNode &radius_wj = ..Seg.Radius.wj;
  AnyRefNode &hand_wj =..Seg.WristJointSeg.FlexionExtensionAxis;
};//End WristJoint

AnyRevoluteJoint WristJointDeviation = {
  Axis = z; //radial ulnar deviation
  AnyRefNode &radius_wj = ..Seg.WristJointSeg.RadialUlnarDeviation;
  AnyRefNode &hand_wj =..Seg.Hand.HandRef.wj;
};//End WristJoint


//Scapula thorax gliding plane

AnyKinEqSimpleDriver ScapulaAIThoraxNodeDriver = {

  AnyKinPointSurface Measure1 = {
    AnyRefFrame &r1 = ...Seg.Scapula.ai;
    AnySurface &s1 = ...ShoulderRef.ScapulaEllipsoidOrigin.Elipse;
    NormedMeasureOnOff = Off;
  };

  DriverPos = {0};
  DriverVel = {0};
  Reaction.Type = {Off};
};


  AnyReacForce ScapulaAIThorax_ContactReaction = {
    Type = NonNegative;
    AnyKinPointSurface &ref=.ScapulaAIThoraxNodeDriver.Measure1 ;
  };


//Simple muscle model
AnyMuscleModel ReactionMuscle = {
  F0 = 5000;
};


//Definitions of ligaments
AnyKinPLine ConoideumLigament = {
  AnyRefNode &scapula = ..Seg.Scapula.conoid;
  AnyRefNode &clavicle = ..Seg.Clavicula.conoid;
  AnyDrawPLine drwline= {Thickness=0.005;RGB={1,0,0};};
};

//Artificial muscle will produce reaction in the ligament
AnyViaPointMuscle ConoidLigamentReaction = {
  AnyRefNode &scapula = ..Seg.Scapula.conoid;
  AnyRefNode &clavicle = ..Seg.Clavicula.conoid;
  AnyMuscleModel &ref = .ReactionMuscle;
  AnyDrawMuscle drwlig = {RGB={0,0,1};MaxStress = 75000000.000000;};
};
//Artificial muscle will produce reaction in the ligament
AnyViaPointMuscle TrapezoidLigamentReaction = {
  AnyRefNode &scapula = ..Seg.Scapula.trapezoid;
  AnyRefNode &clavicle = ..Seg.Clavicula.trapezoid;
  AnyMuscleModel &ref = .ReactionMuscle;
  AnyDrawMuscle drwlig = {RGB={0,0,1};MaxStress = 75000000.000000;};
};

//measure needs to always exist
AnyKinPointSurface  ScapulaTSThoraxMeasure = {
    AnyRefFrame &r1 = ..Seg.Scapula.ts;
    AnySurface &s1 = ..ShoulderRef.ScapulaEllipsoidOrigin.Elipse;
    NormedMeasureOnOff = Off;
  };

AnyReacForce ScapulaTSThorax_ContactReaction = {
  Type = NonNegative;
  AnyKinPointSurface &ref=.ScapulaTSThoraxMeasure ;
};

#if BM_ARM_CLAVICULA_ROTATION_RHYTHM
/// Rhythm to distribute axial rotation of the clavicula
/// equally between sterno-clavicula  and acromio-clavicual joint
AnyKinEq SternoClavicularRotationRhythm  =
{
  AnyKinMeasureLinComb CombinedMeasure =
  {
    AnyKinMeasure& SC = ...InterfaceFolder.SternoClavicular.BackwardAxialRotation;
    AnyKinMeasure& AC = ...InterfaceFolder.AcromioClavicular.PosteriorTilt;
    Coef = {{1,-1}};
    OutDim = 1;
  };

  #if (BM_ARM_SHOULDER_RHYTHM == _RHYTHM_SOFT_) | (BM_ARM_CLAVICULA_ROTATION_RHYTHM == _RHYTHM_SOFT_)
  // Use a template to create the weight function, so
  // the weight values can be overridden by the user.
  Template_AnyFunConst Weights (NUMBER_OF_ELEMENTS=..nDim) = {};
  CType= repmat(nDim,Soft);
  WeightFun ={&Weights.Fun};
  #endif

};
#endif


#if (BM_ARM_RIGHT != ON | BM_ARM_SHOULDER_RHYTHM == OFF) &  (BM_ARM_LEFT != ON | BM_ARM_SHOULDER_RHYTHM == OFF)

  #include "ScapulaConoideumDriver.any"

#else


//************ Shoulder Rhythm **********************

AnyKinEqSimpleDriver ClaviculaProtractionDriver =
{
  AnyKinMeasureLinComb ClaviculaProtractionRhythm =
  {
    AnyKinMeasure& ClaviculaProtraction = ...InterfaceFolder.SternoClavicularProtraction;
    AnyKinMeasure& HumerusElevation = ...InterfaceFolder.GlenohumeralAbduction;
    AnyKinMeasure& HumerusFlexion = ...InterfaceFolder.GlenohumeralFlexion;
    OutDim = 1;
    Coef = {{1, 0.242, -0.12}};
    Const = -1*{(-4.983*pi/180)+0.851*(-0.401)+(10*pi/180)}; // initial position -0.401 rad + correction of +10deg
  };

  #if BM_ARM_SHOULDER_RHYTHM == _RHYTHM_SOFT_
  // Use a template to create the weight function, so
  // the weight values can be overridden by the user.
  Template_AnyFunConst Weights (NUMBER_OF_ELEMENTS=..nDim) = {};
  CType= repmat(nDim,Soft);
  WeightFun ={&Weights.Fun};
  #endif

  DriverPos = {0};
  DriverVel = {0};
  Reaction.Type = {Off};
};


AnyKinEqSimpleDriver ClaviculaElevationDriver =
{
  AnyKinMeasureLinComb ClaviculaElevationRhythm =
  {
    AnyKinMeasure& ClaviculaElevation = ...InterfaceFolder.SternoClavicularElevation;
    AnyKinMeasure& HumerusElevation = ...InterfaceFolder.GlenohumeralAbduction;
    AnyKinMeasure& HumerusFlexion =...InterfaceFolder.GlenohumeralFlexion;
    OutDim = 1;
    Coef = {{1, -0.123, 0.046}};
    Const = -1*{(3.917*pi/180)+0.493*(0.201)-(6*pi/180)}; // initial position 0.201 rad + correction of -6deg
  };

  #if BM_ARM_SHOULDER_RHYTHM == _RHYTHM_SOFT_
  // Use a template to create the weight function, so
  // the weight values can be overridden by the user.
  Template_AnyFunConst Weights (NUMBER_OF_ELEMENTS=..nDim) = {};
  CType= repmat(nDim,Soft);
  WeightFun ={&Weights.Fun};
  #endif

  DriverPos = {0};
  DriverVel = {0};
  Reaction.Type = {Off};
};

#if BM_ARM_CLAVICULA_ROTATION_RHYTHM == OFF
AnyKinEqSimpleDriver ClaviculaAxialRotationDriver =
{
  AnyKinMeasureLinComb ClaviculaAxialRotationRhythm =
  {
    AnyKinMeasure& ClaviculaAxialRotation = ...InterfaceFolder.SternoClavicularAxialRotation;
    AnyKinMeasure& HumerusElevation = ...InterfaceFolder.GlenohumeralAbduction;
    OutDim = 1;
    Coef = {{1, -0.422}};
    Const = -1*{-0.423};   // initial position -0.349 rad, constant found by iteration (data non available)
  };

  #if BM_ARM_SHOULDER_RHYTHM == _RHYTHM_SOFT_
  // Use a template to create the weight function, so
  // the weight values can be overridden by the user.
  Template_AnyFunConst Weights (NUMBER_OF_ELEMENTS=..nDim) = {};
  CType= repmat(nDim,Soft);
  WeightFun ={&Weights.Fun};
  #endif

  DriverPos = {0};
  DriverVel = {0};
  Reaction.Type = {Off};
};
#endif


AnyKinEqSimpleDriver ScapulaProtractionDriver =
{
  AnyKinMeasureLinComb ScapulaProtractionRhythm =
  {
    AnyKinMeasure& ScapulaProtraction = ...InterfaceFolder.ScapulaThoraxProtraction;
    AnyKinMeasure& HumerusElevation = ...InterfaceFolder.GlenohumeralAbduction;
    AnyKinMeasure& HumerusFlexion = ...InterfaceFolder.GlenohumeralFlexion;
    OutDim = 1;
    Coef = {{1, 0.049*...Sign, -0.14*...Sign}};
    Const = -...Sign*{(-1.203*pi/180)+0.901*(0.33)+(10*pi/180)}; // initial position 0.33 rad + correction of +10deg
  };
  DriverPos = {0};
  DriverVel = {0};
  Reaction.Type = {Off};
};


AnyKinEqSimpleDriver ScapulaElevationDriver =
{
  AnyKinMeasureLinComb ScapulaElevationRhythm =
  {
    AnyKinMeasure& ScapulaElevation = ...InterfaceFolder.ScapulaThoraxElevation;
    AnyKinMeasure& HumerusElevation = ...InterfaceFolder.GlenohumeralAbduction;
    AnyKinMeasure& HumerusFlexion = ...InterfaceFolder.GlenohumeralFlexion;
    OutDim = 1;
    Coef = {{1, -0.396*...Sign, 0.079*...Sign}};
    Const = -...Sign*{(3.095*pi/180)+0.414*(0.307)-(10*pi/180)}; // initial position 0.307 rad + correction of -10deg
  };
  DriverPos = {0};
  DriverVel = {0};
  Reaction.Type = {Off};
};

#endif
