/**^
This folder implements the simple muscle models for the shoulder arm model.
Anatomical muscles are in many cases split into
several branches (elements). Strength parameters are split between the branches,
typically by uniform split.
*/

DEFAULT_PARAMETER_FOLDER SubjectMusPar(
    NPARAM = 1,
    PARAM_1 = PCSAfactor, PARAM_1_TYPE = AnyVar
) = {
  Default.PCSAfactor = ......HumanModel.StrengthParameters.SpecificMuscleTensionShoulderArm; // = PCSAfactor in N/cm^2 , the PCSA itself is given in cm^2 so F0 is in Newton`s.

  // Subject specific (scaled) muscle parameters.
  #include "SubjectMusPar.any"

};


/////////////////////////////////////////////////////
//     biceps_brachii_caput_breve (1 element )     //
/////////////////////////////////////////////////////
AnyMuscleModel biceps_brachii_caput_breve =
{
  AnyFolder& MuscleParameters = .SubjectMusPar.biceps_brachii_caput_breve;
  AnyIntVar MuscleElemNo = 1; ///< The number of this element of the muscle
  AnyIntVar MuscleElemAmount = MuscleParameters.MuscleElemAmount; ///< The total amount of elements for this muscle
  F0 = .SubjectMusPar.PCSAfactor*PCSA; ///< Maximum force output at optimum fiber length
  Lf0 = MuscleParameters.OptimalFiberlength / cos(pi/180*MuscleParameters.Pennationangle); //< Optimal fiber length corrected by pennation angle
  Vol0 = 1e-6*MuscleParameters.MuscleVolume/MuscleElemAmount; ///< Muscle volume in (m3)
  AnyVar PCSA = 1e4*Vol0/Lf0;///< PCSA (cm2) is calculated as muscle volume divided between muscle branches and divided by fiber length
};


//////////////////////////////////////////////////////
//     biceps_brachii_caput_longum (1 element )     //
//////////////////////////////////////////////////////
AnyMuscleModel biceps_brachii_caput_longum =
{
  AnyFolder& MuscleParameters = .SubjectMusPar.biceps_brachii_caput_longum;
  AnyIntVar MuscleElemNo = 1; ///< The number of this element of the muscle
  AnyIntVar MuscleElemAmount = MuscleParameters.MuscleElemAmount; ///< The total amount of elements for this muscle
  F0 = .SubjectMusPar.PCSAfactor*PCSA; ///< Maximum force output at optimum fiber length
  Lf0 = MuscleParameters.OptimalFiberlength / cos(pi/180*MuscleParameters.Pennationangle); //< Optimal fiber length corrected by pennation angle
  Vol0 = 1e-6*MuscleParameters.MuscleVolume/MuscleElemAmount; ///< Muscle volume in (m3)
  AnyVar PCSA = 1e4*Vol0/Lf0;///< PCSA (cm2) is calculated as muscle volume divided between muscle branches and divided by fiber length
};


///////////////////////////////////////////
//     coracobrachialis (6 elements)     //
///////////////////////////////////////////
AnyMuscleModel coracobrachialis_1 =
{
  AnyFolder& MuscleParameters = .SubjectMusPar.coracobrachialis;
  AnyIntVar MuscleElemNo = 1; ///< The number of this element of the muscle
  AnyIntVar MuscleElemAmount = MuscleParameters.MuscleElemAmount; ///< The total amount of elements for this muscle
  F0 = .SubjectMusPar.PCSAfactor*PCSA; ///< Maximum force output at optimum fiber length
  Lf0 = MuscleParameters.OptimalFiberlength / cos(pi/180*MuscleParameters.Pennationangle); //< Optimal fiber length corrected by pennation angle
  Vol0 = 1e-6*MuscleParameters.MuscleVolume/MuscleElemAmount; ///< Muscle volume in (m3)
  AnyVar PCSA = 1e4*Vol0/Lf0;///< PCSA (cm2) is calculated as muscle volume divided between muscle branches and divided by fiber length
};

AnyMuscleModel coracobrachialis_2 =
{
  AnyFolder& MuscleParameters = .SubjectMusPar.coracobrachialis;
  AnyIntVar MuscleElemNo = 2; ///< The number of this element of the muscle
  AnyIntVar MuscleElemAmount = MuscleParameters.MuscleElemAmount; ///< The total amount of elements for this muscle
  F0 = .SubjectMusPar.PCSAfactor*PCSA; ///< Maximum force output at optimum fiber length
  Lf0 = MuscleParameters.OptimalFiberlength / cos(pi/180*MuscleParameters.Pennationangle); //< Optimal fiber length corrected by pennation angle
  Vol0 = 1e-6*MuscleParameters.MuscleVolume/MuscleElemAmount; ///< Muscle volume in (m3)
  AnyVar PCSA = 1e4*Vol0/Lf0;///< PCSA (cm2) is calculated as muscle volume divided between muscle branches and divided by fiber length
};

AnyMuscleModel coracobrachialis_3 =
{
  AnyFolder& MuscleParameters = .SubjectMusPar.coracobrachialis;
  AnyIntVar MuscleElemNo = 3; ///< The number of this element of the muscle
  AnyIntVar MuscleElemAmount = MuscleParameters.MuscleElemAmount; ///< The total amount of elements for this muscle
  F0 = .SubjectMusPar.PCSAfactor*PCSA; ///< Maximum force output at optimum fiber length
  Lf0 = MuscleParameters.OptimalFiberlength / cos(pi/180*MuscleParameters.Pennationangle); //< Optimal fiber length corrected by pennation angle
  Vol0 = 1e-6*MuscleParameters.MuscleVolume/MuscleElemAmount; ///< Muscle volume in (m3)
  AnyVar PCSA = 1e4*Vol0/Lf0;///< PCSA (cm2) is calculated as muscle volume divided between muscle branches and divided by fiber length
};

AnyMuscleModel coracobrachialis_4 =
{
  AnyFolder& MuscleParameters = .SubjectMusPar.coracobrachialis;
  AnyIntVar MuscleElemNo = 4; ///< The number of this element of the muscle
  AnyIntVar MuscleElemAmount = MuscleParameters.MuscleElemAmount; ///< The total amount of elements for this muscle
  F0 = .SubjectMusPar.PCSAfactor*PCSA; ///< Maximum force output at optimum fiber length
  Lf0 = MuscleParameters.OptimalFiberlength / cos(pi/180*MuscleParameters.Pennationangle); //< Optimal fiber length corrected by pennation angle
  Vol0 = 1e-6*MuscleParameters.MuscleVolume/MuscleElemAmount; ///< Muscle volume in (m3)
  AnyVar PCSA = 1e4*Vol0/Lf0;///< PCSA (cm2) is calculated as muscle volume divided between muscle branches and divided by fiber length
};

AnyMuscleModel coracobrachialis_5 =
{
  AnyFolder& MuscleParameters = .SubjectMusPar.coracobrachialis;
  AnyIntVar MuscleElemNo = 5; ///< The number of this element of the muscle
  AnyIntVar MuscleElemAmount = MuscleParameters.MuscleElemAmount; ///< The total amount of elements for this muscle
  F0 = .SubjectMusPar.PCSAfactor*PCSA; ///< Maximum force output at optimum fiber length
  Lf0 = MuscleParameters.OptimalFiberlength / cos(pi/180*MuscleParameters.Pennationangle); //< Optimal fiber length corrected by pennation angle
  Vol0 = 1e-6*MuscleParameters.MuscleVolume/MuscleElemAmount; ///< Muscle volume in (m3)
  AnyVar PCSA = 1e4*Vol0/Lf0;///< PCSA (cm2) is calculated as muscle volume divided between muscle branches and divided by fiber length
};

AnyMuscleModel coracobrachialis_6 =
{
  AnyFolder& MuscleParameters = .SubjectMusPar.coracobrachialis;
  AnyIntVar MuscleElemNo = 6; ///< The number of this element of the muscle
  AnyIntVar MuscleElemAmount = MuscleParameters.MuscleElemAmount; ///< The total amount of elements for this muscle
  F0 = .SubjectMusPar.PCSAfactor*PCSA; ///< Maximum force output at optimum fiber length
  Lf0 = MuscleParameters.OptimalFiberlength / cos(pi/180*MuscleParameters.Pennationangle); //< Optimal fiber length corrected by pennation angle
  Vol0 = 1e-6*MuscleParameters.MuscleVolume/MuscleElemAmount; ///< Muscle volume in (m3)
  AnyVar PCSA = 1e4*Vol0/Lf0;///< PCSA (cm2) is calculated as muscle volume divided between muscle branches and divided by fiber length
};


#if BM_ARM_DELTOID_WRAPPING == OFF
/////////////////////////////////////////////////////
//     deltoideus_scapular_part_1 (1 element )     //
/////////////////////////////////////////////////////
AnyMuscleModel deltoideus_scapular_part_1 =
{
  AnyFolder& MuscleParameters = .SubjectMusPar.deltoideus_scapular_part_1;
  AnyIntVar MuscleElemNo = 1; ///< The number of this element of the muscle
  AnyIntVar MuscleElemAmount = MuscleParameters.MuscleElemAmount; ///< The total amount of elements for this muscle
  F0 = .SubjectMusPar.PCSAfactor*PCSA; ///< Maximum force output at optimum fiber length
  Lf0 = MuscleParameters.OptimalFiberlength / cos(pi/180*MuscleParameters.Pennationangle); //< Optimal fiber length corrected by pennation angle
  Vol0 = 1e-6*MuscleParameters.MuscleVolume/MuscleElemAmount; ///< Muscle volume in (m3)
  AnyVar PCSA = 1e4*Vol0/Lf0;///< PCSA (cm2) is calculated as muscle volume divided between muscle branches and divided by fiber length
};


#endif


#if BM_ARM_DELTOID_WRAPPING == OFF
/////////////////////////////////////////////////////
//     deltoideus_scapular_part_2 (1 element )     //
/////////////////////////////////////////////////////
AnyMuscleModel deltoideus_scapular_part_2 =
{
  AnyFolder& MuscleParameters = .SubjectMusPar.deltoideus_scapular_part_2;
  AnyIntVar MuscleElemNo = 1; ///< The number of this element of the muscle
  AnyIntVar MuscleElemAmount = MuscleParameters.MuscleElemAmount; ///< The total amount of elements for this muscle
  F0 = .SubjectMusPar.PCSAfactor*PCSA; ///< Maximum force output at optimum fiber length
  Lf0 = MuscleParameters.OptimalFiberlength / cos(pi/180*MuscleParameters.Pennationangle); //< Optimal fiber length corrected by pennation angle
  Vol0 = 1e-6*MuscleParameters.MuscleVolume/MuscleElemAmount; ///< Muscle volume in (m3)
  AnyVar PCSA = 1e4*Vol0/Lf0;///< PCSA (cm2) is calculated as muscle volume divided between muscle branches and divided by fiber length
};


#endif


#if BM_ARM_DELTOID_WRAPPING == OFF
/////////////////////////////////////////////////////
//     deltoideus_scapular_part_3 (1 element )     //
/////////////////////////////////////////////////////
AnyMuscleModel deltoideus_scapular_part_3 =
{
  AnyFolder& MuscleParameters = .SubjectMusPar.deltoideus_scapular_part_3;
  AnyIntVar MuscleElemNo = 1; ///< The number of this element of the muscle
  AnyIntVar MuscleElemAmount = MuscleParameters.MuscleElemAmount; ///< The total amount of elements for this muscle
  F0 = .SubjectMusPar.PCSAfactor*PCSA; ///< Maximum force output at optimum fiber length
  Lf0 = MuscleParameters.OptimalFiberlength / cos(pi/180*MuscleParameters.Pennationangle); //< Optimal fiber length corrected by pennation angle
  Vol0 = 1e-6*MuscleParameters.MuscleVolume/MuscleElemAmount; ///< Muscle volume in (m3)
  AnyVar PCSA = 1e4*Vol0/Lf0;///< PCSA (cm2) is calculated as muscle volume divided between muscle branches and divided by fiber length
};


#endif


#if BM_ARM_DELTOID_WRAPPING == OFF
/////////////////////////////////////////////////////
//     deltoideus_scapular_part_4 (1 element )     //
/////////////////////////////////////////////////////
AnyMuscleModel deltoideus_scapular_part_4 =
{
  AnyFolder& MuscleParameters = .SubjectMusPar.deltoideus_scapular_part_4;
  AnyIntVar MuscleElemNo = 1; ///< The number of this element of the muscle
  AnyIntVar MuscleElemAmount = MuscleParameters.MuscleElemAmount; ///< The total amount of elements for this muscle
  F0 = .SubjectMusPar.PCSAfactor*PCSA; ///< Maximum force output at optimum fiber length
  Lf0 = MuscleParameters.OptimalFiberlength / cos(pi/180*MuscleParameters.Pennationangle); //< Optimal fiber length corrected by pennation angle
  Vol0 = 1e-6*MuscleParameters.MuscleVolume/MuscleElemAmount; ///< Muscle volume in (m3)
  AnyVar PCSA = 1e4*Vol0/Lf0;///< PCSA (cm2) is calculated as muscle volume divided between muscle branches and divided by fiber length
};


#endif


#if BM_ARM_DELTOID_WRAPPING == OFF
/////////////////////////////////////////////////////
//     deltoideus_scapular_part_5 (1 element )     //
/////////////////////////////////////////////////////
AnyMuscleModel deltoideus_scapular_part_5 =
{
  AnyFolder& MuscleParameters = .SubjectMusPar.deltoideus_scapular_part_5;
  AnyIntVar MuscleElemNo = 1; ///< The number of this element of the muscle
  AnyIntVar MuscleElemAmount = MuscleParameters.MuscleElemAmount; ///< The total amount of elements for this muscle
  F0 = .SubjectMusPar.PCSAfactor*PCSA; ///< Maximum force output at optimum fiber length
  Lf0 = MuscleParameters.OptimalFiberlength / cos(pi/180*MuscleParameters.Pennationangle); //< Optimal fiber length corrected by pennation angle
  Vol0 = 1e-6*MuscleParameters.MuscleVolume/MuscleElemAmount; ///< Muscle volume in (m3)
  AnyVar PCSA = 1e4*Vol0/Lf0;///< PCSA (cm2) is calculated as muscle volume divided between muscle branches and divided by fiber length
};


#endif


#if BM_ARM_DELTOID_WRAPPING == OFF
/////////////////////////////////////////////////////
//     deltoideus_scapular_part_6 (1 element )     //
/////////////////////////////////////////////////////
AnyMuscleModel deltoideus_scapular_part_6 =
{
  AnyFolder& MuscleParameters = .SubjectMusPar.deltoideus_scapular_part_6;
  AnyIntVar MuscleElemNo = 1; ///< The number of this element of the muscle
  AnyIntVar MuscleElemAmount = MuscleParameters.MuscleElemAmount; ///< The total amount of elements for this muscle
  F0 = .SubjectMusPar.PCSAfactor*PCSA; ///< Maximum force output at optimum fiber length
  Lf0 = MuscleParameters.OptimalFiberlength / cos(pi/180*MuscleParameters.Pennationangle); //< Optimal fiber length corrected by pennation angle
  Vol0 = 1e-6*MuscleParameters.MuscleVolume/MuscleElemAmount; ///< Muscle volume in (m3)
  AnyVar PCSA = 1e4*Vol0/Lf0;///< PCSA (cm2) is calculated as muscle volume divided between muscle branches and divided by fiber length
};


#endif


#if BM_ARM_DELTOID_WRAPPING == OFF
///////////////////////////////////////////////////////
//     deltoideus_clavicular_part_1 (1 element )     //
///////////////////////////////////////////////////////
AnyMuscleModel deltoideus_clavicular_part_1 =
{
  AnyFolder& MuscleParameters = .SubjectMusPar.deltoideus_clavicular_part_1;
  AnyIntVar MuscleElemNo = 1; ///< The number of this element of the muscle
  AnyIntVar MuscleElemAmount = MuscleParameters.MuscleElemAmount; ///< The total amount of elements for this muscle
  F0 = .SubjectMusPar.PCSAfactor*PCSA; ///< Maximum force output at optimum fiber length
  Lf0 = MuscleParameters.OptimalFiberlength / cos(pi/180*MuscleParameters.Pennationangle); //< Optimal fiber length corrected by pennation angle
  Vol0 = 1e-6*MuscleParameters.MuscleVolume/MuscleElemAmount; ///< Muscle volume in (m3)
  AnyVar PCSA = 1e4*Vol0/Lf0;///< PCSA (cm2) is calculated as muscle volume divided between muscle branches and divided by fiber length
};


#endif


#if BM_ARM_DELTOID_WRAPPING == OFF
///////////////////////////////////////////////////////
//     deltoideus_clavicular_part_2 (1 element )     //
///////////////////////////////////////////////////////
AnyMuscleModel deltoideus_clavicular_part_2 =
{
  AnyFolder& MuscleParameters = .SubjectMusPar.deltoideus_clavicular_part_2;
  AnyIntVar MuscleElemNo = 1; ///< The number of this element of the muscle
  AnyIntVar MuscleElemAmount = MuscleParameters.MuscleElemAmount; ///< The total amount of elements for this muscle
  F0 = .SubjectMusPar.PCSAfactor*PCSA; ///< Maximum force output at optimum fiber length
  Lf0 = MuscleParameters.OptimalFiberlength / cos(pi/180*MuscleParameters.Pennationangle); //< Optimal fiber length corrected by pennation angle
  Vol0 = 1e-6*MuscleParameters.MuscleVolume/MuscleElemAmount; ///< Muscle volume in (m3)
  AnyVar PCSA = 1e4*Vol0/Lf0;///< PCSA (cm2) is calculated as muscle volume divided between muscle branches and divided by fiber length
};


#endif


#if BM_ARM_DELTOID_WRAPPING == OFF
///////////////////////////////////////////////////////
//     deltoideus_clavicular_part_3 (1 element )     //
///////////////////////////////////////////////////////
AnyMuscleModel deltoideus_clavicular_part_3 =
{
  AnyFolder& MuscleParameters = .SubjectMusPar.deltoideus_clavicular_part_3;
  AnyIntVar MuscleElemNo = 1; ///< The number of this element of the muscle
  AnyIntVar MuscleElemAmount = MuscleParameters.MuscleElemAmount; ///< The total amount of elements for this muscle
  F0 = .SubjectMusPar.PCSAfactor*PCSA; ///< Maximum force output at optimum fiber length
  Lf0 = MuscleParameters.OptimalFiberlength / cos(pi/180*MuscleParameters.Pennationangle); //< Optimal fiber length corrected by pennation angle
  Vol0 = 1e-6*MuscleParameters.MuscleVolume/MuscleElemAmount; ///< Muscle volume in (m3)
  AnyVar PCSA = 1e4*Vol0/Lf0;///< PCSA (cm2) is calculated as muscle volume divided between muscle branches and divided by fiber length
};


#endif


#if BM_ARM_DELTOID_WRAPPING == OFF
///////////////////////////////////////////////////////
//     deltoideus_clavicular_part_4 (1 element )     //
///////////////////////////////////////////////////////
AnyMuscleModel deltoideus_clavicular_part_4 =
{
  AnyFolder& MuscleParameters = .SubjectMusPar.deltoideus_clavicular_part_4;
  AnyIntVar MuscleElemNo = 1; ///< The number of this element of the muscle
  AnyIntVar MuscleElemAmount = MuscleParameters.MuscleElemAmount; ///< The total amount of elements for this muscle
  F0 = .SubjectMusPar.PCSAfactor*PCSA; ///< Maximum force output at optimum fiber length
  Lf0 = MuscleParameters.OptimalFiberlength / cos(pi/180*MuscleParameters.Pennationangle); //< Optimal fiber length corrected by pennation angle
  Vol0 = 1e-6*MuscleParameters.MuscleVolume/MuscleElemAmount; ///< Muscle volume in (m3)
  AnyVar PCSA = 1e4*Vol0/Lf0;///< PCSA (cm2) is calculated as muscle volume divided between muscle branches and divided by fiber length
};


#endif


#if BM_ARM_DELTOID_WRAPPING == OFF
///////////////////////////////////////////////////////
//     deltoideus_clavicular_part_5 (1 element )     //
///////////////////////////////////////////////////////
AnyMuscleModel deltoideus_clavicular_part_5 =
{
  AnyFolder& MuscleParameters = .SubjectMusPar.deltoideus_clavicular_part_5;
  AnyIntVar MuscleElemNo = 1; ///< The number of this element of the muscle
  AnyIntVar MuscleElemAmount = MuscleParameters.MuscleElemAmount; ///< The total amount of elements for this muscle
  F0 = .SubjectMusPar.PCSAfactor*PCSA; ///< Maximum force output at optimum fiber length
  Lf0 = MuscleParameters.OptimalFiberlength / cos(pi/180*MuscleParameters.Pennationangle); //< Optimal fiber length corrected by pennation angle
  Vol0 = 1e-6*MuscleParameters.MuscleVolume/MuscleElemAmount; ///< Muscle volume in (m3)
  AnyVar PCSA = 1e4*Vol0/Lf0;///< PCSA (cm2) is calculated as muscle volume divided between muscle branches and divided by fiber length
};


#endif


#if BM_ARM_DELTOID_WRAPPING == OFF
///////////////////////////////////////////////////////
//     deltoideus_clavicular_part_6 (1 element )     //
///////////////////////////////////////////////////////
AnyMuscleModel deltoideus_clavicular_part_6 =
{
  AnyFolder& MuscleParameters = .SubjectMusPar.deltoideus_clavicular_part_6;
  AnyIntVar MuscleElemNo = 1; ///< The number of this element of the muscle
  AnyIntVar MuscleElemAmount = MuscleParameters.MuscleElemAmount; ///< The total amount of elements for this muscle
  F0 = .SubjectMusPar.PCSAfactor*PCSA; ///< Maximum force output at optimum fiber length
  Lf0 = MuscleParameters.OptimalFiberlength / cos(pi/180*MuscleParameters.Pennationangle); //< Optimal fiber length corrected by pennation angle
  Vol0 = 1e-6*MuscleParameters.MuscleVolume/MuscleElemAmount; ///< Muscle volume in (m3)
  AnyVar PCSA = 1e4*Vol0/Lf0;///< PCSA (cm2) is calculated as muscle volume divided between muscle branches and divided by fiber length
};


#endif


#if BM_ARM_DELTOID_WRAPPING == ON
////////////////////////////////////////////////////
//     deltoideus_posterior_part (4 elements)     //
////////////////////////////////////////////////////
AnyMuscleModel deltoideus_posterior_part_1 =
{
  AnyFolder& MuscleParameters = .SubjectMusPar.deltoideus_posterior_part;
  AnyIntVar MuscleElemNo = 1; ///< The number of this element of the muscle
  AnyIntVar MuscleElemAmount = MuscleParameters.MuscleElemAmount; ///< The total amount of elements for this muscle
  F0 = .SubjectMusPar.PCSAfactor*PCSA; ///< Maximum force output at optimum fiber length
  Lf0 = MuscleParameters.OptimalFiberlength / cos(pi/180*MuscleParameters.Pennationangle); //< Optimal fiber length corrected by pennation angle
  Vol0 = 1e-6*MuscleParameters.MuscleVolume/MuscleElemAmount; ///< Muscle volume in (m3)
  AnyVar PCSA = 1e4*Vol0/Lf0;///< PCSA (cm2) is calculated as muscle volume divided between muscle branches and divided by fiber length
};

AnyMuscleModel deltoideus_posterior_part_2 =
{
  AnyFolder& MuscleParameters = .SubjectMusPar.deltoideus_posterior_part;
  AnyIntVar MuscleElemNo = 2; ///< The number of this element of the muscle
  AnyIntVar MuscleElemAmount = MuscleParameters.MuscleElemAmount; ///< The total amount of elements for this muscle
  F0 = .SubjectMusPar.PCSAfactor*PCSA; ///< Maximum force output at optimum fiber length
  Lf0 = MuscleParameters.OptimalFiberlength / cos(pi/180*MuscleParameters.Pennationangle); //< Optimal fiber length corrected by pennation angle
  Vol0 = 1e-6*MuscleParameters.MuscleVolume/MuscleElemAmount; ///< Muscle volume in (m3)
  AnyVar PCSA = 1e4*Vol0/Lf0;///< PCSA (cm2) is calculated as muscle volume divided between muscle branches and divided by fiber length
};

AnyMuscleModel deltoideus_posterior_part_3 =
{
  AnyFolder& MuscleParameters = .SubjectMusPar.deltoideus_posterior_part;
  AnyIntVar MuscleElemNo = 3; ///< The number of this element of the muscle
  AnyIntVar MuscleElemAmount = MuscleParameters.MuscleElemAmount; ///< The total amount of elements for this muscle
  F0 = .SubjectMusPar.PCSAfactor*PCSA; ///< Maximum force output at optimum fiber length
  Lf0 = MuscleParameters.OptimalFiberlength / cos(pi/180*MuscleParameters.Pennationangle); //< Optimal fiber length corrected by pennation angle
  Vol0 = 1e-6*MuscleParameters.MuscleVolume/MuscleElemAmount; ///< Muscle volume in (m3)
  AnyVar PCSA = 1e4*Vol0/Lf0;///< PCSA (cm2) is calculated as muscle volume divided between muscle branches and divided by fiber length
};

AnyMuscleModel deltoideus_posterior_part_4 =
{
  AnyFolder& MuscleParameters = .SubjectMusPar.deltoideus_posterior_part;
  AnyIntVar MuscleElemNo = 4; ///< The number of this element of the muscle
  AnyIntVar MuscleElemAmount = MuscleParameters.MuscleElemAmount; ///< The total amount of elements for this muscle
  F0 = .SubjectMusPar.PCSAfactor*PCSA; ///< Maximum force output at optimum fiber length
  Lf0 = MuscleParameters.OptimalFiberlength / cos(pi/180*MuscleParameters.Pennationangle); //< Optimal fiber length corrected by pennation angle
  Vol0 = 1e-6*MuscleParameters.MuscleVolume/MuscleElemAmount; ///< Muscle volume in (m3)
  AnyVar PCSA = 1e4*Vol0/Lf0;///< PCSA (cm2) is calculated as muscle volume divided between muscle branches and divided by fiber length
};


#endif


#if BM_ARM_DELTOID_WRAPPING == ON
//////////////////////////////////////////////////
//     deltoideus_lateral_part (4 elements)     //
//////////////////////////////////////////////////
AnyMuscleModel deltoideus_lateral_part_1 =
{
  AnyFolder& MuscleParameters = .SubjectMusPar.deltoideus_lateral_part;
  AnyIntVar MuscleElemNo = 1; ///< The number of this element of the muscle
  AnyIntVar MuscleElemAmount = MuscleParameters.MuscleElemAmount; ///< The total amount of elements for this muscle
  F0 = .SubjectMusPar.PCSAfactor*PCSA; ///< Maximum force output at optimum fiber length
  Lf0 = MuscleParameters.OptimalFiberlength / cos(pi/180*MuscleParameters.Pennationangle); //< Optimal fiber length corrected by pennation angle
  Vol0 = 1e-6*MuscleParameters.MuscleVolume/MuscleElemAmount; ///< Muscle volume in (m3)
  AnyVar PCSA = 1e4*Vol0/Lf0;///< PCSA (cm2) is calculated as muscle volume divided between muscle branches and divided by fiber length
};

AnyMuscleModel deltoideus_lateral_part_2 =
{
  AnyFolder& MuscleParameters = .SubjectMusPar.deltoideus_lateral_part;
  AnyIntVar MuscleElemNo = 2; ///< The number of this element of the muscle
  AnyIntVar MuscleElemAmount = MuscleParameters.MuscleElemAmount; ///< The total amount of elements for this muscle
  F0 = .SubjectMusPar.PCSAfactor*PCSA; ///< Maximum force output at optimum fiber length
  Lf0 = MuscleParameters.OptimalFiberlength / cos(pi/180*MuscleParameters.Pennationangle); //< Optimal fiber length corrected by pennation angle
  Vol0 = 1e-6*MuscleParameters.MuscleVolume/MuscleElemAmount; ///< Muscle volume in (m3)
  AnyVar PCSA = 1e4*Vol0/Lf0;///< PCSA (cm2) is calculated as muscle volume divided between muscle branches and divided by fiber length
};

AnyMuscleModel deltoideus_lateral_part_3 =
{
  AnyFolder& MuscleParameters = .SubjectMusPar.deltoideus_lateral_part;
  AnyIntVar MuscleElemNo = 3; ///< The number of this element of the muscle
  AnyIntVar MuscleElemAmount = MuscleParameters.MuscleElemAmount; ///< The total amount of elements for this muscle
  F0 = .SubjectMusPar.PCSAfactor*PCSA; ///< Maximum force output at optimum fiber length
  Lf0 = MuscleParameters.OptimalFiberlength / cos(pi/180*MuscleParameters.Pennationangle); //< Optimal fiber length corrected by pennation angle
  Vol0 = 1e-6*MuscleParameters.MuscleVolume/MuscleElemAmount; ///< Muscle volume in (m3)
  AnyVar PCSA = 1e4*Vol0/Lf0;///< PCSA (cm2) is calculated as muscle volume divided between muscle branches and divided by fiber length
};

AnyMuscleModel deltoideus_lateral_part_4 =
{
  AnyFolder& MuscleParameters = .SubjectMusPar.deltoideus_lateral_part;
  AnyIntVar MuscleElemNo = 4; ///< The number of this element of the muscle
  AnyIntVar MuscleElemAmount = MuscleParameters.MuscleElemAmount; ///< The total amount of elements for this muscle
  F0 = .SubjectMusPar.PCSAfactor*PCSA; ///< Maximum force output at optimum fiber length
  Lf0 = MuscleParameters.OptimalFiberlength / cos(pi/180*MuscleParameters.Pennationangle); //< Optimal fiber length corrected by pennation angle
  Vol0 = 1e-6*MuscleParameters.MuscleVolume/MuscleElemAmount; ///< Muscle volume in (m3)
  AnyVar PCSA = 1e4*Vol0/Lf0;///< PCSA (cm2) is calculated as muscle volume divided between muscle branches and divided by fiber length
};


#endif


#if BM_ARM_DELTOID_WRAPPING == ON
///////////////////////////////////////////////////
//     deltoideus_anterior_part (4 elements)     //
///////////////////////////////////////////////////
AnyMuscleModel deltoideus_anterior_part_1 =
{
  AnyFolder& MuscleParameters = .SubjectMusPar.deltoideus_anterior_part;
  AnyIntVar MuscleElemNo = 1; ///< The number of this element of the muscle
  AnyIntVar MuscleElemAmount = MuscleParameters.MuscleElemAmount; ///< The total amount of elements for this muscle
  F0 = .SubjectMusPar.PCSAfactor*PCSA; ///< Maximum force output at optimum fiber length
  Lf0 = MuscleParameters.OptimalFiberlength / cos(pi/180*MuscleParameters.Pennationangle); //< Optimal fiber length corrected by pennation angle
  Vol0 = 1e-6*MuscleParameters.MuscleVolume/MuscleElemAmount; ///< Muscle volume in (m3)
  AnyVar PCSA = 1e4*Vol0/Lf0;///< PCSA (cm2) is calculated as muscle volume divided between muscle branches and divided by fiber length
};

AnyMuscleModel deltoideus_anterior_part_2 =
{
  AnyFolder& MuscleParameters = .SubjectMusPar.deltoideus_anterior_part;
  AnyIntVar MuscleElemNo = 2; ///< The number of this element of the muscle
  AnyIntVar MuscleElemAmount = MuscleParameters.MuscleElemAmount; ///< The total amount of elements for this muscle
  F0 = .SubjectMusPar.PCSAfactor*PCSA; ///< Maximum force output at optimum fiber length
  Lf0 = MuscleParameters.OptimalFiberlength / cos(pi/180*MuscleParameters.Pennationangle); //< Optimal fiber length corrected by pennation angle
  Vol0 = 1e-6*MuscleParameters.MuscleVolume/MuscleElemAmount; ///< Muscle volume in (m3)
  AnyVar PCSA = 1e4*Vol0/Lf0;///< PCSA (cm2) is calculated as muscle volume divided between muscle branches and divided by fiber length
};

AnyMuscleModel deltoideus_anterior_part_3 =
{
  AnyFolder& MuscleParameters = .SubjectMusPar.deltoideus_anterior_part;
  AnyIntVar MuscleElemNo = 3; ///< The number of this element of the muscle
  AnyIntVar MuscleElemAmount = MuscleParameters.MuscleElemAmount; ///< The total amount of elements for this muscle
  F0 = .SubjectMusPar.PCSAfactor*PCSA; ///< Maximum force output at optimum fiber length
  Lf0 = MuscleParameters.OptimalFiberlength / cos(pi/180*MuscleParameters.Pennationangle); //< Optimal fiber length corrected by pennation angle
  Vol0 = 1e-6*MuscleParameters.MuscleVolume/MuscleElemAmount; ///< Muscle volume in (m3)
  AnyVar PCSA = 1e4*Vol0/Lf0;///< PCSA (cm2) is calculated as muscle volume divided between muscle branches and divided by fiber length
};

AnyMuscleModel deltoideus_anterior_part_4 =
{
  AnyFolder& MuscleParameters = .SubjectMusPar.deltoideus_anterior_part;
  AnyIntVar MuscleElemNo = 4; ///< The number of this element of the muscle
  AnyIntVar MuscleElemAmount = MuscleParameters.MuscleElemAmount; ///< The total amount of elements for this muscle
  F0 = .SubjectMusPar.PCSAfactor*PCSA; ///< Maximum force output at optimum fiber length
  Lf0 = MuscleParameters.OptimalFiberlength / cos(pi/180*MuscleParameters.Pennationangle); //< Optimal fiber length corrected by pennation angle
  Vol0 = 1e-6*MuscleParameters.MuscleVolume/MuscleElemAmount; ///< Muscle volume in (m3)
  AnyVar PCSA = 1e4*Vol0/Lf0;///< PCSA (cm2) is calculated as muscle volume divided between muscle branches and divided by fiber length
};


#endif


////////////////////////////////////////
//     infraspinatus (6 elements)     //
////////////////////////////////////////
AnyMuscleModel infraspinatus_1 =
{
  AnyFolder& MuscleParameters = .SubjectMusPar.infraspinatus;
  AnyIntVar MuscleElemNo = 1; ///< The number of this element of the muscle
  AnyIntVar MuscleElemAmount = MuscleParameters.MuscleElemAmount; ///< The total amount of elements for this muscle
  F0 = .SubjectMusPar.PCSAfactor*PCSA; ///< Maximum force output at optimum fiber length
  Lf0 = MuscleParameters.OptimalFiberlength / cos(pi/180*MuscleParameters.Pennationangle); //< Optimal fiber length corrected by pennation angle
  Vol0 = 1e-6*MuscleParameters.MuscleVolume/MuscleElemAmount; ///< Muscle volume in (m3)
  AnyVar PCSA = 1e4*Vol0/Lf0;///< PCSA (cm2) is calculated as muscle volume divided between muscle branches and divided by fiber length
};

AnyMuscleModel infraspinatus_2 =
{
  AnyFolder& MuscleParameters = .SubjectMusPar.infraspinatus;
  AnyIntVar MuscleElemNo = 2; ///< The number of this element of the muscle
  AnyIntVar MuscleElemAmount = MuscleParameters.MuscleElemAmount; ///< The total amount of elements for this muscle
  F0 = .SubjectMusPar.PCSAfactor*PCSA; ///< Maximum force output at optimum fiber length
  Lf0 = MuscleParameters.OptimalFiberlength / cos(pi/180*MuscleParameters.Pennationangle); //< Optimal fiber length corrected by pennation angle
  Vol0 = 1e-6*MuscleParameters.MuscleVolume/MuscleElemAmount; ///< Muscle volume in (m3)
  AnyVar PCSA = 1e4*Vol0/Lf0;///< PCSA (cm2) is calculated as muscle volume divided between muscle branches and divided by fiber length
};

AnyMuscleModel infraspinatus_3 =
{
  AnyFolder& MuscleParameters = .SubjectMusPar.infraspinatus;
  AnyIntVar MuscleElemNo = 3; ///< The number of this element of the muscle
  AnyIntVar MuscleElemAmount = MuscleParameters.MuscleElemAmount; ///< The total amount of elements for this muscle
  F0 = .SubjectMusPar.PCSAfactor*PCSA; ///< Maximum force output at optimum fiber length
  Lf0 = MuscleParameters.OptimalFiberlength / cos(pi/180*MuscleParameters.Pennationangle); //< Optimal fiber length corrected by pennation angle
  Vol0 = 1e-6*MuscleParameters.MuscleVolume/MuscleElemAmount; ///< Muscle volume in (m3)
  AnyVar PCSA = 1e4*Vol0/Lf0;///< PCSA (cm2) is calculated as muscle volume divided between muscle branches and divided by fiber length
};

AnyMuscleModel infraspinatus_4 =
{
  AnyFolder& MuscleParameters = .SubjectMusPar.infraspinatus;
  AnyIntVar MuscleElemNo = 4; ///< The number of this element of the muscle
  AnyIntVar MuscleElemAmount = MuscleParameters.MuscleElemAmount; ///< The total amount of elements for this muscle
  F0 = .SubjectMusPar.PCSAfactor*PCSA; ///< Maximum force output at optimum fiber length
  Lf0 = MuscleParameters.OptimalFiberlength / cos(pi/180*MuscleParameters.Pennationangle); //< Optimal fiber length corrected by pennation angle
  Vol0 = 1e-6*MuscleParameters.MuscleVolume/MuscleElemAmount; ///< Muscle volume in (m3)
  AnyVar PCSA = 1e4*Vol0/Lf0;///< PCSA (cm2) is calculated as muscle volume divided between muscle branches and divided by fiber length
};

AnyMuscleModel infraspinatus_5 =
{
  AnyFolder& MuscleParameters = .SubjectMusPar.infraspinatus;
  AnyIntVar MuscleElemNo = 5; ///< The number of this element of the muscle
  AnyIntVar MuscleElemAmount = MuscleParameters.MuscleElemAmount; ///< The total amount of elements for this muscle
  F0 = .SubjectMusPar.PCSAfactor*PCSA; ///< Maximum force output at optimum fiber length
  Lf0 = MuscleParameters.OptimalFiberlength / cos(pi/180*MuscleParameters.Pennationangle); //< Optimal fiber length corrected by pennation angle
  Vol0 = 1e-6*MuscleParameters.MuscleVolume/MuscleElemAmount; ///< Muscle volume in (m3)
  AnyVar PCSA = 1e4*Vol0/Lf0;///< PCSA (cm2) is calculated as muscle volume divided between muscle branches and divided by fiber length
};

AnyMuscleModel infraspinatus_6 =
{
  AnyFolder& MuscleParameters = .SubjectMusPar.infraspinatus;
  AnyIntVar MuscleElemNo = 6; ///< The number of this element of the muscle
  AnyIntVar MuscleElemAmount = MuscleParameters.MuscleElemAmount; ///< The total amount of elements for this muscle
  F0 = .SubjectMusPar.PCSAfactor*PCSA; ///< Maximum force output at optimum fiber length
  Lf0 = MuscleParameters.OptimalFiberlength / cos(pi/180*MuscleParameters.Pennationangle); //< Optimal fiber length corrected by pennation angle
  Vol0 = 1e-6*MuscleParameters.MuscleVolume/MuscleElemAmount; ///< Muscle volume in (m3)
  AnyVar PCSA = 1e4*Vol0/Lf0;///< PCSA (cm2) is calculated as muscle volume divided between muscle branches and divided by fiber length
};


///////////////////////////////////////////
//     latissimus_dorsi (5 elements)     //
///////////////////////////////////////////
AnyMuscleModel latissimus_dorsi_1 =
{
  AnyFolder& MuscleParameters = .SubjectMusPar.latissimus_dorsi;
  AnyIntVar MuscleElemNo = 1; ///< The number of this element of the muscle
  AnyIntVar MuscleElemAmount = MuscleParameters.MuscleElemAmount; ///< The total amount of elements for this muscle
  F0 = .SubjectMusPar.PCSAfactor*PCSA; ///< Maximum force output at optimum fiber length
  Lf0 = MuscleParameters.OptimalFiberlength / cos(pi/180*MuscleParameters.Pennationangle); //< Optimal fiber length corrected by pennation angle
  Vol0 = 1e-6*MuscleParameters.MuscleVolume * 0.0778; ///< Muscle volume in (m3)
  AnyVar PCSA = 1e4*Vol0/Lf0;///< PCSA (cm2) is calculated as muscle volume divided between muscle branches and divided by fiber length
};

AnyMuscleModel latissimus_dorsi_2 =
{
  AnyFolder& MuscleParameters = .SubjectMusPar.latissimus_dorsi;
  AnyIntVar MuscleElemNo = 2; ///< The number of this element of the muscle
  AnyIntVar MuscleElemAmount = MuscleParameters.MuscleElemAmount; ///< The total amount of elements for this muscle
  F0 = .SubjectMusPar.PCSAfactor*PCSA; ///< Maximum force output at optimum fiber length
  Lf0 = MuscleParameters.OptimalFiberlength / cos(pi/180*MuscleParameters.Pennationangle); //< Optimal fiber length corrected by pennation angle
  Vol0 = 1e-6*MuscleParameters.MuscleVolume * 0.1556; ///< Muscle volume in (m3)
  AnyVar PCSA = 1e4*Vol0/Lf0;///< PCSA (cm2) is calculated as muscle volume divided between muscle branches and divided by fiber length
};

AnyMuscleModel latissimus_dorsi_3 =
{
  AnyFolder& MuscleParameters = .SubjectMusPar.latissimus_dorsi;
  AnyIntVar MuscleElemNo = 3; ///< The number of this element of the muscle
  AnyIntVar MuscleElemAmount = MuscleParameters.MuscleElemAmount; ///< The total amount of elements for this muscle
  F0 = .SubjectMusPar.PCSAfactor*PCSA; ///< Maximum force output at optimum fiber length
  Lf0 = MuscleParameters.OptimalFiberlength / cos(pi/180*MuscleParameters.Pennationangle); //< Optimal fiber length corrected by pennation angle
  Vol0 = 1e-6*MuscleParameters.MuscleVolume * 0.2; ///< Muscle volume in (m3)
  AnyVar PCSA = 1e4*Vol0/Lf0;///< PCSA (cm2) is calculated as muscle volume divided between muscle branches and divided by fiber length
};

AnyMuscleModel latissimus_dorsi_4 =
{
  AnyFolder& MuscleParameters = .SubjectMusPar.latissimus_dorsi;
  AnyIntVar MuscleElemNo = 4; ///< The number of this element of the muscle
  AnyIntVar MuscleElemAmount = MuscleParameters.MuscleElemAmount; ///< The total amount of elements for this muscle
  F0 = .SubjectMusPar.PCSAfactor*PCSA; ///< Maximum force output at optimum fiber length
  Lf0 = MuscleParameters.OptimalFiberlength / cos(pi/180*MuscleParameters.Pennationangle); //< Optimal fiber length corrected by pennation angle
  Vol0 = 1e-6*MuscleParameters.MuscleVolume * 0.2444; ///< Muscle volume in (m3)
  AnyVar PCSA = 1e4*Vol0/Lf0;///< PCSA (cm2) is calculated as muscle volume divided between muscle branches and divided by fiber length
};

AnyMuscleModel latissimus_dorsi_5 =
{
  AnyFolder& MuscleParameters = .SubjectMusPar.latissimus_dorsi;
  AnyIntVar MuscleElemNo = 5; ///< The number of this element of the muscle
  AnyIntVar MuscleElemAmount = MuscleParameters.MuscleElemAmount; ///< The total amount of elements for this muscle
  F0 = .SubjectMusPar.PCSAfactor*PCSA; ///< Maximum force output at optimum fiber length
  Lf0 = MuscleParameters.OptimalFiberlength / cos(pi/180*MuscleParameters.Pennationangle); //< Optimal fiber length corrected by pennation angle
  Vol0 = 1e-6*MuscleParameters.MuscleVolume * 0.3222; ///< Muscle volume in (m3)
  AnyVar PCSA = 1e4*Vol0/Lf0;///< PCSA (cm2) is calculated as muscle volume divided between muscle branches and divided by fiber length
};


///////////////////////////////////////////
//     levator_scapulae (4 elements)     //
///////////////////////////////////////////
AnyMuscleModel levator_scapulae_1 =
{
  AnyFolder& MuscleParameters = .SubjectMusPar.levator_scapulae;
  AnyIntVar MuscleElemNo = 1; ///< The number of this element of the muscle
  AnyIntVar MuscleElemAmount = MuscleParameters.MuscleElemAmount; ///< The total amount of elements for this muscle
  F0 = .SubjectMusPar.PCSAfactor*PCSA; ///< Maximum force output at optimum fiber length
  Lf0 = MuscleParameters.OptimalFiberlength / cos(pi/180*MuscleParameters.Pennationangle); //< Optimal fiber length corrected by pennation angle
  Vol0 = 1e-6*MuscleParameters.MuscleVolume/MuscleElemAmount; ///< Muscle volume in (m3)
  AnyVar PCSA = 1e4*Vol0/Lf0;///< PCSA (cm2) is calculated as muscle volume divided between muscle branches and divided by fiber length
};

AnyMuscleModel levator_scapulae_2 =
{
  AnyFolder& MuscleParameters = .SubjectMusPar.levator_scapulae;
  AnyIntVar MuscleElemNo = 2; ///< The number of this element of the muscle
  AnyIntVar MuscleElemAmount = MuscleParameters.MuscleElemAmount; ///< The total amount of elements for this muscle
  F0 = .SubjectMusPar.PCSAfactor*PCSA; ///< Maximum force output at optimum fiber length
  Lf0 = MuscleParameters.OptimalFiberlength / cos(pi/180*MuscleParameters.Pennationangle); //< Optimal fiber length corrected by pennation angle
  Vol0 = 1e-6*MuscleParameters.MuscleVolume/MuscleElemAmount; ///< Muscle volume in (m3)
  AnyVar PCSA = 1e4*Vol0/Lf0;///< PCSA (cm2) is calculated as muscle volume divided between muscle branches and divided by fiber length
};

AnyMuscleModel levator_scapulae_3 =
{
  AnyFolder& MuscleParameters = .SubjectMusPar.levator_scapulae;
  AnyIntVar MuscleElemNo = 3; ///< The number of this element of the muscle
  AnyIntVar MuscleElemAmount = MuscleParameters.MuscleElemAmount; ///< The total amount of elements for this muscle
  F0 = .SubjectMusPar.PCSAfactor*PCSA; ///< Maximum force output at optimum fiber length
  Lf0 = MuscleParameters.OptimalFiberlength / cos(pi/180*MuscleParameters.Pennationangle); //< Optimal fiber length corrected by pennation angle
  Vol0 = 1e-6*MuscleParameters.MuscleVolume/MuscleElemAmount; ///< Muscle volume in (m3)
  AnyVar PCSA = 1e4*Vol0/Lf0;///< PCSA (cm2) is calculated as muscle volume divided between muscle branches and divided by fiber length
};

AnyMuscleModel levator_scapulae_4 =
{
  AnyFolder& MuscleParameters = .SubjectMusPar.levator_scapulae;
  AnyIntVar MuscleElemNo = 4; ///< The number of this element of the muscle
  AnyIntVar MuscleElemAmount = MuscleParameters.MuscleElemAmount; ///< The total amount of elements for this muscle
  F0 = .SubjectMusPar.PCSAfactor*PCSA; ///< Maximum force output at optimum fiber length
  Lf0 = MuscleParameters.OptimalFiberlength / cos(pi/180*MuscleParameters.Pennationangle); //< Optimal fiber length corrected by pennation angle
  Vol0 = 1e-6*MuscleParameters.MuscleVolume/MuscleElemAmount; ///< Muscle volume in (m3)
  AnyVar PCSA = 1e4*Vol0/Lf0;///< PCSA (cm2) is calculated as muscle volume divided between muscle branches and divided by fiber length
};


/////////////////////////////////////////////////////////
//     pectoralis_major_thoracic_part (5 elements)     //
/////////////////////////////////////////////////////////
AnyMuscleModel pectoralis_major_thoracic_part_1 =
{
  AnyFolder& MuscleParameters = .SubjectMusPar.pectoralis_major_thoracic_part;
  AnyIntVar MuscleElemNo = 1; ///< The number of this element of the muscle
  AnyIntVar MuscleElemAmount = MuscleParameters.MuscleElemAmount; ///< The total amount of elements for this muscle
  F0 = .SubjectMusPar.PCSAfactor*PCSA; ///< Maximum force output at optimum fiber length
  Lf0 = MuscleParameters.OptimalFiberlength / cos(pi/180*MuscleParameters.Pennationangle); //< Optimal fiber length corrected by pennation angle
  Vol0 = 1e-6*MuscleParameters.MuscleVolume/MuscleElemAmount; ///< Muscle volume in (m3)
  AnyVar PCSA = 1e4*Vol0/Lf0;///< PCSA (cm2) is calculated as muscle volume divided between muscle branches and divided by fiber length
};

AnyMuscleModel pectoralis_major_thoracic_part_2 =
{
  AnyFolder& MuscleParameters = .SubjectMusPar.pectoralis_major_thoracic_part;
  AnyIntVar MuscleElemNo = 2; ///< The number of this element of the muscle
  AnyIntVar MuscleElemAmount = MuscleParameters.MuscleElemAmount; ///< The total amount of elements for this muscle
  F0 = .SubjectMusPar.PCSAfactor*PCSA; ///< Maximum force output at optimum fiber length
  Lf0 = MuscleParameters.OptimalFiberlength / cos(pi/180*MuscleParameters.Pennationangle); //< Optimal fiber length corrected by pennation angle
  Vol0 = 1e-6*MuscleParameters.MuscleVolume/MuscleElemAmount; ///< Muscle volume in (m3)
  AnyVar PCSA = 1e4*Vol0/Lf0;///< PCSA (cm2) is calculated as muscle volume divided between muscle branches and divided by fiber length
};

AnyMuscleModel pectoralis_major_thoracic_part_3 =
{
  AnyFolder& MuscleParameters = .SubjectMusPar.pectoralis_major_thoracic_part;
  AnyIntVar MuscleElemNo = 3; ///< The number of this element of the muscle
  AnyIntVar MuscleElemAmount = MuscleParameters.MuscleElemAmount; ///< The total amount of elements for this muscle
  F0 = .SubjectMusPar.PCSAfactor*PCSA; ///< Maximum force output at optimum fiber length
  Lf0 = MuscleParameters.OptimalFiberlength / cos(pi/180*MuscleParameters.Pennationangle); //< Optimal fiber length corrected by pennation angle
  Vol0 = 1e-6*MuscleParameters.MuscleVolume/MuscleElemAmount; ///< Muscle volume in (m3)
  AnyVar PCSA = 1e4*Vol0/Lf0;///< PCSA (cm2) is calculated as muscle volume divided between muscle branches and divided by fiber length
};

AnyMuscleModel pectoralis_major_thoracic_part_4 =
{
  AnyFolder& MuscleParameters = .SubjectMusPar.pectoralis_major_thoracic_part;
  AnyIntVar MuscleElemNo = 4; ///< The number of this element of the muscle
  AnyIntVar MuscleElemAmount = MuscleParameters.MuscleElemAmount; ///< The total amount of elements for this muscle
  F0 = .SubjectMusPar.PCSAfactor*PCSA; ///< Maximum force output at optimum fiber length
  Lf0 = MuscleParameters.OptimalFiberlength / cos(pi/180*MuscleParameters.Pennationangle); //< Optimal fiber length corrected by pennation angle
  Vol0 = 1e-6*MuscleParameters.MuscleVolume/MuscleElemAmount; ///< Muscle volume in (m3)
  AnyVar PCSA = 1e4*Vol0/Lf0;///< PCSA (cm2) is calculated as muscle volume divided between muscle branches and divided by fiber length
};

AnyMuscleModel pectoralis_major_thoracic_part_5 =
{
  AnyFolder& MuscleParameters = .SubjectMusPar.pectoralis_major_thoracic_part;
  AnyIntVar MuscleElemNo = 5; ///< The number of this element of the muscle
  AnyIntVar MuscleElemAmount = MuscleParameters.MuscleElemAmount; ///< The total amount of elements for this muscle
  F0 = .SubjectMusPar.PCSAfactor*PCSA; ///< Maximum force output at optimum fiber length
  Lf0 = MuscleParameters.OptimalFiberlength / cos(pi/180*MuscleParameters.Pennationangle); //< Optimal fiber length corrected by pennation angle
  Vol0 = 1e-6*MuscleParameters.MuscleVolume/MuscleElemAmount; ///< Muscle volume in (m3)
  AnyVar PCSA = 1e4*Vol0/Lf0;///< PCSA (cm2) is calculated as muscle volume divided between muscle branches and divided by fiber length
};


///////////////////////////////////////////////////////////
//     pectoralis_major_clavicular_part (5 elements)     //
///////////////////////////////////////////////////////////
AnyMuscleModel pectoralis_major_clavicular_part_1 =
{
  AnyFolder& MuscleParameters = .SubjectMusPar.pectoralis_major_clavicular_part;
  AnyIntVar MuscleElemNo = 1; ///< The number of this element of the muscle
  AnyIntVar MuscleElemAmount = MuscleParameters.MuscleElemAmount; ///< The total amount of elements for this muscle
  F0 = .SubjectMusPar.PCSAfactor*PCSA; ///< Maximum force output at optimum fiber length
  Lf0 = MuscleParameters.OptimalFiberlength / cos(pi/180*MuscleParameters.Pennationangle); //< Optimal fiber length corrected by pennation angle
  Vol0 = 1e-6*MuscleParameters.MuscleVolume/MuscleElemAmount; ///< Muscle volume in (m3)
  AnyVar PCSA = 1e4*Vol0/Lf0;///< PCSA (cm2) is calculated as muscle volume divided between muscle branches and divided by fiber length
};

AnyMuscleModel pectoralis_major_clavicular_part_2 =
{
  AnyFolder& MuscleParameters = .SubjectMusPar.pectoralis_major_clavicular_part;
  AnyIntVar MuscleElemNo = 2; ///< The number of this element of the muscle
  AnyIntVar MuscleElemAmount = MuscleParameters.MuscleElemAmount; ///< The total amount of elements for this muscle
  F0 = .SubjectMusPar.PCSAfactor*PCSA; ///< Maximum force output at optimum fiber length
  Lf0 = MuscleParameters.OptimalFiberlength / cos(pi/180*MuscleParameters.Pennationangle); //< Optimal fiber length corrected by pennation angle
  Vol0 = 1e-6*MuscleParameters.MuscleVolume/MuscleElemAmount; ///< Muscle volume in (m3)
  AnyVar PCSA = 1e4*Vol0/Lf0;///< PCSA (cm2) is calculated as muscle volume divided between muscle branches and divided by fiber length
};

AnyMuscleModel pectoralis_major_clavicular_part_3 =
{
  AnyFolder& MuscleParameters = .SubjectMusPar.pectoralis_major_clavicular_part;
  AnyIntVar MuscleElemNo = 3; ///< The number of this element of the muscle
  AnyIntVar MuscleElemAmount = MuscleParameters.MuscleElemAmount; ///< The total amount of elements for this muscle
  F0 = .SubjectMusPar.PCSAfactor*PCSA; ///< Maximum force output at optimum fiber length
  Lf0 = MuscleParameters.OptimalFiberlength / cos(pi/180*MuscleParameters.Pennationangle); //< Optimal fiber length corrected by pennation angle
  Vol0 = 1e-6*MuscleParameters.MuscleVolume/MuscleElemAmount; ///< Muscle volume in (m3)
  AnyVar PCSA = 1e4*Vol0/Lf0;///< PCSA (cm2) is calculated as muscle volume divided between muscle branches and divided by fiber length
};

AnyMuscleModel pectoralis_major_clavicular_part_4 =
{
  AnyFolder& MuscleParameters = .SubjectMusPar.pectoralis_major_clavicular_part;
  AnyIntVar MuscleElemNo = 4; ///< The number of this element of the muscle
  AnyIntVar MuscleElemAmount = MuscleParameters.MuscleElemAmount; ///< The total amount of elements for this muscle
  F0 = .SubjectMusPar.PCSAfactor*PCSA; ///< Maximum force output at optimum fiber length
  Lf0 = MuscleParameters.OptimalFiberlength / cos(pi/180*MuscleParameters.Pennationangle); //< Optimal fiber length corrected by pennation angle
  Vol0 = 1e-6*MuscleParameters.MuscleVolume/MuscleElemAmount; ///< Muscle volume in (m3)
  AnyVar PCSA = 1e4*Vol0/Lf0;///< PCSA (cm2) is calculated as muscle volume divided between muscle branches and divided by fiber length
};

AnyMuscleModel pectoralis_major_clavicular_part_5 =
{
  AnyFolder& MuscleParameters = .SubjectMusPar.pectoralis_major_clavicular_part;
  AnyIntVar MuscleElemNo = 5; ///< The number of this element of the muscle
  AnyIntVar MuscleElemAmount = MuscleParameters.MuscleElemAmount; ///< The total amount of elements for this muscle
  F0 = .SubjectMusPar.PCSAfactor*PCSA; ///< Maximum force output at optimum fiber length
  Lf0 = MuscleParameters.OptimalFiberlength / cos(pi/180*MuscleParameters.Pennationangle); //< Optimal fiber length corrected by pennation angle
  Vol0 = 1e-6*MuscleParameters.MuscleVolume/MuscleElemAmount; ///< Muscle volume in (m3)
  AnyVar PCSA = 1e4*Vol0/Lf0;///< PCSA (cm2) is calculated as muscle volume divided between muscle branches and divided by fiber length
};


///////////////////////////////////////////
//     pectoralis_minor (5 elements)     //
///////////////////////////////////////////
AnyMuscleModel pectoralis_minor_1 =
{
  AnyFolder& MuscleParameters = .SubjectMusPar.pectoralis_minor;
  AnyIntVar MuscleElemNo = 1; ///< The number of this element of the muscle
  AnyIntVar MuscleElemAmount = MuscleParameters.MuscleElemAmount; ///< The total amount of elements for this muscle
  F0 = .SubjectMusPar.PCSAfactor*PCSA; ///< Maximum force output at optimum fiber length
  Lf0 = MuscleParameters.OptimalFiberlength / cos(pi/180*MuscleParameters.Pennationangle); //< Optimal fiber length corrected by pennation angle
  Vol0 = 1e-6*MuscleParameters.MuscleVolume/MuscleElemAmount; ///< Muscle volume in (m3)
  AnyVar PCSA = 1e4*Vol0/Lf0;///< PCSA (cm2) is calculated as muscle volume divided between muscle branches and divided by fiber length
};

AnyMuscleModel pectoralis_minor_2 =
{
  AnyFolder& MuscleParameters = .SubjectMusPar.pectoralis_minor;
  AnyIntVar MuscleElemNo = 2; ///< The number of this element of the muscle
  AnyIntVar MuscleElemAmount = MuscleParameters.MuscleElemAmount; ///< The total amount of elements for this muscle
  F0 = .SubjectMusPar.PCSAfactor*PCSA; ///< Maximum force output at optimum fiber length
  Lf0 = MuscleParameters.OptimalFiberlength / cos(pi/180*MuscleParameters.Pennationangle); //< Optimal fiber length corrected by pennation angle
  Vol0 = 1e-6*MuscleParameters.MuscleVolume/MuscleElemAmount; ///< Muscle volume in (m3)
  AnyVar PCSA = 1e4*Vol0/Lf0;///< PCSA (cm2) is calculated as muscle volume divided between muscle branches and divided by fiber length
};

AnyMuscleModel pectoralis_minor_3 =
{
  AnyFolder& MuscleParameters = .SubjectMusPar.pectoralis_minor;
  AnyIntVar MuscleElemNo = 3; ///< The number of this element of the muscle
  AnyIntVar MuscleElemAmount = MuscleParameters.MuscleElemAmount; ///< The total amount of elements for this muscle
  F0 = .SubjectMusPar.PCSAfactor*PCSA; ///< Maximum force output at optimum fiber length
  Lf0 = MuscleParameters.OptimalFiberlength / cos(pi/180*MuscleParameters.Pennationangle); //< Optimal fiber length corrected by pennation angle
  Vol0 = 1e-6*MuscleParameters.MuscleVolume/MuscleElemAmount; ///< Muscle volume in (m3)
  AnyVar PCSA = 1e4*Vol0/Lf0;///< PCSA (cm2) is calculated as muscle volume divided between muscle branches and divided by fiber length
};

AnyMuscleModel pectoralis_minor_4 =
{
  AnyFolder& MuscleParameters = .SubjectMusPar.pectoralis_minor;
  AnyIntVar MuscleElemNo = 4; ///< The number of this element of the muscle
  AnyIntVar MuscleElemAmount = MuscleParameters.MuscleElemAmount; ///< The total amount of elements for this muscle
  F0 = .SubjectMusPar.PCSAfactor*PCSA; ///< Maximum force output at optimum fiber length
  Lf0 = MuscleParameters.OptimalFiberlength / cos(pi/180*MuscleParameters.Pennationangle); //< Optimal fiber length corrected by pennation angle
  Vol0 = 1e-6*MuscleParameters.MuscleVolume/MuscleElemAmount; ///< Muscle volume in (m3)
  AnyVar PCSA = 1e4*Vol0/Lf0;///< PCSA (cm2) is calculated as muscle volume divided between muscle branches and divided by fiber length
};

AnyMuscleModel pectoralis_minor_5 =
{
  AnyFolder& MuscleParameters = .SubjectMusPar.pectoralis_minor;
  AnyIntVar MuscleElemNo = 5; ///< The number of this element of the muscle
  AnyIntVar MuscleElemAmount = MuscleParameters.MuscleElemAmount; ///< The total amount of elements for this muscle
  F0 = .SubjectMusPar.PCSAfactor*PCSA; ///< Maximum force output at optimum fiber length
  Lf0 = MuscleParameters.OptimalFiberlength / cos(pi/180*MuscleParameters.Pennationangle); //< Optimal fiber length corrected by pennation angle
  Vol0 = 1e-6*MuscleParameters.MuscleVolume/MuscleElemAmount; ///< Muscle volume in (m3)
  AnyVar PCSA = 1e4*Vol0/Lf0;///< PCSA (cm2) is calculated as muscle volume divided between muscle branches and divided by fiber length
};


//////////////////////////////////////
//     rhomboideus (3 elements)     //
//////////////////////////////////////
AnyMuscleModel rhomboideus_1 =
{
  AnyFolder& MuscleParameters = .SubjectMusPar.rhomboideus;
  AnyIntVar MuscleElemNo = 1; ///< The number of this element of the muscle
  AnyIntVar MuscleElemAmount = MuscleParameters.MuscleElemAmount; ///< The total amount of elements for this muscle
  F0 = .SubjectMusPar.PCSAfactor*PCSA; ///< Maximum force output at optimum fiber length
  Lf0 = MuscleParameters.OptimalFiberlength / cos(pi/180*MuscleParameters.Pennationangle); //< Optimal fiber length corrected by pennation angle
  Vol0 = 1e-6*MuscleParameters.MuscleVolume/MuscleElemAmount; ///< Muscle volume in (m3)
  AnyVar PCSA = 1e4*Vol0/Lf0;///< PCSA (cm2) is calculated as muscle volume divided between muscle branches and divided by fiber length
};

AnyMuscleModel rhomboideus_2 =
{
  AnyFolder& MuscleParameters = .SubjectMusPar.rhomboideus;
  AnyIntVar MuscleElemNo = 2; ///< The number of this element of the muscle
  AnyIntVar MuscleElemAmount = MuscleParameters.MuscleElemAmount; ///< The total amount of elements for this muscle
  F0 = .SubjectMusPar.PCSAfactor*PCSA; ///< Maximum force output at optimum fiber length
  Lf0 = MuscleParameters.OptimalFiberlength / cos(pi/180*MuscleParameters.Pennationangle); //< Optimal fiber length corrected by pennation angle
  Vol0 = 1e-6*MuscleParameters.MuscleVolume/MuscleElemAmount; ///< Muscle volume in (m3)
  AnyVar PCSA = 1e4*Vol0/Lf0;///< PCSA (cm2) is calculated as muscle volume divided between muscle branches and divided by fiber length
};

AnyMuscleModel rhomboideus_3 =
{
  AnyFolder& MuscleParameters = .SubjectMusPar.rhomboideus;
  AnyIntVar MuscleElemNo = 3; ///< The number of this element of the muscle
  AnyIntVar MuscleElemAmount = MuscleParameters.MuscleElemAmount; ///< The total amount of elements for this muscle
  F0 = .SubjectMusPar.PCSAfactor*PCSA; ///< Maximum force output at optimum fiber length
  Lf0 = MuscleParameters.OptimalFiberlength / cos(pi/180*MuscleParameters.Pennationangle); //< Optimal fiber length corrected by pennation angle
  Vol0 = 1e-6*MuscleParameters.MuscleVolume/MuscleElemAmount; ///< Muscle volume in (m3)
  AnyVar PCSA = 1e4*Vol0/Lf0;///< PCSA (cm2) is calculated as muscle volume divided between muscle branches and divided by fiber length
};


////////////////////////////////////////////
//     serratus_anterior (6 elements)     //
////////////////////////////////////////////
AnyMuscleModel serratus_anterior_1 =
{
  AnyFolder& MuscleParameters = .SubjectMusPar.serratus_anterior;
  AnyIntVar MuscleElemNo = 1; ///< The number of this element of the muscle
  AnyIntVar MuscleElemAmount = MuscleParameters.MuscleElemAmount; ///< The total amount of elements for this muscle
  F0 = .SubjectMusPar.PCSAfactor*PCSA; ///< Maximum force output at optimum fiber length
  Lf0 = MuscleParameters.OptimalFiberlength / cos(pi/180*MuscleParameters.Pennationangle); //< Optimal fiber length corrected by pennation angle
  Vol0 = 1e-6*MuscleParameters.MuscleVolume/MuscleElemAmount; ///< Muscle volume in (m3)
  AnyVar PCSA = 1e4*Vol0/Lf0;///< PCSA (cm2) is calculated as muscle volume divided between muscle branches and divided by fiber length
};

AnyMuscleModel serratus_anterior_2 =
{
  AnyFolder& MuscleParameters = .SubjectMusPar.serratus_anterior;
  AnyIntVar MuscleElemNo = 2; ///< The number of this element of the muscle
  AnyIntVar MuscleElemAmount = MuscleParameters.MuscleElemAmount; ///< The total amount of elements for this muscle
  F0 = .SubjectMusPar.PCSAfactor*PCSA; ///< Maximum force output at optimum fiber length
  Lf0 = MuscleParameters.OptimalFiberlength / cos(pi/180*MuscleParameters.Pennationangle); //< Optimal fiber length corrected by pennation angle
  Vol0 = 1e-6*MuscleParameters.MuscleVolume/MuscleElemAmount; ///< Muscle volume in (m3)
  AnyVar PCSA = 1e4*Vol0/Lf0;///< PCSA (cm2) is calculated as muscle volume divided between muscle branches and divided by fiber length
};

AnyMuscleModel serratus_anterior_3 =
{
  AnyFolder& MuscleParameters = .SubjectMusPar.serratus_anterior;
  AnyIntVar MuscleElemNo = 3; ///< The number of this element of the muscle
  AnyIntVar MuscleElemAmount = MuscleParameters.MuscleElemAmount; ///< The total amount of elements for this muscle
  F0 = .SubjectMusPar.PCSAfactor*PCSA; ///< Maximum force output at optimum fiber length
  Lf0 = MuscleParameters.OptimalFiberlength / cos(pi/180*MuscleParameters.Pennationangle); //< Optimal fiber length corrected by pennation angle
  Vol0 = 1e-6*MuscleParameters.MuscleVolume/MuscleElemAmount; ///< Muscle volume in (m3)
  AnyVar PCSA = 1e4*Vol0/Lf0;///< PCSA (cm2) is calculated as muscle volume divided between muscle branches and divided by fiber length
};

AnyMuscleModel serratus_anterior_4 =
{
  AnyFolder& MuscleParameters = .SubjectMusPar.serratus_anterior;
  AnyIntVar MuscleElemNo = 4; ///< The number of this element of the muscle
  AnyIntVar MuscleElemAmount = MuscleParameters.MuscleElemAmount; ///< The total amount of elements for this muscle
  F0 = .SubjectMusPar.PCSAfactor*PCSA; ///< Maximum force output at optimum fiber length
  Lf0 = MuscleParameters.OptimalFiberlength / cos(pi/180*MuscleParameters.Pennationangle); //< Optimal fiber length corrected by pennation angle
  Vol0 = 1e-6*MuscleParameters.MuscleVolume/MuscleElemAmount; ///< Muscle volume in (m3)
  AnyVar PCSA = 1e4*Vol0/Lf0;///< PCSA (cm2) is calculated as muscle volume divided between muscle branches and divided by fiber length
};

AnyMuscleModel serratus_anterior_5 =
{
  AnyFolder& MuscleParameters = .SubjectMusPar.serratus_anterior;
  AnyIntVar MuscleElemNo = 5; ///< The number of this element of the muscle
  AnyIntVar MuscleElemAmount = MuscleParameters.MuscleElemAmount; ///< The total amount of elements for this muscle
  F0 = .SubjectMusPar.PCSAfactor*PCSA; ///< Maximum force output at optimum fiber length
  Lf0 = MuscleParameters.OptimalFiberlength / cos(pi/180*MuscleParameters.Pennationangle); //< Optimal fiber length corrected by pennation angle
  Vol0 = 1e-6*MuscleParameters.MuscleVolume/MuscleElemAmount; ///< Muscle volume in (m3)
  AnyVar PCSA = 1e4*Vol0/Lf0;///< PCSA (cm2) is calculated as muscle volume divided between muscle branches and divided by fiber length
};

AnyMuscleModel serratus_anterior_6 =
{
  AnyFolder& MuscleParameters = .SubjectMusPar.serratus_anterior;
  AnyIntVar MuscleElemNo = 6; ///< The number of this element of the muscle
  AnyIntVar MuscleElemAmount = MuscleParameters.MuscleElemAmount; ///< The total amount of elements for this muscle
  F0 = .SubjectMusPar.PCSAfactor*PCSA; ///< Maximum force output at optimum fiber length
  Lf0 = MuscleParameters.OptimalFiberlength / cos(pi/180*MuscleParameters.Pennationangle); //< Optimal fiber length corrected by pennation angle
  Vol0 = 1e-6*MuscleParameters.MuscleVolume/MuscleElemAmount; ///< Muscle volume in (m3)
  AnyVar PCSA = 1e4*Vol0/Lf0;///< PCSA (cm2) is calculated as muscle volume divided between muscle branches and divided by fiber length
};


//////////////////////////////////////////////
//     Sternocleidomastoid (1 element )     //
//////////////////////////////////////////////
AnyMuscleModel Sternocleidomastoid =
{
  AnyFolder& MuscleParameters = .SubjectMusPar.Sternocleidomastoid;
  AnyIntVar MuscleElemNo = 1; ///< The number of this element of the muscle
  AnyIntVar MuscleElemAmount = MuscleParameters.MuscleElemAmount; ///< The total amount of elements for this muscle
  F0 = .SubjectMusPar.PCSAfactor*PCSA; ///< Maximum force output at optimum fiber length
  Lf0 = MuscleParameters.OptimalFiberlength / cos(pi/180*MuscleParameters.Pennationangle); //< Optimal fiber length corrected by pennation angle
  Vol0 = 1e-6*MuscleParameters.MuscleVolume/MuscleElemAmount; ///< Muscle volume in (m3)
  AnyVar PCSA = 1e4*Vol0/Lf0;///< PCSA (cm2) is calculated as muscle volume divided between muscle branches and divided by fiber length
};


////////////////////////////////////////
//     subscapularis (6 elements)     //
////////////////////////////////////////
AnyMuscleModel subscapularis_1 =
{
  AnyFolder& MuscleParameters = .SubjectMusPar.subscapularis;
  AnyIntVar MuscleElemNo = 1; ///< The number of this element of the muscle
  AnyIntVar MuscleElemAmount = MuscleParameters.MuscleElemAmount; ///< The total amount of elements for this muscle
  F0 = .SubjectMusPar.PCSAfactor*PCSA; ///< Maximum force output at optimum fiber length
  Lf0 = MuscleParameters.OptimalFiberlength / cos(pi/180*MuscleParameters.Pennationangle); //< Optimal fiber length corrected by pennation angle
  Vol0 = 1e-6*MuscleParameters.MuscleVolume/MuscleElemAmount; ///< Muscle volume in (m3)
  AnyVar PCSA = 1e4*Vol0/Lf0;///< PCSA (cm2) is calculated as muscle volume divided between muscle branches and divided by fiber length
};

AnyMuscleModel subscapularis_2 =
{
  AnyFolder& MuscleParameters = .SubjectMusPar.subscapularis;
  AnyIntVar MuscleElemNo = 2; ///< The number of this element of the muscle
  AnyIntVar MuscleElemAmount = MuscleParameters.MuscleElemAmount; ///< The total amount of elements for this muscle
  F0 = .SubjectMusPar.PCSAfactor*PCSA; ///< Maximum force output at optimum fiber length
  Lf0 = MuscleParameters.OptimalFiberlength / cos(pi/180*MuscleParameters.Pennationangle); //< Optimal fiber length corrected by pennation angle
  Vol0 = 1e-6*MuscleParameters.MuscleVolume/MuscleElemAmount; ///< Muscle volume in (m3)
  AnyVar PCSA = 1e4*Vol0/Lf0;///< PCSA (cm2) is calculated as muscle volume divided between muscle branches and divided by fiber length
};

AnyMuscleModel subscapularis_3 =
{
  AnyFolder& MuscleParameters = .SubjectMusPar.subscapularis;
  AnyIntVar MuscleElemNo = 3; ///< The number of this element of the muscle
  AnyIntVar MuscleElemAmount = MuscleParameters.MuscleElemAmount; ///< The total amount of elements for this muscle
  F0 = .SubjectMusPar.PCSAfactor*PCSA; ///< Maximum force output at optimum fiber length
  Lf0 = MuscleParameters.OptimalFiberlength / cos(pi/180*MuscleParameters.Pennationangle); //< Optimal fiber length corrected by pennation angle
  Vol0 = 1e-6*MuscleParameters.MuscleVolume/MuscleElemAmount; ///< Muscle volume in (m3)
  AnyVar PCSA = 1e4*Vol0/Lf0;///< PCSA (cm2) is calculated as muscle volume divided between muscle branches and divided by fiber length
};

AnyMuscleModel subscapularis_4 =
{
  AnyFolder& MuscleParameters = .SubjectMusPar.subscapularis;
  AnyIntVar MuscleElemNo = 4; ///< The number of this element of the muscle
  AnyIntVar MuscleElemAmount = MuscleParameters.MuscleElemAmount; ///< The total amount of elements for this muscle
  F0 = .SubjectMusPar.PCSAfactor*PCSA; ///< Maximum force output at optimum fiber length
  Lf0 = MuscleParameters.OptimalFiberlength / cos(pi/180*MuscleParameters.Pennationangle); //< Optimal fiber length corrected by pennation angle
  Vol0 = 1e-6*MuscleParameters.MuscleVolume/MuscleElemAmount; ///< Muscle volume in (m3)
  AnyVar PCSA = 1e4*Vol0/Lf0;///< PCSA (cm2) is calculated as muscle volume divided between muscle branches and divided by fiber length
};

AnyMuscleModel subscapularis_5 =
{
  AnyFolder& MuscleParameters = .SubjectMusPar.subscapularis;
  AnyIntVar MuscleElemNo = 5; ///< The number of this element of the muscle
  AnyIntVar MuscleElemAmount = MuscleParameters.MuscleElemAmount; ///< The total amount of elements for this muscle
  F0 = .SubjectMusPar.PCSAfactor*PCSA; ///< Maximum force output at optimum fiber length
  Lf0 = MuscleParameters.OptimalFiberlength / cos(pi/180*MuscleParameters.Pennationangle); //< Optimal fiber length corrected by pennation angle
  Vol0 = 1e-6*MuscleParameters.MuscleVolume/MuscleElemAmount; ///< Muscle volume in (m3)
  AnyVar PCSA = 1e4*Vol0/Lf0;///< PCSA (cm2) is calculated as muscle volume divided between muscle branches and divided by fiber length
};

AnyMuscleModel subscapularis_6 =
{
  AnyFolder& MuscleParameters = .SubjectMusPar.subscapularis;
  AnyIntVar MuscleElemNo = 6; ///< The number of this element of the muscle
  AnyIntVar MuscleElemAmount = MuscleParameters.MuscleElemAmount; ///< The total amount of elements for this muscle
  F0 = .SubjectMusPar.PCSAfactor*PCSA; ///< Maximum force output at optimum fiber length
  Lf0 = MuscleParameters.OptimalFiberlength / cos(pi/180*MuscleParameters.Pennationangle); //< Optimal fiber length corrected by pennation angle
  Vol0 = 1e-6*MuscleParameters.MuscleVolume/MuscleElemAmount; ///< Muscle volume in (m3)
  AnyVar PCSA = 1e4*Vol0/Lf0;///< PCSA (cm2) is calculated as muscle volume divided between muscle branches and divided by fiber length
};


////////////////////////////////////////
//     supraspinatus (6 elements)     //
////////////////////////////////////////
AnyMuscleModel supraspinatus_1 =
{
  AnyFolder& MuscleParameters = .SubjectMusPar.supraspinatus;
  AnyIntVar MuscleElemNo = 1; ///< The number of this element of the muscle
  AnyIntVar MuscleElemAmount = MuscleParameters.MuscleElemAmount; ///< The total amount of elements for this muscle
  F0 = .SubjectMusPar.PCSAfactor*PCSA; ///< Maximum force output at optimum fiber length
  Lf0 = MuscleParameters.OptimalFiberlength / cos(pi/180*MuscleParameters.Pennationangle); //< Optimal fiber length corrected by pennation angle
  Vol0 = 1e-6*MuscleParameters.MuscleVolume/MuscleElemAmount; ///< Muscle volume in (m3)
  AnyVar PCSA = 1e4*Vol0/Lf0;///< PCSA (cm2) is calculated as muscle volume divided between muscle branches and divided by fiber length
};

AnyMuscleModel supraspinatus_2 =
{
  AnyFolder& MuscleParameters = .SubjectMusPar.supraspinatus;
  AnyIntVar MuscleElemNo = 2; ///< The number of this element of the muscle
  AnyIntVar MuscleElemAmount = MuscleParameters.MuscleElemAmount; ///< The total amount of elements for this muscle
  F0 = .SubjectMusPar.PCSAfactor*PCSA; ///< Maximum force output at optimum fiber length
  Lf0 = MuscleParameters.OptimalFiberlength / cos(pi/180*MuscleParameters.Pennationangle); //< Optimal fiber length corrected by pennation angle
  Vol0 = 1e-6*MuscleParameters.MuscleVolume/MuscleElemAmount; ///< Muscle volume in (m3)
  AnyVar PCSA = 1e4*Vol0/Lf0;///< PCSA (cm2) is calculated as muscle volume divided between muscle branches and divided by fiber length
};

AnyMuscleModel supraspinatus_3 =
{
  AnyFolder& MuscleParameters = .SubjectMusPar.supraspinatus;
  AnyIntVar MuscleElemNo = 3; ///< The number of this element of the muscle
  AnyIntVar MuscleElemAmount = MuscleParameters.MuscleElemAmount; ///< The total amount of elements for this muscle
  F0 = .SubjectMusPar.PCSAfactor*PCSA; ///< Maximum force output at optimum fiber length
  Lf0 = MuscleParameters.OptimalFiberlength / cos(pi/180*MuscleParameters.Pennationangle); //< Optimal fiber length corrected by pennation angle
  Vol0 = 1e-6*MuscleParameters.MuscleVolume/MuscleElemAmount; ///< Muscle volume in (m3)
  AnyVar PCSA = 1e4*Vol0/Lf0;///< PCSA (cm2) is calculated as muscle volume divided between muscle branches and divided by fiber length
};

AnyMuscleModel supraspinatus_4 =
{
  AnyFolder& MuscleParameters = .SubjectMusPar.supraspinatus;
  AnyIntVar MuscleElemNo = 4; ///< The number of this element of the muscle
  AnyIntVar MuscleElemAmount = MuscleParameters.MuscleElemAmount; ///< The total amount of elements for this muscle
  F0 = .SubjectMusPar.PCSAfactor*PCSA; ///< Maximum force output at optimum fiber length
  Lf0 = MuscleParameters.OptimalFiberlength / cos(pi/180*MuscleParameters.Pennationangle); //< Optimal fiber length corrected by pennation angle
  Vol0 = 1e-6*MuscleParameters.MuscleVolume/MuscleElemAmount; ///< Muscle volume in (m3)
  AnyVar PCSA = 1e4*Vol0/Lf0;///< PCSA (cm2) is calculated as muscle volume divided between muscle branches and divided by fiber length
};

AnyMuscleModel supraspinatus_5 =
{
  AnyFolder& MuscleParameters = .SubjectMusPar.supraspinatus;
  AnyIntVar MuscleElemNo = 5; ///< The number of this element of the muscle
  AnyIntVar MuscleElemAmount = MuscleParameters.MuscleElemAmount; ///< The total amount of elements for this muscle
  F0 = .SubjectMusPar.PCSAfactor*PCSA; ///< Maximum force output at optimum fiber length
  Lf0 = MuscleParameters.OptimalFiberlength / cos(pi/180*MuscleParameters.Pennationangle); //< Optimal fiber length corrected by pennation angle
  Vol0 = 1e-6*MuscleParameters.MuscleVolume/MuscleElemAmount; ///< Muscle volume in (m3)
  AnyVar PCSA = 1e4*Vol0/Lf0;///< PCSA (cm2) is calculated as muscle volume divided between muscle branches and divided by fiber length
};

AnyMuscleModel supraspinatus_6 =
{
  AnyFolder& MuscleParameters = .SubjectMusPar.supraspinatus;
  AnyIntVar MuscleElemNo = 6; ///< The number of this element of the muscle
  AnyIntVar MuscleElemAmount = MuscleParameters.MuscleElemAmount; ///< The total amount of elements for this muscle
  F0 = .SubjectMusPar.PCSAfactor*PCSA; ///< Maximum force output at optimum fiber length
  Lf0 = MuscleParameters.OptimalFiberlength / cos(pi/180*MuscleParameters.Pennationangle); //< Optimal fiber length corrected by pennation angle
  Vol0 = 1e-6*MuscleParameters.MuscleVolume/MuscleElemAmount; ///< Muscle volume in (m3)
  AnyVar PCSA = 1e4*Vol0/Lf0;///< PCSA (cm2) is calculated as muscle volume divided between muscle branches and divided by fiber length
};


//////////////////////////////////////
//     teres_major (6 elements)     //
//////////////////////////////////////
AnyMuscleModel teres_major_1 =
{
  AnyFolder& MuscleParameters = .SubjectMusPar.teres_major;
  AnyIntVar MuscleElemNo = 1; ///< The number of this element of the muscle
  AnyIntVar MuscleElemAmount = MuscleParameters.MuscleElemAmount; ///< The total amount of elements for this muscle
  F0 = .SubjectMusPar.PCSAfactor*PCSA; ///< Maximum force output at optimum fiber length
  Lf0 = MuscleParameters.OptimalFiberlength / cos(pi/180*MuscleParameters.Pennationangle); //< Optimal fiber length corrected by pennation angle
  Vol0 = 1e-6*MuscleParameters.MuscleVolume/MuscleElemAmount; ///< Muscle volume in (m3)
  AnyVar PCSA = 1e4*Vol0/Lf0;///< PCSA (cm2) is calculated as muscle volume divided between muscle branches and divided by fiber length
};

AnyMuscleModel teres_major_2 =
{
  AnyFolder& MuscleParameters = .SubjectMusPar.teres_major;
  AnyIntVar MuscleElemNo = 2; ///< The number of this element of the muscle
  AnyIntVar MuscleElemAmount = MuscleParameters.MuscleElemAmount; ///< The total amount of elements for this muscle
  F0 = .SubjectMusPar.PCSAfactor*PCSA; ///< Maximum force output at optimum fiber length
  Lf0 = MuscleParameters.OptimalFiberlength / cos(pi/180*MuscleParameters.Pennationangle); //< Optimal fiber length corrected by pennation angle
  Vol0 = 1e-6*MuscleParameters.MuscleVolume/MuscleElemAmount; ///< Muscle volume in (m3)
  AnyVar PCSA = 1e4*Vol0/Lf0;///< PCSA (cm2) is calculated as muscle volume divided between muscle branches and divided by fiber length
};

AnyMuscleModel teres_major_3 =
{
  AnyFolder& MuscleParameters = .SubjectMusPar.teres_major;
  AnyIntVar MuscleElemNo = 3; ///< The number of this element of the muscle
  AnyIntVar MuscleElemAmount = MuscleParameters.MuscleElemAmount; ///< The total amount of elements for this muscle
  F0 = .SubjectMusPar.PCSAfactor*PCSA; ///< Maximum force output at optimum fiber length
  Lf0 = MuscleParameters.OptimalFiberlength / cos(pi/180*MuscleParameters.Pennationangle); //< Optimal fiber length corrected by pennation angle
  Vol0 = 1e-6*MuscleParameters.MuscleVolume/MuscleElemAmount; ///< Muscle volume in (m3)
  AnyVar PCSA = 1e4*Vol0/Lf0;///< PCSA (cm2) is calculated as muscle volume divided between muscle branches and divided by fiber length
};

AnyMuscleModel teres_major_4 =
{
  AnyFolder& MuscleParameters = .SubjectMusPar.teres_major;
  AnyIntVar MuscleElemNo = 4; ///< The number of this element of the muscle
  AnyIntVar MuscleElemAmount = MuscleParameters.MuscleElemAmount; ///< The total amount of elements for this muscle
  F0 = .SubjectMusPar.PCSAfactor*PCSA; ///< Maximum force output at optimum fiber length
  Lf0 = MuscleParameters.OptimalFiberlength / cos(pi/180*MuscleParameters.Pennationangle); //< Optimal fiber length corrected by pennation angle
  Vol0 = 1e-6*MuscleParameters.MuscleVolume/MuscleElemAmount; ///< Muscle volume in (m3)
  AnyVar PCSA = 1e4*Vol0/Lf0;///< PCSA (cm2) is calculated as muscle volume divided between muscle branches and divided by fiber length
};

AnyMuscleModel teres_major_5 =
{
  AnyFolder& MuscleParameters = .SubjectMusPar.teres_major;
  AnyIntVar MuscleElemNo = 5; ///< The number of this element of the muscle
  AnyIntVar MuscleElemAmount = MuscleParameters.MuscleElemAmount; ///< The total amount of elements for this muscle
  F0 = .SubjectMusPar.PCSAfactor*PCSA; ///< Maximum force output at optimum fiber length
  Lf0 = MuscleParameters.OptimalFiberlength / cos(pi/180*MuscleParameters.Pennationangle); //< Optimal fiber length corrected by pennation angle
  Vol0 = 1e-6*MuscleParameters.MuscleVolume/MuscleElemAmount; ///< Muscle volume in (m3)
  AnyVar PCSA = 1e4*Vol0/Lf0;///< PCSA (cm2) is calculated as muscle volume divided between muscle branches and divided by fiber length
};

AnyMuscleModel teres_major_6 =
{
  AnyFolder& MuscleParameters = .SubjectMusPar.teres_major;
  AnyIntVar MuscleElemNo = 6; ///< The number of this element of the muscle
  AnyIntVar MuscleElemAmount = MuscleParameters.MuscleElemAmount; ///< The total amount of elements for this muscle
  F0 = .SubjectMusPar.PCSAfactor*PCSA; ///< Maximum force output at optimum fiber length
  Lf0 = MuscleParameters.OptimalFiberlength / cos(pi/180*MuscleParameters.Pennationangle); //< Optimal fiber length corrected by pennation angle
  Vol0 = 1e-6*MuscleParameters.MuscleVolume/MuscleElemAmount; ///< Muscle volume in (m3)
  AnyVar PCSA = 1e4*Vol0/Lf0;///< PCSA (cm2) is calculated as muscle volume divided between muscle branches and divided by fiber length
};


//////////////////////////////////////
//     teres_minor (6 elements)     //
//////////////////////////////////////
AnyMuscleModel teres_minor_1 =
{
  AnyFolder& MuscleParameters = .SubjectMusPar.teres_minor;
  AnyIntVar MuscleElemNo = 1; ///< The number of this element of the muscle
  AnyIntVar MuscleElemAmount = MuscleParameters.MuscleElemAmount; ///< The total amount of elements for this muscle
  F0 = .SubjectMusPar.PCSAfactor*PCSA; ///< Maximum force output at optimum fiber length
  Lf0 = MuscleParameters.OptimalFiberlength / cos(pi/180*MuscleParameters.Pennationangle); //< Optimal fiber length corrected by pennation angle
  Vol0 = 1e-6*MuscleParameters.MuscleVolume/MuscleElemAmount; ///< Muscle volume in (m3)
  AnyVar PCSA = 1e4*Vol0/Lf0;///< PCSA (cm2) is calculated as muscle volume divided between muscle branches and divided by fiber length
};

AnyMuscleModel teres_minor_2 =
{
  AnyFolder& MuscleParameters = .SubjectMusPar.teres_minor;
  AnyIntVar MuscleElemNo = 2; ///< The number of this element of the muscle
  AnyIntVar MuscleElemAmount = MuscleParameters.MuscleElemAmount; ///< The total amount of elements for this muscle
  F0 = .SubjectMusPar.PCSAfactor*PCSA; ///< Maximum force output at optimum fiber length
  Lf0 = MuscleParameters.OptimalFiberlength / cos(pi/180*MuscleParameters.Pennationangle); //< Optimal fiber length corrected by pennation angle
  Vol0 = 1e-6*MuscleParameters.MuscleVolume/MuscleElemAmount; ///< Muscle volume in (m3)
  AnyVar PCSA = 1e4*Vol0/Lf0;///< PCSA (cm2) is calculated as muscle volume divided between muscle branches and divided by fiber length
};

AnyMuscleModel teres_minor_3 =
{
  AnyFolder& MuscleParameters = .SubjectMusPar.teres_minor;
  AnyIntVar MuscleElemNo = 3; ///< The number of this element of the muscle
  AnyIntVar MuscleElemAmount = MuscleParameters.MuscleElemAmount; ///< The total amount of elements for this muscle
  F0 = .SubjectMusPar.PCSAfactor*PCSA; ///< Maximum force output at optimum fiber length
  Lf0 = MuscleParameters.OptimalFiberlength / cos(pi/180*MuscleParameters.Pennationangle); //< Optimal fiber length corrected by pennation angle
  Vol0 = 1e-6*MuscleParameters.MuscleVolume/MuscleElemAmount; ///< Muscle volume in (m3)
  AnyVar PCSA = 1e4*Vol0/Lf0;///< PCSA (cm2) is calculated as muscle volume divided between muscle branches and divided by fiber length
};

AnyMuscleModel teres_minor_4 =
{
  AnyFolder& MuscleParameters = .SubjectMusPar.teres_minor;
  AnyIntVar MuscleElemNo = 4; ///< The number of this element of the muscle
  AnyIntVar MuscleElemAmount = MuscleParameters.MuscleElemAmount; ///< The total amount of elements for this muscle
  F0 = .SubjectMusPar.PCSAfactor*PCSA; ///< Maximum force output at optimum fiber length
  Lf0 = MuscleParameters.OptimalFiberlength / cos(pi/180*MuscleParameters.Pennationangle); //< Optimal fiber length corrected by pennation angle
  Vol0 = 1e-6*MuscleParameters.MuscleVolume/MuscleElemAmount; ///< Muscle volume in (m3)
  AnyVar PCSA = 1e4*Vol0/Lf0;///< PCSA (cm2) is calculated as muscle volume divided between muscle branches and divided by fiber length
};

AnyMuscleModel teres_minor_5 =
{
  AnyFolder& MuscleParameters = .SubjectMusPar.teres_minor;
  AnyIntVar MuscleElemNo = 5; ///< The number of this element of the muscle
  AnyIntVar MuscleElemAmount = MuscleParameters.MuscleElemAmount; ///< The total amount of elements for this muscle
  F0 = .SubjectMusPar.PCSAfactor*PCSA; ///< Maximum force output at optimum fiber length
  Lf0 = MuscleParameters.OptimalFiberlength / cos(pi/180*MuscleParameters.Pennationangle); //< Optimal fiber length corrected by pennation angle
  Vol0 = 1e-6*MuscleParameters.MuscleVolume/MuscleElemAmount; ///< Muscle volume in (m3)
  AnyVar PCSA = 1e4*Vol0/Lf0;///< PCSA (cm2) is calculated as muscle volume divided between muscle branches and divided by fiber length
};

AnyMuscleModel teres_minor_6 =
{
  AnyFolder& MuscleParameters = .SubjectMusPar.teres_minor;
  AnyIntVar MuscleElemNo = 6; ///< The number of this element of the muscle
  AnyIntVar MuscleElemAmount = MuscleParameters.MuscleElemAmount; ///< The total amount of elements for this muscle
  F0 = .SubjectMusPar.PCSAfactor*PCSA; ///< Maximum force output at optimum fiber length
  Lf0 = MuscleParameters.OptimalFiberlength / cos(pi/180*MuscleParameters.Pennationangle); //< Optimal fiber length corrected by pennation angle
  Vol0 = 1e-6*MuscleParameters.MuscleVolume/MuscleElemAmount; ///< Muscle volume in (m3)
  AnyVar PCSA = 1e4*Vol0/Lf0;///< PCSA (cm2) is calculated as muscle volume divided between muscle branches and divided by fiber length
};


//////////////////////////////////////////////////
//     trapezius_scapular_part (6 elements)     //
//////////////////////////////////////////////////
AnyMuscleModel trapezius_scapular_part_1 =
{
  AnyFolder& MuscleParameters = .SubjectMusPar.trapezius_scapular_part;
  AnyIntVar MuscleElemNo = 1; ///< The number of this element of the muscle
  AnyIntVar MuscleElemAmount = MuscleParameters.MuscleElemAmount; ///< The total amount of elements for this muscle
  F0 = .SubjectMusPar.PCSAfactor*PCSA; ///< Maximum force output at optimum fiber length
  Lf0 = MuscleParameters.OptimalFiberlength / cos(pi/180*MuscleParameters.Pennationangle); //< Optimal fiber length corrected by pennation angle
  Vol0 = 1e-6*MuscleParameters.MuscleVolume/MuscleElemAmount; ///< Muscle volume in (m3)
  AnyVar PCSA = 1e4*Vol0/Lf0;///< PCSA (cm2) is calculated as muscle volume divided between muscle branches and divided by fiber length
};

AnyMuscleModel trapezius_scapular_part_2 =
{
  AnyFolder& MuscleParameters = .SubjectMusPar.trapezius_scapular_part;
  AnyIntVar MuscleElemNo = 2; ///< The number of this element of the muscle
  AnyIntVar MuscleElemAmount = MuscleParameters.MuscleElemAmount; ///< The total amount of elements for this muscle
  F0 = .SubjectMusPar.PCSAfactor*PCSA; ///< Maximum force output at optimum fiber length
  Lf0 = MuscleParameters.OptimalFiberlength / cos(pi/180*MuscleParameters.Pennationangle); //< Optimal fiber length corrected by pennation angle
  Vol0 = 1e-6*MuscleParameters.MuscleVolume/MuscleElemAmount; ///< Muscle volume in (m3)
  AnyVar PCSA = 1e4*Vol0/Lf0;///< PCSA (cm2) is calculated as muscle volume divided between muscle branches and divided by fiber length
};

AnyMuscleModel trapezius_scapular_part_3 =
{
  AnyFolder& MuscleParameters = .SubjectMusPar.trapezius_scapular_part;
  AnyIntVar MuscleElemNo = 3; ///< The number of this element of the muscle
  AnyIntVar MuscleElemAmount = MuscleParameters.MuscleElemAmount; ///< The total amount of elements for this muscle
  F0 = .SubjectMusPar.PCSAfactor*PCSA; ///< Maximum force output at optimum fiber length
  Lf0 = MuscleParameters.OptimalFiberlength / cos(pi/180*MuscleParameters.Pennationangle); //< Optimal fiber length corrected by pennation angle
  Vol0 = 1e-6*MuscleParameters.MuscleVolume/MuscleElemAmount; ///< Muscle volume in (m3)
  AnyVar PCSA = 1e4*Vol0/Lf0;///< PCSA (cm2) is calculated as muscle volume divided between muscle branches and divided by fiber length
};

AnyMuscleModel trapezius_scapular_part_4 =
{
  AnyFolder& MuscleParameters = .SubjectMusPar.trapezius_scapular_part;
  AnyIntVar MuscleElemNo = 4; ///< The number of this element of the muscle
  AnyIntVar MuscleElemAmount = MuscleParameters.MuscleElemAmount; ///< The total amount of elements for this muscle
  F0 = .SubjectMusPar.PCSAfactor*PCSA; ///< Maximum force output at optimum fiber length
  Lf0 = MuscleParameters.OptimalFiberlength / cos(pi/180*MuscleParameters.Pennationangle); //< Optimal fiber length corrected by pennation angle
  Vol0 = 1e-6*MuscleParameters.MuscleVolume/MuscleElemAmount; ///< Muscle volume in (m3)
  AnyVar PCSA = 1e4*Vol0/Lf0;///< PCSA (cm2) is calculated as muscle volume divided between muscle branches and divided by fiber length
};

AnyMuscleModel trapezius_scapular_part_5 =
{
  AnyFolder& MuscleParameters = .SubjectMusPar.trapezius_scapular_part;
  AnyIntVar MuscleElemNo = 5; ///< The number of this element of the muscle
  AnyIntVar MuscleElemAmount = MuscleParameters.MuscleElemAmount; ///< The total amount of elements for this muscle
  F0 = .SubjectMusPar.PCSAfactor*PCSA; ///< Maximum force output at optimum fiber length
  Lf0 = MuscleParameters.OptimalFiberlength / cos(pi/180*MuscleParameters.Pennationangle); //< Optimal fiber length corrected by pennation angle
  Vol0 = 1e-6*MuscleParameters.MuscleVolume/MuscleElemAmount; ///< Muscle volume in (m3)
  AnyVar PCSA = 1e4*Vol0/Lf0;///< PCSA (cm2) is calculated as muscle volume divided between muscle branches and divided by fiber length
};

AnyMuscleModel trapezius_scapular_part_6 =
{
  AnyFolder& MuscleParameters = .SubjectMusPar.trapezius_scapular_part;
  AnyIntVar MuscleElemNo = 6; ///< The number of this element of the muscle
  AnyIntVar MuscleElemAmount = MuscleParameters.MuscleElemAmount; ///< The total amount of elements for this muscle
  F0 = .SubjectMusPar.PCSAfactor*PCSA; ///< Maximum force output at optimum fiber length
  Lf0 = MuscleParameters.OptimalFiberlength / cos(pi/180*MuscleParameters.Pennationangle); //< Optimal fiber length corrected by pennation angle
  Vol0 = 1e-6*MuscleParameters.MuscleVolume/MuscleElemAmount; ///< Muscle volume in (m3)
  AnyVar PCSA = 1e4*Vol0/Lf0;///< PCSA (cm2) is calculated as muscle volume divided between muscle branches and divided by fiber length
};


////////////////////////////////////////////////////
//     trapezius_clavicular_part (6 elements)     //
////////////////////////////////////////////////////
AnyMuscleModel trapezius_clavicular_part_1 =
{
  AnyFolder& MuscleParameters = .SubjectMusPar.trapezius_clavicular_part;
  AnyIntVar MuscleElemNo = 1; ///< The number of this element of the muscle
  AnyIntVar MuscleElemAmount = MuscleParameters.MuscleElemAmount; ///< The total amount of elements for this muscle
  F0 = .SubjectMusPar.PCSAfactor*PCSA; ///< Maximum force output at optimum fiber length
  Lf0 = MuscleParameters.OptimalFiberlength / cos(pi/180*MuscleParameters.Pennationangle); //< Optimal fiber length corrected by pennation angle
  Vol0 = 1e-6*MuscleParameters.MuscleVolume/MuscleElemAmount; ///< Muscle volume in (m3)
  AnyVar PCSA = 1e4*Vol0/Lf0;///< PCSA (cm2) is calculated as muscle volume divided between muscle branches and divided by fiber length
};

AnyMuscleModel trapezius_clavicular_part_2 =
{
  AnyFolder& MuscleParameters = .SubjectMusPar.trapezius_clavicular_part;
  AnyIntVar MuscleElemNo = 2; ///< The number of this element of the muscle
  AnyIntVar MuscleElemAmount = MuscleParameters.MuscleElemAmount; ///< The total amount of elements for this muscle
  F0 = .SubjectMusPar.PCSAfactor*PCSA; ///< Maximum force output at optimum fiber length
  Lf0 = MuscleParameters.OptimalFiberlength / cos(pi/180*MuscleParameters.Pennationangle); //< Optimal fiber length corrected by pennation angle
  Vol0 = 1e-6*MuscleParameters.MuscleVolume/MuscleElemAmount; ///< Muscle volume in (m3)
  AnyVar PCSA = 1e4*Vol0/Lf0;///< PCSA (cm2) is calculated as muscle volume divided between muscle branches and divided by fiber length
};

AnyMuscleModel trapezius_clavicular_part_3 =
{
  AnyFolder& MuscleParameters = .SubjectMusPar.trapezius_clavicular_part;
  AnyIntVar MuscleElemNo = 3; ///< The number of this element of the muscle
  AnyIntVar MuscleElemAmount = MuscleParameters.MuscleElemAmount; ///< The total amount of elements for this muscle
  F0 = .SubjectMusPar.PCSAfactor*PCSA; ///< Maximum force output at optimum fiber length
  Lf0 = MuscleParameters.OptimalFiberlength / cos(pi/180*MuscleParameters.Pennationangle); //< Optimal fiber length corrected by pennation angle
  Vol0 = 1e-6*MuscleParameters.MuscleVolume/MuscleElemAmount; ///< Muscle volume in (m3)
  AnyVar PCSA = 1e4*Vol0/Lf0;///< PCSA (cm2) is calculated as muscle volume divided between muscle branches and divided by fiber length
};

AnyMuscleModel trapezius_clavicular_part_4 =
{
  AnyFolder& MuscleParameters = .SubjectMusPar.trapezius_clavicular_part;
  AnyIntVar MuscleElemNo = 4; ///< The number of this element of the muscle
  AnyIntVar MuscleElemAmount = MuscleParameters.MuscleElemAmount; ///< The total amount of elements for this muscle
  F0 = .SubjectMusPar.PCSAfactor*PCSA; ///< Maximum force output at optimum fiber length
  Lf0 = MuscleParameters.OptimalFiberlength / cos(pi/180*MuscleParameters.Pennationangle); //< Optimal fiber length corrected by pennation angle
  Vol0 = 1e-6*MuscleParameters.MuscleVolume/MuscleElemAmount; ///< Muscle volume in (m3)
  AnyVar PCSA = 1e4*Vol0/Lf0;///< PCSA (cm2) is calculated as muscle volume divided between muscle branches and divided by fiber length
};

AnyMuscleModel trapezius_clavicular_part_5 =
{
  AnyFolder& MuscleParameters = .SubjectMusPar.trapezius_clavicular_part;
  AnyIntVar MuscleElemNo = 5; ///< The number of this element of the muscle
  AnyIntVar MuscleElemAmount = MuscleParameters.MuscleElemAmount; ///< The total amount of elements for this muscle
  F0 = .SubjectMusPar.PCSAfactor*PCSA; ///< Maximum force output at optimum fiber length
  Lf0 = MuscleParameters.OptimalFiberlength / cos(pi/180*MuscleParameters.Pennationangle); //< Optimal fiber length corrected by pennation angle
  Vol0 = 1e-6*MuscleParameters.MuscleVolume/MuscleElemAmount; ///< Muscle volume in (m3)
  AnyVar PCSA = 1e4*Vol0/Lf0;///< PCSA (cm2) is calculated as muscle volume divided between muscle branches and divided by fiber length
};

AnyMuscleModel trapezius_clavicular_part_6 =
{
  AnyFolder& MuscleParameters = .SubjectMusPar.trapezius_clavicular_part;
  AnyIntVar MuscleElemNo = 6; ///< The number of this element of the muscle
  AnyIntVar MuscleElemAmount = MuscleParameters.MuscleElemAmount; ///< The total amount of elements for this muscle
  F0 = .SubjectMusPar.PCSAfactor*PCSA; ///< Maximum force output at optimum fiber length
  Lf0 = MuscleParameters.OptimalFiberlength / cos(pi/180*MuscleParameters.Pennationangle); //< Optimal fiber length corrected by pennation angle
  Vol0 = 1e-6*MuscleParameters.MuscleVolume/MuscleElemAmount; ///< Muscle volume in (m3)
  AnyVar PCSA = 1e4*Vol0/Lf0;///< PCSA (cm2) is calculated as muscle volume divided between muscle branches and divided by fiber length
};


/////////////////////////////////////
//     Triceps_LH (2 elements)     //
/////////////////////////////////////
AnyMuscleModel Triceps_LH_1 =
{
  AnyFolder& MuscleParameters = .SubjectMusPar.Triceps_LH;
  AnyIntVar MuscleElemNo = 1; ///< The number of this element of the muscle
  AnyIntVar MuscleElemAmount = MuscleParameters.MuscleElemAmount; ///< The total amount of elements for this muscle
  F0 = .SubjectMusPar.PCSAfactor*PCSA; ///< Maximum force output at optimum fiber length
  Lf0 = MuscleParameters.OptimalFiberlength / cos(pi/180*MuscleParameters.Pennationangle); //< Optimal fiber length corrected by pennation angle
  Vol0 = 1e-6*MuscleParameters.MuscleVolume/MuscleElemAmount; ///< Muscle volume in (m3)
  AnyVar PCSA = 1e4*Vol0/Lf0;///< PCSA (cm2) is calculated as muscle volume divided between muscle branches and divided by fiber length
};

AnyMuscleModel Triceps_LH_2 =
{
  AnyFolder& MuscleParameters = .SubjectMusPar.Triceps_LH;
  AnyIntVar MuscleElemNo = 2; ///< The number of this element of the muscle
  AnyIntVar MuscleElemAmount = MuscleParameters.MuscleElemAmount; ///< The total amount of elements for this muscle
  F0 = .SubjectMusPar.PCSAfactor*PCSA; ///< Maximum force output at optimum fiber length
  Lf0 = MuscleParameters.OptimalFiberlength / cos(pi/180*MuscleParameters.Pennationangle); //< Optimal fiber length corrected by pennation angle
  Vol0 = 1e-6*MuscleParameters.MuscleVolume/MuscleElemAmount; ///< Muscle volume in (m3)
  AnyVar PCSA = 1e4*Vol0/Lf0;///< PCSA (cm2) is calculated as muscle volume divided between muscle branches and divided by fiber length
};


/////////////////////////////////////
//     Brachialis (2 elements)     //
/////////////////////////////////////
AnyMuscleModel Brachialis_1 =
{
  AnyFolder& MuscleParameters = .SubjectMusPar.Brachialis;
  AnyIntVar MuscleElemNo = 1; ///< The number of this element of the muscle
  AnyIntVar MuscleElemAmount = MuscleParameters.MuscleElemAmount; ///< The total amount of elements for this muscle
  F0 = .SubjectMusPar.PCSAfactor*PCSA; ///< Maximum force output at optimum fiber length
  Lf0 = MuscleParameters.OptimalFiberlength / cos(pi/180*MuscleParameters.Pennationangle); //< Optimal fiber length corrected by pennation angle
  Vol0 = 1e-6*MuscleParameters.MuscleVolume/MuscleElemAmount; ///< Muscle volume in (m3)
  AnyVar PCSA = 1e4*Vol0/Lf0;///< PCSA (cm2) is calculated as muscle volume divided between muscle branches and divided by fiber length
};

AnyMuscleModel Brachialis_2 =
{
  AnyFolder& MuscleParameters = .SubjectMusPar.Brachialis;
  AnyIntVar MuscleElemNo = 2; ///< The number of this element of the muscle
  AnyIntVar MuscleElemAmount = MuscleParameters.MuscleElemAmount; ///< The total amount of elements for this muscle
  F0 = .SubjectMusPar.PCSAfactor*PCSA; ///< Maximum force output at optimum fiber length
  Lf0 = MuscleParameters.OptimalFiberlength / cos(pi/180*MuscleParameters.Pennationangle); //< Optimal fiber length corrected by pennation angle
  Vol0 = 1e-6*MuscleParameters.MuscleVolume/MuscleElemAmount; ///< Muscle volume in (m3)
  AnyVar PCSA = 1e4*Vol0/Lf0;///< PCSA (cm2) is calculated as muscle volume divided between muscle branches and divided by fiber length
};


/////////////////////////////////////
//     Triceps_ME (2 elements)     //
/////////////////////////////////////
AnyMuscleModel Triceps_ME_1 =
{
  AnyFolder& MuscleParameters = .SubjectMusPar.Triceps_ME;
  AnyIntVar MuscleElemNo = 1; ///< The number of this element of the muscle
  AnyIntVar MuscleElemAmount = MuscleParameters.MuscleElemAmount; ///< The total amount of elements for this muscle
  F0 = .SubjectMusPar.PCSAfactor*PCSA; ///< Maximum force output at optimum fiber length
  Lf0 = MuscleParameters.OptimalFiberlength / cos(pi/180*MuscleParameters.Pennationangle); //< Optimal fiber length corrected by pennation angle
  Vol0 = 1e-6*MuscleParameters.MuscleVolume/MuscleElemAmount; ///< Muscle volume in (m3)
  AnyVar PCSA = 1e4*Vol0/Lf0;///< PCSA (cm2) is calculated as muscle volume divided between muscle branches and divided by fiber length
};

AnyMuscleModel Triceps_ME_2 =
{
  AnyFolder& MuscleParameters = .SubjectMusPar.Triceps_ME;
  AnyIntVar MuscleElemNo = 2; ///< The number of this element of the muscle
  AnyIntVar MuscleElemAmount = MuscleParameters.MuscleElemAmount; ///< The total amount of elements for this muscle
  F0 = .SubjectMusPar.PCSAfactor*PCSA; ///< Maximum force output at optimum fiber length
  Lf0 = MuscleParameters.OptimalFiberlength / cos(pi/180*MuscleParameters.Pennationangle); //< Optimal fiber length corrected by pennation angle
  Vol0 = 1e-6*MuscleParameters.MuscleVolume/MuscleElemAmount; ///< Muscle volume in (m3)
  AnyVar PCSA = 1e4*Vol0/Lf0;///< PCSA (cm2) is calculated as muscle volume divided between muscle branches and divided by fiber length
};


/////////////////////////////////////
//     Triceps_LA (2 elements)     //
/////////////////////////////////////
AnyMuscleModel Triceps_LA_1 =
{
  AnyFolder& MuscleParameters = .SubjectMusPar.Triceps_LA;
  AnyIntVar MuscleElemNo = 1; ///< The number of this element of the muscle
  AnyIntVar MuscleElemAmount = MuscleParameters.MuscleElemAmount; ///< The total amount of elements for this muscle
  F0 = .SubjectMusPar.PCSAfactor*PCSA; ///< Maximum force output at optimum fiber length
  Lf0 = MuscleParameters.OptimalFiberlength / cos(pi/180*MuscleParameters.Pennationangle); //< Optimal fiber length corrected by pennation angle
  Vol0 = 1e-6*MuscleParameters.MuscleVolume/MuscleElemAmount; ///< Muscle volume in (m3)
  AnyVar PCSA = 1e4*Vol0/Lf0;///< PCSA (cm2) is calculated as muscle volume divided between muscle branches and divided by fiber length
};

AnyMuscleModel Triceps_LA_2 =
{
  AnyFolder& MuscleParameters = .SubjectMusPar.Triceps_LA;
  AnyIntVar MuscleElemNo = 2; ///< The number of this element of the muscle
  AnyIntVar MuscleElemAmount = MuscleParameters.MuscleElemAmount; ///< The total amount of elements for this muscle
  F0 = .SubjectMusPar.PCSAfactor*PCSA; ///< Maximum force output at optimum fiber length
  Lf0 = MuscleParameters.OptimalFiberlength / cos(pi/180*MuscleParameters.Pennationangle); //< Optimal fiber length corrected by pennation angle
  Vol0 = 1e-6*MuscleParameters.MuscleVolume/MuscleElemAmount; ///< Muscle volume in (m3)
  AnyVar PCSA = 1e4*Vol0/Lf0;///< PCSA (cm2) is calculated as muscle volume divided between muscle branches and divided by fiber length
};


////////////////////////////////////
//     Brach_rad (2 elements)     //
////////////////////////////////////
AnyMuscleModel Brach_rad_1 =
{
  AnyFolder& MuscleParameters = .SubjectMusPar.Brach_rad;
  AnyIntVar MuscleElemNo = 1; ///< The number of this element of the muscle
  AnyIntVar MuscleElemAmount = MuscleParameters.MuscleElemAmount; ///< The total amount of elements for this muscle
  F0 = .SubjectMusPar.PCSAfactor*PCSA; ///< Maximum force output at optimum fiber length
  Lf0 = MuscleParameters.OptimalFiberlength / cos(pi/180*MuscleParameters.Pennationangle); //< Optimal fiber length corrected by pennation angle
  Vol0 = 1e-6*MuscleParameters.MuscleVolume/MuscleElemAmount; ///< Muscle volume in (m3)
  AnyVar PCSA = 1e4*Vol0/Lf0;///< PCSA (cm2) is calculated as muscle volume divided between muscle branches and divided by fiber length
};

AnyMuscleModel Brach_rad_2 =
{
  AnyFolder& MuscleParameters = .SubjectMusPar.Brach_rad;
  AnyIntVar MuscleElemNo = 2; ///< The number of this element of the muscle
  AnyIntVar MuscleElemAmount = MuscleParameters.MuscleElemAmount; ///< The total amount of elements for this muscle
  F0 = .SubjectMusPar.PCSAfactor*PCSA; ///< Maximum force output at optimum fiber length
  Lf0 = MuscleParameters.OptimalFiberlength / cos(pi/180*MuscleParameters.Pennationangle); //< Optimal fiber length corrected by pennation angle
  Vol0 = 1e-6*MuscleParameters.MuscleVolume/MuscleElemAmount; ///< Muscle volume in (m3)
  AnyVar PCSA = 1e4*Vol0/Lf0;///< PCSA (cm2) is calculated as muscle volume divided between muscle branches and divided by fiber length
};


///////////////////////////////////
//     Anconeus (2 elements)     //
///////////////////////////////////
AnyMuscleModel Anconeus_1 =
{
  AnyFolder& MuscleParameters = .SubjectMusPar.Anconeus;
  AnyIntVar MuscleElemNo = 1; ///< The number of this element of the muscle
  AnyIntVar MuscleElemAmount = MuscleParameters.MuscleElemAmount; ///< The total amount of elements for this muscle
  F0 = .SubjectMusPar.PCSAfactor*PCSA; ///< Maximum force output at optimum fiber length
  Lf0 = MuscleParameters.OptimalFiberlength / cos(pi/180*MuscleParameters.Pennationangle); //< Optimal fiber length corrected by pennation angle
  Vol0 = 1e-6*MuscleParameters.MuscleVolume/MuscleElemAmount; ///< Muscle volume in (m3)
  AnyVar PCSA = 1e4*Vol0/Lf0;///< PCSA (cm2) is calculated as muscle volume divided between muscle branches and divided by fiber length
};

AnyMuscleModel Anconeus_2 =
{
  AnyFolder& MuscleParameters = .SubjectMusPar.Anconeus;
  AnyIntVar MuscleElemNo = 2; ///< The number of this element of the muscle
  AnyIntVar MuscleElemAmount = MuscleParameters.MuscleElemAmount; ///< The total amount of elements for this muscle
  F0 = .SubjectMusPar.PCSAfactor*PCSA; ///< Maximum force output at optimum fiber length
  Lf0 = MuscleParameters.OptimalFiberlength / cos(pi/180*MuscleParameters.Pennationangle); //< Optimal fiber length corrected by pennation angle
  Vol0 = 1e-6*MuscleParameters.MuscleVolume/MuscleElemAmount; ///< Muscle volume in (m3)
  AnyVar PCSA = 1e4*Vol0/Lf0;///< PCSA (cm2) is calculated as muscle volume divided between muscle branches and divided by fiber length
};


///////////////////////////////////////////////////////
//     Pronator_teres_caput_humeral (2 elements)     //
///////////////////////////////////////////////////////
AnyMuscleModel Pronator_teres_caput_humeral_1 =
{
  AnyFolder& MuscleParameters = .SubjectMusPar.Pronator_teres_caput_humeral;
  AnyIntVar MuscleElemNo = 1; ///< The number of this element of the muscle
  AnyIntVar MuscleElemAmount = MuscleParameters.MuscleElemAmount; ///< The total amount of elements for this muscle
  F0 = .SubjectMusPar.PCSAfactor*PCSA; ///< Maximum force output at optimum fiber length
  Lf0 = MuscleParameters.OptimalFiberlength / cos(pi/180*MuscleParameters.Pennationangle); //< Optimal fiber length corrected by pennation angle
  Vol0 = 1e-6*MuscleParameters.MuscleVolume/MuscleElemAmount; ///< Muscle volume in (m3)
  AnyVar PCSA = 1e4*Vol0/Lf0;///< PCSA (cm2) is calculated as muscle volume divided between muscle branches and divided by fiber length
};
AnyMuscleModel Pronator_teres_caput_humeral_2 =
{
  AnyFolder& MuscleParameters = .SubjectMusPar.Pronator_teres_caput_humeral;
  AnyIntVar MuscleElemNo = 2; ///< The number of this element of the muscle
  AnyIntVar MuscleElemAmount = MuscleParameters.MuscleElemAmount; ///< The total amount of elements for this muscle
  F0 = .SubjectMusPar.PCSAfactor*PCSA; ///< Maximum force output at optimum fiber length
  Lf0 = MuscleParameters.OptimalFiberlength / cos(pi/180*MuscleParameters.Pennationangle); //< Optimal fiber length corrected by pennation angle
  Vol0 = 1e-6*MuscleParameters.MuscleVolume/MuscleElemAmount; ///< Muscle volume in (m3)
  AnyVar PCSA = 1e4*Vol0/Lf0;///< PCSA (cm2) is calculated as muscle volume divided between muscle branches and divided by fiber length
};


//////////////////////////////////////////////////////
//     Pronator_teres_caput_ulnare (1 element )     //
//////////////////////////////////////////////////////
AnyMuscleModel Pronator_teres_caput_ulnare =
{
  AnyFolder& MuscleParameters = .SubjectMusPar.Pronator_teres_caput_ulnare;
  AnyIntVar MuscleElemNo = 1; ///< The number of this element of the muscle
  AnyIntVar MuscleElemAmount = MuscleParameters.MuscleElemAmount; ///< The total amount of elements for this muscle
  F0 = .SubjectMusPar.PCSAfactor*PCSA; ///< Maximum force output at optimum fiber length
  Lf0 = MuscleParameters.OptimalFiberlength / cos(pi/180*MuscleParameters.Pennationangle); //< Optimal fiber length corrected by pennation angle
  Vol0 = 1e-6*MuscleParameters.MuscleVolume/MuscleElemAmount; ///< Muscle volume in (m3)
  AnyVar PCSA = 1e4*Vol0/Lf0;///< PCSA (cm2) is calculated as muscle volume divided between muscle branches and divided by fiber length
};


/////////////////////////////////////////////////
//     Supinator_humerus_part (2 elements)     //
/////////////////////////////////////////////////
AnyMuscleModel Supinator_humerus_part_1 =
{
  AnyFolder& MuscleParameters = .SubjectMusPar.Supinator_humerus_part;
  AnyIntVar MuscleElemNo = 1; ///< The number of this element of the muscle
  AnyIntVar MuscleElemAmount = MuscleParameters.MuscleElemAmount; ///< The total amount of elements for this muscle
  F0 = .SubjectMusPar.PCSAfactor*PCSA; ///< Maximum force output at optimum fiber length
  Lf0 = MuscleParameters.OptimalFiberlength / cos(pi/180*MuscleParameters.Pennationangle); //< Optimal fiber length corrected by pennation angle
  Vol0 = 1e-6*MuscleParameters.MuscleVolume/MuscleElemAmount; ///< Muscle volume in (m3)
  AnyVar PCSA = 1e4*Vol0/Lf0;///< PCSA (cm2) is calculated as muscle volume divided between muscle branches and divided by fiber length
};

AnyMuscleModel Supinator_humerus_part_2 =
{
  AnyFolder& MuscleParameters = .SubjectMusPar.Supinator_humerus_part;
  AnyIntVar MuscleElemNo = 2; ///< The number of this element of the muscle
  AnyIntVar MuscleElemAmount = MuscleParameters.MuscleElemAmount; ///< The total amount of elements for this muscle
  F0 = .SubjectMusPar.PCSAfactor*PCSA; ///< Maximum force output at optimum fiber length
  Lf0 = MuscleParameters.OptimalFiberlength / cos(pi/180*MuscleParameters.Pennationangle); //< Optimal fiber length corrected by pennation angle
  Vol0 = 1e-6*MuscleParameters.MuscleVolume/MuscleElemAmount; ///< Muscle volume in (m3)
  AnyVar PCSA = 1e4*Vol0/Lf0;///< PCSA (cm2) is calculated as muscle volume divided between muscle branches and divided by fiber length
};


//////////////////////////////////////////////
//     Supinator_ulna_part (2 elements)     //
//////////////////////////////////////////////
AnyMuscleModel Supinator_ulna_part_1 =
{
  AnyFolder& MuscleParameters = .SubjectMusPar.Supinator_ulna_part;
  AnyIntVar MuscleElemNo = 1; ///< The number of this element of the muscle
  AnyIntVar MuscleElemAmount = MuscleParameters.MuscleElemAmount; ///< The total amount of elements for this muscle
  F0 = .SubjectMusPar.PCSAfactor*PCSA; ///< Maximum force output at optimum fiber length
  Lf0 = MuscleParameters.OptimalFiberlength / cos(pi/180*MuscleParameters.Pennationangle); //< Optimal fiber length corrected by pennation angle
  Vol0 = 1e-6*MuscleParameters.MuscleVolume/MuscleElemAmount; ///< Muscle volume in (m3)
  AnyVar PCSA = 1e4*Vol0/Lf0;///< PCSA (cm2) is calculated as muscle volume divided between muscle branches and divided by fiber length
};

AnyMuscleModel Supinator_ulna_part_2 =
{
  AnyFolder& MuscleParameters = .SubjectMusPar.Supinator_ulna_part;
  AnyIntVar MuscleElemNo = 2; ///< The number of this element of the muscle
  AnyIntVar MuscleElemAmount = MuscleParameters.MuscleElemAmount; ///< The total amount of elements for this muscle
  F0 = .SubjectMusPar.PCSAfactor*PCSA; ///< Maximum force output at optimum fiber length
  Lf0 = MuscleParameters.OptimalFiberlength / cos(pi/180*MuscleParameters.Pennationangle); //< Optimal fiber length corrected by pennation angle
  Vol0 = 1e-6*MuscleParameters.MuscleVolume/MuscleElemAmount; ///< Muscle volume in (m3)
  AnyVar PCSA = 1e4*Vol0/Lf0;///< PCSA (cm2) is calculated as muscle volume divided between muscle branches and divided by fiber length
};


/////////////////////////////////////
//     Pron_quadr (2 elements)     //
/////////////////////////////////////
AnyMuscleModel Pron_quadr_1 =
{
  AnyFolder& MuscleParameters = .SubjectMusPar.Pron_quadr;
  AnyIntVar MuscleElemNo = 1; ///< The number of this element of the muscle
  AnyIntVar MuscleElemAmount = MuscleParameters.MuscleElemAmount; ///< The total amount of elements for this muscle
  F0 = .SubjectMusPar.PCSAfactor*PCSA; ///< Maximum force output at optimum fiber length
  Lf0 = MuscleParameters.OptimalFiberlength / cos(pi/180*MuscleParameters.Pennationangle); //< Optimal fiber length corrected by pennation angle
  Vol0 = 1e-6*MuscleParameters.MuscleVolume/MuscleElemAmount; ///< Muscle volume in (m3)
  AnyVar PCSA = 1e4*Vol0/Lf0;///< PCSA (cm2) is calculated as muscle volume divided between muscle branches and divided by fiber length
};

AnyMuscleModel Pron_quadr_2 =
{
  AnyFolder& MuscleParameters = .SubjectMusPar.Pron_quadr;
  AnyIntVar MuscleElemNo = 2; ///< The number of this element of the muscle
  AnyIntVar MuscleElemAmount = MuscleParameters.MuscleElemAmount; ///< The total amount of elements for this muscle
  F0 = .SubjectMusPar.PCSAfactor*PCSA; ///< Maximum force output at optimum fiber length
  Lf0 = MuscleParameters.OptimalFiberlength / cos(pi/180*MuscleParameters.Pennationangle); //< Optimal fiber length corrected by pennation angle
  Vol0 = 1e-6*MuscleParameters.MuscleVolume/MuscleElemAmount; ///< Muscle volume in (m3)
  AnyVar PCSA = 1e4*Vol0/Lf0;///< PCSA (cm2) is calculated as muscle volume divided between muscle branches and divided by fiber length
};


///////////////////////////////////////////////////
//     Extensor_Pollicis_Longus (1 element )     //
///////////////////////////////////////////////////
AnyMuscleModel Extensor_Pollicis_Longus =
{
  AnyFolder& MuscleParameters = .SubjectMusPar.Extensor_Pollicis_Longus;
  AnyIntVar MuscleElemNo = 1; ///< The number of this element of the muscle
  AnyIntVar MuscleElemAmount = MuscleParameters.MuscleElemAmount; ///< The total amount of elements for this muscle
  F0 = .SubjectMusPar.PCSAfactor*PCSA; ///< Maximum force output at optimum fiber length
  Lf0 = MuscleParameters.OptimalFiberlength / cos(pi/180*MuscleParameters.Pennationangle); //< Optimal fiber length corrected by pennation angle
  Vol0 = 1e-6*MuscleParameters.MuscleVolume/MuscleElemAmount; ///< Muscle volume in (m3)
  AnyVar PCSA = 1e4*Vol0/Lf0;///< PCSA (cm2) is calculated as muscle volume divided between muscle branches and divided by fiber length
};


///////////////////////////////////////////////////
//     Extensor_Pollicis_Brevis (1 element )     //
///////////////////////////////////////////////////
AnyMuscleModel Extensor_Pollicis_Brevis =
{
  AnyFolder& MuscleParameters = .SubjectMusPar.Extensor_Pollicis_Brevis;
  AnyIntVar MuscleElemNo = 1; ///< The number of this element of the muscle
  AnyIntVar MuscleElemAmount = MuscleParameters.MuscleElemAmount; ///< The total amount of elements for this muscle
  F0 = .SubjectMusPar.PCSAfactor*PCSA; ///< Maximum force output at optimum fiber length
  Lf0 = MuscleParameters.OptimalFiberlength / cos(pi/180*MuscleParameters.Pennationangle); //< Optimal fiber length corrected by pennation angle
  Vol0 = 1e-6*MuscleParameters.MuscleVolume/MuscleElemAmount; ///< Muscle volume in (m3)
  AnyVar PCSA = 1e4*Vol0/Lf0;///< PCSA (cm2) is calculated as muscle volume divided between muscle branches and divided by fiber length
};


///////////////////////////////////////////////////
//     Abductor_Pollicis_Longus (1 element )     //
///////////////////////////////////////////////////
AnyMuscleModel Abductor_Pollicis_Longus =
{
  AnyFolder& MuscleParameters = .SubjectMusPar.Abductor_Pollicis_Longus;
  AnyIntVar MuscleElemNo = 1; ///< The number of this element of the muscle
  AnyIntVar MuscleElemAmount = MuscleParameters.MuscleElemAmount; ///< The total amount of elements for this muscle
  F0 = .SubjectMusPar.PCSAfactor*PCSA; ///< Maximum force output at optimum fiber length
  Lf0 = MuscleParameters.OptimalFiberlength / cos(pi/180*MuscleParameters.Pennationangle); //< Optimal fiber length corrected by pennation angle
  Vol0 = 1e-6*MuscleParameters.MuscleVolume/MuscleElemAmount; ///< Muscle volume in (m3)
  AnyVar PCSA = 1e4*Vol0/Lf0;///< PCSA (cm2) is calculated as muscle volume divided between muscle branches and divided by fiber length
};


///////////////////////////////////////////
//     Extensor_Indicis (1 element )     //
///////////////////////////////////////////
AnyMuscleModel Extensor_Indicis =
{
  AnyFolder& MuscleParameters = .SubjectMusPar.Extensor_Indicis;
  AnyIntVar MuscleElemNo = 1; ///< The number of this element of the muscle
  AnyIntVar MuscleElemAmount = MuscleParameters.MuscleElemAmount; ///< The total amount of elements for this muscle
  F0 = .SubjectMusPar.PCSAfactor*PCSA; ///< Maximum force output at optimum fiber length
  Lf0 = MuscleParameters.OptimalFiberlength / cos(pi/180*MuscleParameters.Pennationangle); //< Optimal fiber length corrected by pennation angle
  Vol0 = 1e-6*MuscleParameters.MuscleVolume/MuscleElemAmount; ///< Muscle volume in (m3)
  AnyVar PCSA = 1e4*Vol0/Lf0;///< PCSA (cm2) is calculated as muscle volume divided between muscle branches and divided by fiber length
};


/////////////////////////////////////////////////
//     Extensor_Carpi_Ulnaris (1 element )     //
/////////////////////////////////////////////////
AnyMuscleModel Extensor_Carpi_Ulnaris =
{
  AnyFolder& MuscleParameters = .SubjectMusPar.Extensor_Carpi_Ulnaris;
  AnyIntVar MuscleElemNo = 1; ///< The number of this element of the muscle
  AnyIntVar MuscleElemAmount = MuscleParameters.MuscleElemAmount; ///< The total amount of elements for this muscle
  F0 = .SubjectMusPar.PCSAfactor*PCSA; ///< Maximum force output at optimum fiber length
  Lf0 = MuscleParameters.OptimalFiberlength / cos(pi/180*MuscleParameters.Pennationangle); //< Optimal fiber length corrected by pennation angle
  Vol0 = 1e-6*MuscleParameters.MuscleVolume/MuscleElemAmount; ///< Muscle volume in (m3)
  AnyVar PCSA = 1e4*Vol0/Lf0;///< PCSA (cm2) is calculated as muscle volume divided between muscle branches and divided by fiber length
};


/////////////////////////////////////////////////////////
//     Extensor_Carpi_Radialis_Longus (1 element )     //
/////////////////////////////////////////////////////////
AnyMuscleModel Extensor_Carpi_Radialis_Longus =
{
  AnyFolder& MuscleParameters = .SubjectMusPar.Extensor_Carpi_Radialis_Longus;
  AnyIntVar MuscleElemNo = 1; ///< The number of this element of the muscle
  AnyIntVar MuscleElemAmount = MuscleParameters.MuscleElemAmount; ///< The total amount of elements for this muscle
  F0 = .SubjectMusPar.PCSAfactor*PCSA; ///< Maximum force output at optimum fiber length
  Lf0 = MuscleParameters.OptimalFiberlength / cos(pi/180*MuscleParameters.Pennationangle); //< Optimal fiber length corrected by pennation angle
  Vol0 = 1e-6*MuscleParameters.MuscleVolume/MuscleElemAmount; ///< Muscle volume in (m3)
  AnyVar PCSA = 1e4*Vol0/Lf0;///< PCSA (cm2) is calculated as muscle volume divided between muscle branches and divided by fiber length
};


/////////////////////////////////////////////////////////
//     Extensor_Carpi_Radialis_Brevis (1 element )     //
/////////////////////////////////////////////////////////
AnyMuscleModel Extensor_Carpi_Radialis_Brevis =
{
  AnyFolder& MuscleParameters = .SubjectMusPar.Extensor_Carpi_Radialis_Brevis;
  AnyIntVar MuscleElemNo = 1; ///< The number of this element of the muscle
  AnyIntVar MuscleElemAmount = MuscleParameters.MuscleElemAmount; ///< The total amount of elements for this muscle
  F0 = .SubjectMusPar.PCSAfactor*PCSA; ///< Maximum force output at optimum fiber length
  Lf0 = MuscleParameters.OptimalFiberlength / cos(pi/180*MuscleParameters.Pennationangle); //< Optimal fiber length corrected by pennation angle
  Vol0 = 1e-6*MuscleParameters.MuscleVolume/MuscleElemAmount; ///< Muscle volume in (m3)
  AnyVar PCSA = 1e4*Vol0/Lf0;///< PCSA (cm2) is calculated as muscle volume divided between muscle branches and divided by fiber length
};


////////////////////////////////////////////////
//     Flexor_Carpi_Radialis (1 element )     //
////////////////////////////////////////////////
AnyMuscleModel Flexor_Carpi_Radialis =
{
  AnyFolder& MuscleParameters = .SubjectMusPar.Flexor_Carpi_Radialis;
  AnyIntVar MuscleElemNo = 1; ///< The number of this element of the muscle
  AnyIntVar MuscleElemAmount = MuscleParameters.MuscleElemAmount; ///< The total amount of elements for this muscle
  F0 = .SubjectMusPar.PCSAfactor*PCSA; ///< Maximum force output at optimum fiber length
  Lf0 = MuscleParameters.OptimalFiberlength / cos(pi/180*MuscleParameters.Pennationangle); //< Optimal fiber length corrected by pennation angle
  Vol0 = 1e-6*MuscleParameters.MuscleVolume/MuscleElemAmount; ///< Muscle volume in (m3)
  AnyVar PCSA = 1e4*Vol0/Lf0;///< PCSA (cm2) is calculated as muscle volume divided between muscle branches and divided by fiber length
};


///////////////////////////////////////////////
//     Flexor_Carpi_Ulnaris (1 element )     //
///////////////////////////////////////////////
AnyMuscleModel Flexor_Carpi_Ulnaris =
{
  AnyFolder& MuscleParameters = .SubjectMusPar.Flexor_Carpi_Ulnaris;
  AnyIntVar MuscleElemNo = 1; ///< The number of this element of the muscle
  AnyIntVar MuscleElemAmount = MuscleParameters.MuscleElemAmount; ///< The total amount of elements for this muscle
  F0 = .SubjectMusPar.PCSAfactor*PCSA; ///< Maximum force output at optimum fiber length
  Lf0 = MuscleParameters.OptimalFiberlength / cos(pi/180*MuscleParameters.Pennationangle); //< Optimal fiber length corrected by pennation angle
  Vol0 = 1e-6*MuscleParameters.MuscleVolume/MuscleElemAmount; ///< Muscle volume in (m3)
  AnyVar PCSA = 1e4*Vol0/Lf0;///< PCSA (cm2) is calculated as muscle volume divided between muscle branches and divided by fiber length
};


//////////////////////////////////////////
//     Palmaris_Longus (1 element )     //
//////////////////////////////////////////
AnyMuscleModel Palmaris_Longus =
{
  AnyFolder& MuscleParameters = .SubjectMusPar.Palmaris_Longus;
  AnyIntVar MuscleElemNo = 1; ///< The number of this element of the muscle
  AnyIntVar MuscleElemAmount = MuscleParameters.MuscleElemAmount; ///< The total amount of elements for this muscle
  F0 = .SubjectMusPar.PCSAfactor*PCSA; ///< Maximum force output at optimum fiber length
  Lf0 = MuscleParameters.OptimalFiberlength / cos(pi/180*MuscleParameters.Pennationangle); //< Optimal fiber length corrected by pennation angle
  Vol0 = 1e-6*MuscleParameters.MuscleVolume/MuscleElemAmount; ///< Muscle volume in (m3)
  AnyVar PCSA = 1e4*Vol0/Lf0;///< PCSA (cm2) is calculated as muscle volume divided between muscle branches and divided by fiber length
};


////////////////////////////////////////////////////////////////
//     Flexor_Digitorum_Superficialis_Digit5 (1 element )     //
////////////////////////////////////////////////////////////////
AnyMuscleModel Flexor_Digitorum_Superficialis_Digit5 =
{
  AnyFolder& MuscleParameters = .SubjectMusPar.Flexor_Digitorum_Superficialis_Digit5;
  AnyIntVar MuscleElemNo = 1; ///< The number of this element of the muscle
  AnyIntVar MuscleElemAmount = MuscleParameters.MuscleElemAmount; ///< The total amount of elements for this muscle
  F0 = .SubjectMusPar.PCSAfactor*PCSA; ///< Maximum force output at optimum fiber length
  Lf0 = MuscleParameters.OptimalFiberlength / cos(pi/180*MuscleParameters.Pennationangle); //< Optimal fiber length corrected by pennation angle
  Vol0 = 1e-6*MuscleParameters.MuscleVolume/MuscleElemAmount; ///< Muscle volume in (m3)
  AnyVar PCSA = 1e4*Vol0/Lf0;///< PCSA (cm2) is calculated as muscle volume divided between muscle branches and divided by fiber length
};


////////////////////////////////////////////////////////////////
//     Flexor_Digitorum_Superficialis_Digit4 (1 element )     //
////////////////////////////////////////////////////////////////
AnyMuscleModel Flexor_Digitorum_Superficialis_Digit4 =
{
  AnyFolder& MuscleParameters = .SubjectMusPar.Flexor_Digitorum_Superficialis_Digit4;
  AnyIntVar MuscleElemNo = 1; ///< The number of this element of the muscle
  AnyIntVar MuscleElemAmount = MuscleParameters.MuscleElemAmount; ///< The total amount of elements for this muscle
  F0 = .SubjectMusPar.PCSAfactor*PCSA; ///< Maximum force output at optimum fiber length
  Lf0 = MuscleParameters.OptimalFiberlength / cos(pi/180*MuscleParameters.Pennationangle); //< Optimal fiber length corrected by pennation angle
  Vol0 = 1e-6*MuscleParameters.MuscleVolume/MuscleElemAmount; ///< Muscle volume in (m3)
  AnyVar PCSA = 1e4*Vol0/Lf0;///< PCSA (cm2) is calculated as muscle volume divided between muscle branches and divided by fiber length
};


////////////////////////////////////////////////////////////////
//     Flexor_Digitorum_Superficialis_Digit3 (1 element )     //
////////////////////////////////////////////////////////////////
AnyMuscleModel Flexor_Digitorum_Superficialis_Digit3 =
{
  AnyFolder& MuscleParameters = .SubjectMusPar.Flexor_Digitorum_Superficialis_Digit3;
  AnyIntVar MuscleElemNo = 1; ///< The number of this element of the muscle
  AnyIntVar MuscleElemAmount = MuscleParameters.MuscleElemAmount; ///< The total amount of elements for this muscle
  F0 = .SubjectMusPar.PCSAfactor*PCSA; ///< Maximum force output at optimum fiber length
  Lf0 = MuscleParameters.OptimalFiberlength / cos(pi/180*MuscleParameters.Pennationangle); //< Optimal fiber length corrected by pennation angle
  Vol0 = 1e-6*MuscleParameters.MuscleVolume/MuscleElemAmount; ///< Muscle volume in (m3)
  AnyVar PCSA = 1e4*Vol0/Lf0;///< PCSA (cm2) is calculated as muscle volume divided between muscle branches and divided by fiber length
};


////////////////////////////////////////////////////////////////
//     Flexor_Digitorum_Superficialis_Digit2 (1 element )     //
////////////////////////////////////////////////////////////////
AnyMuscleModel Flexor_Digitorum_Superficialis_Digit2 =
{
  AnyFolder& MuscleParameters = .SubjectMusPar.Flexor_Digitorum_Superficialis_Digit2;
  AnyIntVar MuscleElemNo = 1; ///< The number of this element of the muscle
  AnyIntVar MuscleElemAmount = MuscleParameters.MuscleElemAmount; ///< The total amount of elements for this muscle
  F0 = .SubjectMusPar.PCSAfactor*PCSA; ///< Maximum force output at optimum fiber length
  Lf0 = MuscleParameters.OptimalFiberlength / cos(pi/180*MuscleParameters.Pennationangle); //< Optimal fiber length corrected by pennation angle
  Vol0 = 1e-6*MuscleParameters.MuscleVolume/MuscleElemAmount; ///< Muscle volume in (m3)
  AnyVar PCSA = 1e4*Vol0/Lf0;///< PCSA (cm2) is calculated as muscle volume divided between muscle branches and divided by fiber length
};


////////////////////////////////////////////////////////////
//     Flexor_Digitorum_Profundus_Digit5 (1 element )     //
////////////////////////////////////////////////////////////
AnyMuscleModel Flexor_Digitorum_Profundus_Digit5 =
{
  AnyFolder& MuscleParameters = .SubjectMusPar.Flexor_Digitorum_Profundus_Digit5;
  AnyIntVar MuscleElemNo = 1; ///< The number of this element of the muscle
  AnyIntVar MuscleElemAmount = MuscleParameters.MuscleElemAmount; ///< The total amount of elements for this muscle
  F0 = .SubjectMusPar.PCSAfactor*PCSA; ///< Maximum force output at optimum fiber length
  Lf0 = MuscleParameters.OptimalFiberlength / cos(pi/180*MuscleParameters.Pennationangle); //< Optimal fiber length corrected by pennation angle
  Vol0 = 1e-6*MuscleParameters.MuscleVolume/MuscleElemAmount; ///< Muscle volume in (m3)
  AnyVar PCSA = 1e4*Vol0/Lf0;///< PCSA (cm2) is calculated as muscle volume divided between muscle branches and divided by fiber length
};


////////////////////////////////////////////////////////////
//     Flexor_Digitorum_Profundus_Digit4 (1 element )     //
////////////////////////////////////////////////////////////
AnyMuscleModel Flexor_Digitorum_Profundus_Digit4 =
{
  AnyFolder& MuscleParameters = .SubjectMusPar.Flexor_Digitorum_Profundus_Digit4;
  AnyIntVar MuscleElemNo = 1; ///< The number of this element of the muscle
  AnyIntVar MuscleElemAmount = MuscleParameters.MuscleElemAmount; ///< The total amount of elements for this muscle
  F0 = .SubjectMusPar.PCSAfactor*PCSA; ///< Maximum force output at optimum fiber length
  Lf0 = MuscleParameters.OptimalFiberlength / cos(pi/180*MuscleParameters.Pennationangle); //< Optimal fiber length corrected by pennation angle
  Vol0 = 1e-6*MuscleParameters.MuscleVolume/MuscleElemAmount; ///< Muscle volume in (m3)
  AnyVar PCSA = 1e4*Vol0/Lf0;///< PCSA (cm2) is calculated as muscle volume divided between muscle branches and divided by fiber length
};


////////////////////////////////////////////////////////////
//     Flexor_Digitorum_Profundus_Digit3 (1 element )     //
////////////////////////////////////////////////////////////
AnyMuscleModel Flexor_Digitorum_Profundus_Digit3 =
{
  AnyFolder& MuscleParameters = .SubjectMusPar.Flexor_Digitorum_Profundus_Digit3;
  AnyIntVar MuscleElemNo = 1; ///< The number of this element of the muscle
  AnyIntVar MuscleElemAmount = MuscleParameters.MuscleElemAmount; ///< The total amount of elements for this muscle
  F0 = .SubjectMusPar.PCSAfactor*PCSA; ///< Maximum force output at optimum fiber length
  Lf0 = MuscleParameters.OptimalFiberlength / cos(pi/180*MuscleParameters.Pennationangle); //< Optimal fiber length corrected by pennation angle
  Vol0 = 1e-6*MuscleParameters.MuscleVolume/MuscleElemAmount; ///< Muscle volume in (m3)
  AnyVar PCSA = 1e4*Vol0/Lf0;///< PCSA (cm2) is calculated as muscle volume divided between muscle branches and divided by fiber length
};


////////////////////////////////////////////////////////////
//     Flexor_Digitorum_Profundus_Digit2 (1 element )     //
////////////////////////////////////////////////////////////
AnyMuscleModel Flexor_Digitorum_Profundus_Digit2 =
{
  AnyFolder& MuscleParameters = .SubjectMusPar.Flexor_Digitorum_Profundus_Digit2;
  AnyIntVar MuscleElemNo = 1; ///< The number of this element of the muscle
  AnyIntVar MuscleElemAmount = MuscleParameters.MuscleElemAmount; ///< The total amount of elements for this muscle
  F0 = .SubjectMusPar.PCSAfactor*PCSA; ///< Maximum force output at optimum fiber length
  Lf0 = MuscleParameters.OptimalFiberlength / cos(pi/180*MuscleParameters.Pennationangle); //< Optimal fiber length corrected by pennation angle
  Vol0 = 1e-6*MuscleParameters.MuscleVolume/MuscleElemAmount; ///< Muscle volume in (m3)
  AnyVar PCSA = 1e4*Vol0/Lf0;///< PCSA (cm2) is calculated as muscle volume divided between muscle branches and divided by fiber length
};


////////////////////////////////////////////////////
//     Extensor_Digitorum_Digit5 (1 element )     //
////////////////////////////////////////////////////
AnyMuscleModel Extensor_Digitorum_Digit5 =
{
  AnyFolder& MuscleParameters = .SubjectMusPar.Extensor_Digitorum_Digit5;
  AnyIntVar MuscleElemNo = 1; ///< The number of this element of the muscle
  AnyIntVar MuscleElemAmount = MuscleParameters.MuscleElemAmount; ///< The total amount of elements for this muscle
  F0 = .SubjectMusPar.PCSAfactor*PCSA; ///< Maximum force output at optimum fiber length
  Lf0 = MuscleParameters.OptimalFiberlength / cos(pi/180*MuscleParameters.Pennationangle); //< Optimal fiber length corrected by pennation angle
  Vol0 = 1e-6*MuscleParameters.MuscleVolume/MuscleElemAmount; ///< Muscle volume in (m3)
  AnyVar PCSA = 1e4*Vol0/Lf0;///< PCSA (cm2) is calculated as muscle volume divided between muscle branches and divided by fiber length
};


////////////////////////////////////////////////////
//     Extensor_Digitorum_Digit4 (1 element )     //
////////////////////////////////////////////////////
AnyMuscleModel Extensor_Digitorum_Digit4 =
{
  AnyFolder& MuscleParameters = .SubjectMusPar.Extensor_Digitorum_Digit4;
  AnyIntVar MuscleElemNo = 1; ///< The number of this element of the muscle
  AnyIntVar MuscleElemAmount = MuscleParameters.MuscleElemAmount; ///< The total amount of elements for this muscle
  F0 = .SubjectMusPar.PCSAfactor*PCSA; ///< Maximum force output at optimum fiber length
  Lf0 = MuscleParameters.OptimalFiberlength / cos(pi/180*MuscleParameters.Pennationangle); //< Optimal fiber length corrected by pennation angle
  Vol0 = 1e-6*MuscleParameters.MuscleVolume/MuscleElemAmount; ///< Muscle volume in (m3)
  AnyVar PCSA = 1e4*Vol0/Lf0;///< PCSA (cm2) is calculated as muscle volume divided between muscle branches and divided by fiber length
};


////////////////////////////////////////////////////
//     Extensor_Digitorum_Digit3 (1 element )     //
////////////////////////////////////////////////////
AnyMuscleModel Extensor_Digitorum_Digit3 =
{
  AnyFolder& MuscleParameters = .SubjectMusPar.Extensor_Digitorum_Digit3;
  AnyIntVar MuscleElemNo = 1; ///< The number of this element of the muscle
  AnyIntVar MuscleElemAmount = MuscleParameters.MuscleElemAmount; ///< The total amount of elements for this muscle
  F0 = .SubjectMusPar.PCSAfactor*PCSA; ///< Maximum force output at optimum fiber length
  Lf0 = MuscleParameters.OptimalFiberlength / cos(pi/180*MuscleParameters.Pennationangle); //< Optimal fiber length corrected by pennation angle
  Vol0 = 1e-6*MuscleParameters.MuscleVolume/MuscleElemAmount; ///< Muscle volume in (m3)
  AnyVar PCSA = 1e4*Vol0/Lf0;///< PCSA (cm2) is calculated as muscle volume divided between muscle branches and divided by fiber length
};


////////////////////////////////////////////////////
//     Extensor_Digitorum_Digit2 (1 element )     //
////////////////////////////////////////////////////
AnyMuscleModel Extensor_Digitorum_Digit2 =
{
  AnyFolder& MuscleParameters = .SubjectMusPar.Extensor_Digitorum_Digit2;
  AnyIntVar MuscleElemNo = 1; ///< The number of this element of the muscle
  AnyIntVar MuscleElemAmount = MuscleParameters.MuscleElemAmount; ///< The total amount of elements for this muscle
  F0 = .SubjectMusPar.PCSAfactor*PCSA; ///< Maximum force output at optimum fiber length
  Lf0 = MuscleParameters.OptimalFiberlength / cos(pi/180*MuscleParameters.Pennationangle); //< Optimal fiber length corrected by pennation angle
  Vol0 = 1e-6*MuscleParameters.MuscleVolume/MuscleElemAmount; ///< Muscle volume in (m3)
  AnyVar PCSA = 1e4*Vol0/Lf0;///< PCSA (cm2) is calculated as muscle volume divided between muscle branches and divided by fiber length
};


/////////////////////////////////////////////////
//     Extensor_Digiti_Minimi (1 element )     //
/////////////////////////////////////////////////
AnyMuscleModel Extensor_Digiti_Minimi =
{
  AnyFolder& MuscleParameters = .SubjectMusPar.Extensor_Digiti_Minimi;
  AnyIntVar MuscleElemNo = 1; ///< The number of this element of the muscle
  AnyIntVar MuscleElemAmount = MuscleParameters.MuscleElemAmount; ///< The total amount of elements for this muscle
  F0 = .SubjectMusPar.PCSAfactor*PCSA; ///< Maximum force output at optimum fiber length
  Lf0 = MuscleParameters.OptimalFiberlength / cos(pi/180*MuscleParameters.Pennationangle); //< Optimal fiber length corrected by pennation angle
  Vol0 = 1e-6*MuscleParameters.MuscleVolume/MuscleElemAmount; ///< Muscle volume in (m3)
  AnyVar PCSA = 1e4*Vol0/Lf0;///< PCSA (cm2) is calculated as muscle volume divided between muscle branches and divided by fiber length
};


/////////////////////////////////////////////////
//     Flexor_Pollicis_Longus (1 element )     //
/////////////////////////////////////////////////
AnyMuscleModel Flexor_Pollicis_Longus =
{
  AnyFolder& MuscleParameters = .SubjectMusPar.Flexor_Pollicis_Longus;
  AnyIntVar MuscleElemNo = 1; ///< The number of this element of the muscle
  AnyIntVar MuscleElemAmount = MuscleParameters.MuscleElemAmount; ///< The total amount of elements for this muscle
  F0 = .SubjectMusPar.PCSAfactor*PCSA; ///< Maximum force output at optimum fiber length
  Lf0 = MuscleParameters.OptimalFiberlength / cos(pi/180*MuscleParameters.Pennationangle); //< Optimal fiber length corrected by pennation angle
  Vol0 = 1e-6*MuscleParameters.MuscleVolume/MuscleElemAmount; ///< Muscle volume in (m3)
  AnyVar PCSA = 1e4*Vol0/Lf0;///< PCSA (cm2) is calculated as muscle volume divided between muscle branches and divided by fiber length
};
