//VU study
//http://www.fbw.vu.nl/research/Lijn_A4/shoulder/overview.htm

//Note: PCSA has been divided according to no. of muscle elements

// Yamaguchi
//A survey of human musculotendon actuator parameters
//G.T. Yamaguchi, A.G. Sawa, D.W. Moran, M.J. Fessler, and J.M. Winters
// multiple Muscle Systems: Biomechanics and Movement Organization
//J.M. Winters and S.L.-T. Woo (eds.) 1990 Springer- verlag, New York

//Juul-Kristensen2000
// muscle sizes and moment arms of the rotator cuff muscles determined by magnetic resonance imaging
//B. Juul-kristensen, F. Bojsen-Moeller, L. Finsen, J. Eriksson, G. Johansson, F. Staahlberg, C. Ekdahl
//Cell Tissues Organs 2000, 214-222

//Kamibayashi1998
// morphometry of human neck muscles
//Lynne K. Kamibayashi, Frances J.R. Richmond
//Spine Vol. 23,No.12, pp. 1314-1323, 1998

//Holzbauer2005
//Kathrine Holzbaur, Wendy Murray, Scott Delp
//A model of the upper extremity for simulating musculoskeletal surgery and analysing neuromuscular control
//Annals of biomedical engineering, Vol. 33, no. 6, june 2005 pp.829-840

//Bodgduk1998
//The morphology and biomechanics of latissimus dorsi
//N. Bogduk, G.Johnson, D. Spalding
//Clinical Biomechanics 13(1998) 377-385

//Jacobson
//Jacobson, M. D., R. Raab, B. M. Fazeli, R. A. Abrams, M. J. Botte, and R. L. Lieber.
//Architectural design of the human intrinsic hand muscles.
// J. Hand Surg. [Am.] 17:804809, 1992.

//Lieber1
//Lieber, R. L., M. D. Jacobson, B. M. Fazeli, R. A. Abrams, and M. J. Botte.
//Architecture of selected muscles of the arm and forearm: Anatomy and implications for tendon transfer.
//J. Hand Surg. [Am.] 17:787-798, 1992.

//Lieber2
//Lieber, R. L., B. M. Fazeli, and M. J. Botte.
//Architecture of selected wrist flexor and extensor muscles.
//J. Hand Surg. [Am.] 15:244-250, 1990.

//Murray
//Muray, W.M.,T.S. Buchanan, and S.L. Delp.
//Scaling of peak moment arms with the elbow and forearm position
//J. Biomech. Vol. 28, pp. 513-525, 1995

//Mirakhorlo
//Mirakhorlo, M., Visser, J. M., Goislard de Monsabert, B. A. A. X., Van der Helm, F. C. T., Maas, H., & Veeger, H. E. J.
//Anatomical parameters for musculoskeletal modeling of the hand and wrist
//International Biomechanics 3.1 (2016): 40-49.

AnyVar StrengthScaleHumerus = .StrengthScaling.Humerus.StrengthScale;
AnyVar StrengthScaleUlna = .StrengthScaling.Ulna.StrengthScale;


AnyMuscleModel3E biceps_brachii_caput_breve = {
  AnyVar PCSA = 172.000000; // mm^2 VU study
  F0 = .StrengthScaleHumerus*PCSA*.ConstParam.MusStress;
  Lf0 =0.1500000; // Yamaguchi
  Lt0 = 0.1; // Estimated
  Gamma0 = (pi/180)* 2.000000; // Estimated
  Epsilon0 = Epsilon0Temp;
  K1 = K1Temp;
  K2 = K2Temp;
  Fcfast = FcfastTemp;
  Jt = JtTemp;
  Jpe = JpeTemp;
  PEFactor = PEFactorTemp;
};

AnyMuscleModel3E biceps_brachii_caput_longum = {
  AnyVar PCSA = 178.000000; // mm^2 VU study
  F0 = .StrengthScaleHumerus*PCSA*.ConstParam.MusStress;
  Lf0 = 0.10000; // Yamaguchi
  Lt0 = 0.1; // Estimated
  Gamma0 = (pi/180)* 2.000000; // Estimated
  Epsilon0 = Epsilon0Temp;
  K1 = K1Temp;
  K2 = K2Temp;
  Fcfast = FcfastTemp;
  Jt = JtTemp;
  Jpe = JpeTemp;
  PEFactor = PEFactorTemp;
};

AnyMuscleModel3E coracobrachialis_1 = {
  AnyVar Volume = 0.5*46.500000/10^6; // m^3 mayo k2_2
  AnyVar MuscleBellyLength = 0.250; // m mayo k2_2
  AnyVar PCSA = Volume/(MuscleBellyLength*cos(Gamma0));
  F0 = .StrengthScaleHumerus*PCSA*.ConstParam.MusStressForearm;
  AnyVar Lf0Temp = 0.091000; // m, mayo k2_2
  Lf0 =Lf0Temp;
  Lt0 = 0.2*Lf0Temp; // Estimated
  Gamma0 = (pi/180)* 1.000000; // Estimated
  Epsilon0 = Epsilon0Temp;
  K1 = K1Temp;
  K2 = K2Temp;
  Fcfast = FcfastTemp;
  Jt = JtTemp;
  Jpe = JpeTemp;
  PEFactor = PEFactorTemp;
};

AnyMuscleModel3E coracobrachialis_2 = {
  AnyVar Volume = 0.5*46.500000/10^6; // m^3 mayo k2_2
  AnyVar MuscleBellyLength = 0.250; // m mayo k2_2
  AnyVar PCSA = Volume/(MuscleBellyLength*cos(Gamma0));
  F0 = .StrengthScaleHumerus*PCSA*.ConstParam.MusStressForearm;
  AnyVar Lf0Temp = 0.091000; // m, mayo k2_2
  Lf0 =Lf0Temp;
  Lt0 = 0.2*Lf0Temp; // Estimated
  Gamma0 = (pi/180)* 1.000000; // Estimated
  Epsilon0 = Epsilon0Temp;
  K1 = K1Temp;
  K2 = K2Temp;
  Fcfast = FcfastTemp;
  Jt = JtTemp;
  Jpe = JpeTemp;
  PEFactor = PEFactorTemp;
};

AnyMuscleModel3E coracobrachialis_3 = {
  AnyVar Volume = 0.5*46.500000/10^6; // m^3 mayo k2_2
  AnyVar MuscleBellyLength = 0.250; // m mayo k2_2
  AnyVar PCSA = Volume/(MuscleBellyLength*cos(Gamma0));
  F0 = .StrengthScaleHumerus*PCSA*.ConstParam.MusStressForearm;
  AnyVar Lf0Temp = 0.091000; // m, mayo k2_2
  Lf0 =Lf0Temp;
  Lt0 = 0.2*Lf0Temp; // Estimated
  Gamma0 = (pi/180)* 1.000000; // Estimated
  Epsilon0 = Epsilon0Temp;
  K1 = K1Temp;
  K2 = K2Temp;
  Fcfast = FcfastTemp;
  Jt = JtTemp;
  Jpe = JpeTemp;
  PEFactor = PEFactorTemp;
};

AnyMuscleModel3E coracobrachialis_4 = {
  AnyVar Volume = 0.5*46.500000/10^6; // m^3 mayo k2_2
  AnyVar MuscleBellyLength = 0.250; // m mayo k2_2
  AnyVar PCSA = Volume/(MuscleBellyLength*cos(Gamma0));
  F0 = .StrengthScaleHumerus*PCSA*.ConstParam.MusStressForearm;
  AnyVar Lf0Temp = 0.091000; // m, mayo k2_2
  Lf0 =Lf0Temp;
  Lt0 = 0.2*Lf0Temp; // Estimated
  Gamma0 = (pi/180)* 1.000000; // Estimated
  Epsilon0 = Epsilon0Temp;
  K1 = K1Temp;
  K2 = K2Temp;
  Fcfast = FcfastTemp;
  Jt = JtTemp;
  Jpe = JpeTemp;
  PEFactor = PEFactorTemp;
};

AnyMuscleModel3E coracobrachialis_5 = {
  AnyVar Volume = 0.5*46.500000/10^6; // m^3 mayo k2_2
  AnyVar MuscleBellyLength = 0.250; // m mayo k2_2
  AnyVar PCSA = Volume/(MuscleBellyLength*cos(Gamma0));
  F0 = .StrengthScaleHumerus*PCSA*.ConstParam.MusStressForearm;
  AnyVar Lf0Temp = 0.091000; // m, mayo k2_2
  Lf0 =Lf0Temp;
  Lt0 = 0.2*Lf0Temp; // Estimated
  Gamma0 = (pi/180)* 1.000000; // Estimated
  Epsilon0 = Epsilon0Temp;
  K1 = K1Temp;
  K2 = K2Temp;
  Fcfast = FcfastTemp;
  Jt = JtTemp;
  Jpe = JpeTemp;
  PEFactor = PEFactorTemp;
};

AnyMuscleModel3E coracobrachialis_6 = {
  AnyVar Volume = 0.5*46.500000/10^6; // m^3 mayo k2_2
  AnyVar MuscleBellyLength = 0.250; // m mayo k2_2
  AnyVar PCSA = Volume/(MuscleBellyLength*cos(Gamma0));
  F0 = .StrengthScaleHumerus*PCSA*.ConstParam.MusStressForearm;
  AnyVar Lf0Temp = 0.091000; // m, mayo k2_2
  Lf0 =Lf0Temp;
  Lt0 = 0.2*Lf0Temp; // Estimated
  Gamma0 = (pi/180)* 1.000000; // Estimated
  Epsilon0 = Epsilon0Temp;
  K1 = K1Temp;
  K2 = K2Temp;
  Fcfast = FcfastTemp;
  Jt = JtTemp;
  Jpe = JpeTemp;
  PEFactor = PEFactorTemp;
};

#if BM_ARM_DELTOID_WRAPPING == _DELTOID_WRAPPING_RAKE_

AnyMuscleModel3E deltoideus_scapular_part_1 = {
  AnyVar PCSA = 90.000000; // mm^2 Holzbauer et. al
  F0 = .StrengthScaleHumerus*PCSA*.ConstParam.MusStress;
  Lf0 = 0.165*0.7; // Estimated using length Yamaguchi [16]
  Lt0 = 0.15*0.165; // Estimated using length Yamaguchi [16]
  Gamma0 = (pi/180)* 0.000000; // Estimated
  Epsilon0 = Epsilon0Temp;
  K1 = K1Temp;
  K2 = K2Temp;
  Fcfast = FcfastTemp;
  Jt = JtTemp;
  Jpe = JpeTemp;
  PEFactor = PEFactorTemp;
};

AnyMuscleModel3E deltoideus_scapular_part_2 = {
  AnyVar PCSA = 90.000000; // mm^2 Holzbauer et. al
  F0 = .StrengthScaleHumerus*PCSA*.ConstParam.MusStress;
  Lf0 = 0.165*0.7; // Estimated using length Yamaguchi [16]
  Lt0 = 0.15*0.165; // Estimated using length Yamaguchi [16]
  Gamma0 = (pi/180)* 0.000000; // Estimated
  Epsilon0 = Epsilon0Temp;
  K1 = K1Temp;
  K2 = K2Temp;
  Fcfast = FcfastTemp;
  Jt = JtTemp;
  Jpe = JpeTemp;
  PEFactor = PEFactorTemp;
};

AnyMuscleModel3E deltoideus_scapular_part_3 = {
  AnyVar PCSA = 205.000000; // mm^2 Holzbauer et. al

  F0 = .StrengthScaleHumerus*PCSA*.ConstParam.MusStress;
  Lf0 = 0.165*0.7; // Estimated using length Yamaguchi [16]
  Lt0 = 0.15*0.165; // Estimated using length Yamaguchi [16]
  Gamma0 = (pi/180)* 0.000000; // Estimated
  Epsilon0 = Epsilon0Temp;
  K1 = K1Temp;
  K2 = K2Temp;
  Fcfast = FcfastTemp;
  Jt = JtTemp;
  Jpe = JpeTemp;
  PEFactor = PEFactorTemp;
};

AnyMuscleModel3E deltoideus_scapular_part_4 = {
  AnyVar PCSA = 205.000000; // mm^2 Holzbauer et. al
  F0 = .StrengthScaleHumerus*PCSA*.ConstParam.MusStress;
  Lf0 = 0.165*0.8; // Estimated using length Yamaguchi [16]
  Lt0 = 0.15*0.165; // Estimated using length Yamaguchi [16]
  Gamma0 = (pi/180)* 0.000000; // Estimated
  Epsilon0 = Epsilon0Temp;
  K1 = K1Temp;
  K2 = K2Temp;
  Fcfast = FcfastTemp;
  Jt = JtTemp;
  Jpe = JpeTemp;
  PEFactor = PEFactorTemp;
};

AnyMuscleModel3E deltoideus_scapular_part_5 = {
  AnyVar PCSA = 205.000000; // mm^2 VU study
  F0 = .StrengthScaleHumerus*PCSA*.ConstParam.MusStress;
  Lf0 = 0.165*0.8; // Estimated using length Yamaguchi [16]
  Lt0 = 0.15*0.165; // Estimated using length Yamaguchi [16]
  Gamma0 = (pi/180)* 0.000000; // Estimated
  Epsilon0 = Epsilon0Temp;
  K1 = K1Temp;
  K2 = K2Temp;
  Fcfast = FcfastTemp;
  Jt = JtTemp;
  Jpe = JpeTemp;
  PEFactor = PEFactorTemp;
};

AnyMuscleModel3E deltoideus_scapular_part_6 = {
  AnyVar PCSA = 205.000000; // mm^2 VU study
  F0 = .StrengthScaleHumerus*PCSA*.ConstParam.MusStress;
  Lf0 = 0.165*0.8; // Estimated using length Yamaguchi [16]
  Lt0 = 0.15*0.165; // Estimated using length Yamaguchi [16]
  Gamma0 = (pi/180)* 0.000000; // Estimated
  Epsilon0 = Epsilon0Temp;
  K1 = K1Temp;
  K2 = K2Temp;
  Fcfast = FcfastTemp;
  Jt = JtTemp;
  Jpe = JpeTemp;
  PEFactor = PEFactorTemp;
};

AnyMuscleModel3E deltoideus_clavicular_part_1 = {
  AnyVar PCSA = 136.0; // mm^2 HolzBauer et. al
  F0 = .StrengthScaleHumerus*PCSA*.ConstParam.MusStress;
  Lf0 = 0.165*0.85; // Estimated using length Yamaguchi [16]
  Lt0 = 0.15*0.165; // Estimated using length Yamaguchi [16]
  Gamma0 = (pi/180)* 0.000000; // Estimated
  Epsilon0 = Epsilon0Temp;
  K1 = K1Temp;
  K2 = K2Temp;
  Fcfast = FcfastTemp;
  Jt = JtTemp;
  Jpe = JpeTemp;
  PEFactor = PEFactorTemp;
};

AnyMuscleModel3E deltoideus_clavicular_part_2 = {
  AnyVar PCSA = 136.0; // mm^2 HolzBauer et. al
  F0 = .StrengthScaleHumerus*PCSA*.ConstParam.MusStress;
  Lf0 = 0.165*0.85; // Estimated using length Yamaguchi [16]
  Lt0 = 0.15*0.165; // Estimated using length Yamaguchi [16]
  Gamma0 = (pi/180)* 0.000000; // Estimated
  Epsilon0 = Epsilon0Temp;
  K1 = K1Temp;
  K2 = K2Temp;
  Fcfast = FcfastTemp;
  Jt = JtTemp;
  Jpe = JpeTemp;
  PEFactor = PEFactorTemp;
};

AnyMuscleModel3E deltoideus_clavicular_part_3 = {
  AnyVar PCSA = 136.0; // mm^2 HolzBauer et. al
  F0 = .StrengthScaleHumerus*PCSA*.ConstParam.MusStress;
  Lf0 = 0.165*0.85; // Estimated using length Yamaguchi [16]
  Lt0 = 0.15*0.165; // Estimated using length Yamaguchi [16]
  Gamma0 = (pi/180)* 0.000000; // Estimated
  Epsilon0 = Epsilon0Temp;
  K1 = K1Temp;
  K2 = K2Temp;
  Fcfast = FcfastTemp;
  Jt = JtTemp;
  Jpe = JpeTemp;
  PEFactor = PEFactorTemp;
};

AnyMuscleModel3E deltoideus_clavicular_part_4 = {
  AnyVar PCSA = 136.0; // mm^2 HolzBauer et. al
  F0 = .StrengthScaleHumerus*PCSA*.ConstParam.MusStress;
  Lf0 = 0.165*0.85; // Estimated using length Yamaguchi [16]
  Lt0 = 0.15*0.165; // Estimated using length Yamaguchi [16]
  Gamma0 = (pi/180)* 0.000000; // Estimated
  Epsilon0 = Epsilon0Temp;
  K1 = K1Temp;
  K2 = K2Temp;
  Fcfast = FcfastTemp;
  Jt = JtTemp;
  Jpe = JpeTemp;
  PEFactor = PEFactorTemp;
};

AnyMuscleModel3E deltoideus_clavicular_part_5 = {
  AnyVar PCSA = 136.0; // mm^2 HolzBauer et. al
  F0 = .StrengthScaleHumerus*PCSA*.ConstParam.MusStress;
  Lf0 = 0.165*0.85; // Estimated using length Yamaguchi [16]
  Lt0 = 0.15*0.165; // Estimated using length Yamaguchi [16]
  Gamma0 = (pi/180)* 0.000000; // Estimated
  Epsilon0 = Epsilon0Temp;
  K1 = K1Temp;
  K2 = K2Temp;
  Fcfast = FcfastTemp;
  Jt = JtTemp;
  Jpe = JpeTemp;
  PEFactor = PEFactorTemp;
};

AnyMuscleModel3E deltoideus_clavicular_part_6 = {
  AnyVar PCSA = 136.0; // mm^2 HolzBauer et. al
  F0 = .StrengthScaleHumerus*PCSA*.ConstParam.MusStress;
  Lf0 = 0.165*0.85; // Estimated using length Yamaguchi [16]
  Lt0 = 0.15*0.165; // Estimated using length Yamaguchi [16]
  Gamma0 = (pi/180)* 0.000000; // Estimated
  Epsilon0 = Epsilon0Temp;
  K1 = K1Temp;
  K2 = K2Temp;
  Fcfast = FcfastTemp;
  Jt = JtTemp;
  Jpe = JpeTemp;
  PEFactor = PEFactorTemp;
};

#else
// Start of BM_ARM_DELTOID_WRAPPING

AnyMuscleModel3E deltoideus_posterior_part_1 = {
  AnyVar PCSA = 90.000000; // mm^2 Holzbauer et. al
  F0 = .StrengthScaleHumerus*PCSA*.ConstParam.MusStress;
  Lf0 = 0.165*0.7; // Estimated using length Yamaguchi [16]
  Lt0 = 0.15*0.165; // Estimated using length Yamaguchi [16]
  Gamma0 = (pi/180)* 0.000000; // Estimated
  Epsilon0 = Epsilon0Temp;
  K1 = K1Temp;
  K2 = K2Temp;
  Fcfast = FcfastTemp;
  Jt = JtTemp;
  Jpe = JpeTemp;
  PEFactor = PEFactorTemp;
};

AnyMuscleModel3E deltoideus_posterior_part_2 = {
  AnyVar PCSA = 90.000000; // mm^2 Holzbauer et. al
  F0 = .StrengthScaleHumerus*PCSA*.ConstParam.MusStress;
  Lf0 = 0.165*0.7; // Estimated using length Yamaguchi [16]
  Lt0 = 0.15*0.165; // Estimated using length Yamaguchi [16]
  Gamma0 = (pi/180)* 0.000000; // Estimated
  Epsilon0 = Epsilon0Temp;
  K1 = K1Temp;
  K2 = K2Temp;
  Fcfast = FcfastTemp;
  Jt = JtTemp;
  Jpe = JpeTemp;
  PEFactor = PEFactorTemp;
};

AnyMuscleModel3E deltoideus_posterior_part_3 = {
  AnyVar PCSA = 90.000000; // mm^2 Holzbauer et. al
  F0 = .StrengthScaleHumerus*PCSA*.ConstParam.MusStress;
  Lf0 = 0.165*0.7; // Estimated using length Yamaguchi [16]
  Lt0 = 0.15*0.165; // Estimated using length Yamaguchi [16]
  Gamma0 = (pi/180)* 0.000000; // Estimated
  Epsilon0 = Epsilon0Temp;
  K1 = K1Temp;
  K2 = K2Temp;
  Fcfast = FcfastTemp;
  Jt = JtTemp;
  Jpe = JpeTemp;
  PEFactor = PEFactorTemp;
};

AnyMuscleModel3E deltoideus_posterior_part_4 = {
  AnyVar PCSA = 90.000000; // mm^2 Holzbauer et. al
  F0 = .StrengthScaleHumerus*PCSA*.ConstParam.MusStress;
  Lf0 = 0.165*0.7; // Estimated using length Yamaguchi [16]
  Lt0 = 0.15*0.165; // Estimated using length Yamaguchi [16]
  Gamma0 = (pi/180)* 0.000000; // Estimated
  Epsilon0 = Epsilon0Temp;
  K1 = K1Temp;
  K2 = K2Temp;
  Fcfast = FcfastTemp;
  Jt = JtTemp;
  Jpe = JpeTemp;
  PEFactor = PEFactorTemp;
};

AnyMuscleModel3E deltoideus_lateral_part_1 = {
  AnyVar PCSA = 205.000000; // mm^2 Holzbauer et. al

  F0 = .StrengthScaleHumerus*PCSA*.ConstParam.MusStress;
  Lf0 = 0.165*0.7; // Estimated using length Yamaguchi [16]
  Lt0 = 0.15*0.165; // Estimated using length Yamaguchi [16]
  Gamma0 = (pi/180)* 0.000000; // Estimated
  Epsilon0 = Epsilon0Temp;
  K1 = K1Temp;
  K2 = K2Temp;
  Fcfast = FcfastTemp;
  Jt = JtTemp;
  Jpe = JpeTemp;
  PEFactor = PEFactorTemp;
};

AnyMuscleModel3E deltoideus_lateral_part_2 = {
  AnyVar PCSA = 205.000000; // mm^2 Holzbauer et. al
  F0 = .StrengthScaleHumerus*PCSA*.ConstParam.MusStress;
  Lf0 = 0.165*0.8; // Estimated using length Yamaguchi [16]
  Lt0 = 0.15*0.165; // Estimated using length Yamaguchi [16]
  Gamma0 = (pi/180)* 0.000000; // Estimated
  Epsilon0 = Epsilon0Temp;
  K1 = K1Temp;
  K2 = K2Temp;
  Fcfast = FcfastTemp;
  Jt = JtTemp;
  Jpe = JpeTemp;
  PEFactor = PEFactorTemp;
};

AnyMuscleModel3E deltoideus_lateral_part_3 = {
  AnyVar PCSA = 205.000000; // mm^2 Holzbauer et. al
  F0 = .StrengthScaleHumerus*PCSA*.ConstParam.MusStress;
  Lf0 = 0.165*0.8; // Estimated using length Yamaguchi [16]
  Lt0 = 0.15*0.165; // Estimated using length Yamaguchi [16]
  Gamma0 = (pi/180)* 0.000000; // Estimated
  Epsilon0 = Epsilon0Temp;
  K1 = K1Temp;
  K2 = K2Temp;
  Fcfast = FcfastTemp;
  Jt = JtTemp;
  Jpe = JpeTemp;
  PEFactor = PEFactorTemp;
};

AnyMuscleModel3E deltoideus_lateral_part_4 = {
  AnyVar PCSA = 205.000000; // mm^2 VU study
  F0 = .StrengthScaleHumerus*PCSA*.ConstParam.MusStress;
  Lf0 = 0.165*0.8; // Estimated using length Yamaguchi [16]
  Lt0 = 0.15*0.165; // Estimated using length Yamaguchi [16]
  Gamma0 = (pi/180)* 0.000000; // Estimated
  Epsilon0 = Epsilon0Temp;
  K1 = K1Temp;
  K2 = K2Temp;
  Fcfast = FcfastTemp;
  Jt = JtTemp;
  Jpe = JpeTemp;
  PEFactor = PEFactorTemp;
};

AnyMuscleModel3E deltoideus_anterior_part_1 = {
  AnyVar PCSA = 136.0; // mm^2 HolzBauer et. al
  F0 = .StrengthScaleHumerus*PCSA*.ConstParam.MusStress;
  Lf0 = 0.165*0.85; // Estimated using length Yamaguchi [16]
  Lt0 = 0.15*0.165; // Estimated using length Yamaguchi [16]
  Gamma0 = (pi/180)* 0.000000; // Estimated
  Epsilon0 = Epsilon0Temp;
  K1 = K1Temp;
  K2 = K2Temp;
  Fcfast = FcfastTemp;
  Jt = JtTemp;
  Jpe = JpeTemp;
  PEFactor = PEFactorTemp;
};

AnyMuscleModel3E deltoideus_anterior_part_2 = {
  AnyVar PCSA = 136.0; // mm^2 HolzBauer et. al
  F0 = .StrengthScaleHumerus*PCSA*.ConstParam.MusStress;
  Lf0 = 0.165*0.85; // Estimated using length Yamaguchi [16]
  Lt0 = 0.15*0.165; // Estimated using length Yamaguchi [16]
  Gamma0 = (pi/180)* 0.000000; // Estimated
  Epsilon0 = Epsilon0Temp;
  K1 = K1Temp;
  K2 = K2Temp;
  Fcfast = FcfastTemp;
  Jt = JtTemp;
  Jpe = JpeTemp;
  PEFactor = PEFactorTemp;
};

AnyMuscleModel3E deltoideus_anterior_part_3 = {
  AnyVar PCSA = 136.0; // mm^2 HolzBauer et. al
  F0 = .StrengthScaleHumerus*PCSA*.ConstParam.MusStress;
  Lf0 = 0.165*0.85; // Estimated using length Yamaguchi [16]
  Lt0 = 0.15*0.165; // Estimated using length Yamaguchi [16]
  Gamma0 = (pi/180)* 0.000000; // Estimated
  Epsilon0 = Epsilon0Temp;
  K1 = K1Temp;
  K2 = K2Temp;
  Fcfast = FcfastTemp;
  Jt = JtTemp;
  Jpe = JpeTemp;
  PEFactor = PEFactorTemp;
};

AnyMuscleModel3E deltoideus_anterior_part_4 = {
  AnyVar PCSA = 136.0; // mm^2 HolzBauer et. al
  F0 = .StrengthScaleHumerus*PCSA*.ConstParam.MusStress;
  Lf0 = 0.165*0.85; // Estimated using length Yamaguchi [16]
  Lt0 = 0.15*0.165; // Estimated using length Yamaguchi [16]
  Gamma0 = (pi/180)* 0.000000; // Estimated
  Epsilon0 = Epsilon0Temp;
  K1 = K1Temp;
  K2 = K2Temp;
  Fcfast = FcfastTemp;
  Jt = JtTemp;
  Jpe = JpeTemp;
  PEFactor = PEFactorTemp;
};

// End of BM_ARM_DELTOID_WRAPPING
#endif

AnyMuscleModel3E infraspinatus_1 = {
  AnyVar PCSA = 136.200000; // mm^2 VU study
  F0 = .StrengthScaleHumerus*PCSA*.ConstParam.MusStress;
  Lf0 = 0.0650; // Juul-Kristensen2000
  Lt0 = 0.05*0.15; // Estimated using muscle length from Yamaguchi [16]
  Gamma0 = (pi/180)* 0.000000; // Estimated
  Epsilon0 = Epsilon0Temp;
  K1 = K1Temp;
  K2 = K2Temp;
  Fcfast = FcfastTemp;
  Jt = JtTemp;
  Jpe = JpeTemp;
  PEFactor = PEFactorTemp;
};

AnyMuscleModel3E infraspinatus_2 = {
  AnyVar PCSA = 136.200000; // mm^2 VU study
  F0 = .StrengthScaleHumerus*PCSA*.ConstParam.MusStress;
  Lf0 = 0.0650; // Juul-Kristensen2000
  Lt0 = 0.05*0.15; // Estimated using muscle length from Yamaguchi [16]
  Gamma0 = (pi/180)* 0.000000; // Estimated
  Epsilon0 = Epsilon0Temp;
  K1 = K1Temp;
  K2 = K2Temp;
  Fcfast = FcfastTemp;
  Jt = JtTemp;
  Jpe = JpeTemp;
  PEFactor = PEFactorTemp;
};

AnyMuscleModel3E infraspinatus_3 = {
  AnyVar PCSA = 136.200000; // mm^2 VU study
  F0 = .StrengthScaleHumerus*PCSA*.ConstParam.MusStress;
  Lf0 = 0.0650; // Juul-Kristensen2000
  Lt0 = 0.05*0.15; // Estimated using muscle length from Yamaguchi [16]
  Gamma0 = (pi/180)* 0.000000; // Estimated
  Epsilon0 = Epsilon0Temp;
  K1 = K1Temp;
  K2 = K2Temp;
  Fcfast = FcfastTemp;
  Jt = JtTemp;
  Jpe = JpeTemp;
  PEFactor = PEFactorTemp;
};

AnyMuscleModel3E infraspinatus_4 = {
  AnyVar PCSA = 136.200000; // mm^2 VU study
  F0 = .StrengthScaleHumerus*PCSA*.ConstParam.MusStress;
  Lf0 = 0.0650; // Juul-Kristensen2000
  Lt0 = 0.05*0.15; // Estimated using muscle length from Yamaguchi [16]
  Gamma0 = (pi/180)* 0.000000; // Estimated
  Epsilon0 = Epsilon0Temp;
  K1 = K1Temp;
  K2 = K2Temp;
  Fcfast = FcfastTemp;
  Jt = JtTemp;
  Jpe = JpeTemp;
  PEFactor = PEFactorTemp;
};

AnyMuscleModel3E infraspinatus_5 = {
  AnyVar PCSA = 136.200000; // mm^2 VU study
  F0 = .StrengthScaleHumerus*PCSA*.ConstParam.MusStress;
  Lf0 = 0.0650; // Juul-Kristensen2000
  Lt0 = 0.05*0.15; // Estimated using muscle length from Yamaguchi [16]
  Gamma0 = (pi/180)* 0.000000; // Estimated
  Epsilon0 = Epsilon0Temp;
  K1 = K1Temp;
  K2 = K2Temp;
  Fcfast = FcfastTemp;
  Jt = JtTemp;
  Jpe = JpeTemp;
  PEFactor = PEFactorTemp;
};

AnyMuscleModel3E infraspinatus_6 = {
  AnyVar PCSA = 136.200000; // mm^2 VU study
  F0 = .StrengthScaleHumerus*PCSA*.ConstParam.MusStress;
  Lf0 = 0.0650; // Juul-Kristensen2000
  Lt0 = 0.05*0.15; // Estimated using muscle length from Yamaguchi [16]
  Gamma0 = (pi/180)* 0.000000; // Estimated
  Epsilon0 = Epsilon0Temp;
  K1 = K1Temp;
  K2 = K2Temp;
  Fcfast = FcfastTemp;
  Jt = JtTemp;
  Jpe = JpeTemp;
  PEFactor = PEFactorTemp;
};

//The psca ofthe latissimus fasciles has been distribued roughly in accordance with Bodguk1998
AnyMuscleModel3E latissimus_dorsi_1 = {
  AnyVar PCSA = 620.00000*0.07; // mm^2 Bogduk 1998
  F0 = .StrengthScaleHumerus*PCSA*.ConstParam.MusStress;
  AnyVar Lf0Temp = 0.140000; // Estimated value
  Lf0 =Lf0Temp;
  Lt0 = 0.15*Lf0Temp; // Estimated value

  Gamma0 = (pi/180)* 0.000000; // Estimated value
  Epsilon0 = Epsilon0Temp;
  K1 = K1Temp;
  K2 = K2Temp;
  Fcfast = FcfastTemp;
  Jt = JtTemp;
  Jpe = JpeTemp;
  PEFactor = PEFactorTemp;
};

AnyMuscleModel3E latissimus_dorsi_2 = {
  AnyVar PCSA = 620.00000*0.14; // mm^2 Bogduk 1998
  F0 = .StrengthScaleHumerus*PCSA*.ConstParam.MusStress;
  AnyVar Lf0Temp = 0.140000; // Estimated value
  Lf0 =Lf0Temp;
  Lt0 = 0.15*Lf0Temp; // Estimated value

  Gamma0 = (pi/180)* 0.000000; // Estimated value
  Epsilon0 = Epsilon0Temp;
  K1 = K1Temp;
  K2 = K2Temp;
  Fcfast = FcfastTemp;
  Jt = JtTemp;
  Jpe = JpeTemp;
  PEFactor = PEFactorTemp;
};

AnyMuscleModel3E latissimus_dorsi_3 = {
  AnyVar PCSA = 620.00000*0.18;// mm^2 Bogduk 1998
  F0 = .StrengthScaleHumerus*PCSA*.ConstParam.MusStress;
  AnyVar   Lf0Temp = 0.140000; // Estimated value
  Lf0 =Lf0Temp;
  Lt0 = 0.15*Lf0Temp; // Estimated value
  Gamma0 = (pi/180)* 0.000000; // Estimated value
  Epsilon0 = Epsilon0Temp;
  K1 = K1Temp;
  K2 = K2Temp;
  Fcfast = FcfastTemp;
  Jt = JtTemp;
  Jpe = JpeTemp;
  PEFactor = PEFactorTemp;
};

AnyMuscleModel3E latissimus_dorsi_4 = {
  AnyVar PCSA = 620.00000*0.22; // mm^2 Bogduk 1998
  F0 = .StrengthScaleHumerus*PCSA*.ConstParam.MusStress;
  Lf0 =Lf0Temp;
  AnyVar Lf0Temp = 0.140000; // Estimated value
  Lt0 = 0.15*Lf0Temp; // Estimated value
  Gamma0 = (pi/180)* 0.000000; // Estimated value
  Epsilon0 = Epsilon0Temp;
  K1 = K1Temp;
  K2 = K2Temp;
  Fcfast = FcfastTemp;
  Jt = JtTemp;
  Jpe = JpeTemp;
  PEFactor = PEFactorTemp;
};

AnyMuscleModel3E latissimus_dorsi_5 = {
  AnyVar PCSA = 620.00000*0.29; // mm^2 Bogduk 1998
  F0 = .StrengthScaleHumerus*PCSA*.ConstParam.MusStress;
  Lf0 =Lf0Temp;
  AnyVar  Lf0Temp = 0.140000; // Estimated value
  Lt0 = 0.15*Lf0Temp; // Estimated value
  Gamma0 = (pi/180)* 0.000000; // Estimated value
  Epsilon0 = Epsilon0Temp;
  K1 = K1Temp;
  K2 = K2Temp;
  Fcfast = FcfastTemp;
  Jt = JtTemp;
  Jpe = JpeTemp;
  PEFactor = PEFactorTemp;
};

AnyMuscleModel3E levator_scapulae_1 = {
  AnyVar PCSA = (3/4)*114.700000; // mm^2 VU study
  F0 = .StrengthScaleHumerus*PCSA*.ConstParam.MusStress;
  AnyVar Lf0Temp = 0.100000; //Kamibayashi1998
  Lf0 =Lf0Temp;
  Lt0 = 0.2*Lf0Temp; // Estimated value
  Gamma0 = (pi/180)* 5.000000; //Kamibayashi1998
  Epsilon0 = Epsilon0Temp;
  K1 = K1Temp;
  K2 = K2Temp;
  Fcfast = FcfastTemp;
  Jt = JtTemp;
  Jpe = JpeTemp;
  PEFactor = PEFactorTemp;
};

AnyMuscleModel3E levator_scapulae_2 = {
  AnyVar PCSA = (3/4)*114.700000; // mm^2 VU study
  F0 = .StrengthScaleHumerus*PCSA*.ConstParam.MusStress;
  AnyVar Lf0Temp = 0.100000; //Kamibayashi1998
  Lf0 =Lf0Temp;
  Lt0 = 0.2*Lf0Temp; // Estimated value
  Gamma0 = (pi/180)* 5.000000; //Kamibayashi1998
  Epsilon0 = Epsilon0Temp;
  K1 = K1Temp;
  K2 = K2Temp;
  Fcfast = FcfastTemp;
  Jt = JtTemp;
  Jpe = JpeTemp;
  PEFactor = PEFactorTemp;
};

AnyMuscleModel3E levator_scapulae_3 = {
  AnyVar PCSA = (3/4)*114.700000; // mm^2 VU study
  F0 = .StrengthScaleHumerus*PCSA*.ConstParam.MusStress;
  AnyVar Lf0Temp = 0.100000; //Kamibayashi1998
  Lf0 =Lf0Temp;
  Lt0 = 0.2*Lf0Temp; // Estimated value
  Gamma0 = (pi/180)* 5.000000; //Kamibayashi1998
  Epsilon0 = Epsilon0Temp;
  K1 = K1Temp;
  K2 = K2Temp;
  Fcfast = FcfastTemp;
  Jt = JtTemp;
  Jpe = JpeTemp;
  PEFactor = PEFactorTemp;
};

AnyMuscleModel3E levator_scapulae_4 = {
  AnyVar PCSA = (3/4)*114.700000; // mm^2 VU study
  F0 = .StrengthScaleHumerus*PCSA*.ConstParam.MusStress;
  AnyVar Lf0Temp = 0.100000; //Kamibayashi1998
  Lf0 =Lf0Temp;
  Lt0 = 0.2*Lf0Temp; // Estimated value
  Gamma0 = (pi/180)* 5.000000; //Kamibayashi1998
  Epsilon0 = Epsilon0Temp;
  K1 = K1Temp;
  K2 = K2Temp;
  Fcfast = FcfastTemp;
  Jt = JtTemp;
  Jpe = JpeTemp;
  PEFactor = PEFactorTemp;
};

AnyMuscleModel3E pectoralis_major_thoracic_part_1 = {
  AnyVar PCSA = 130.00000; // mm^2 Holzbaur2005
  F0 = .StrengthScaleHumerus*PCSA*.ConstParam.MusStress;
  AnyVar Lf0Temp = 0.120000; // Estimated value
  Lf0 =Lf0Temp;
  Lt0 = 0.1*Lf0Temp; // Estimated value
  Gamma0 = (pi/180)* 5.000000; // Estimated
  Epsilon0 = Epsilon0Temp;
  K1 = K1Temp;
  K2 = K2Temp;
  Fcfast = FcfastTemp;
  Jt = JtTemp;
  Jpe = JpeTemp;
  PEFactor = PEFactorTemp;
};

AnyMuscleModel3E pectoralis_major_thoracic_part_2 = {
  AnyVar PCSA = 130.00000; // mm^2 Holzbaur2005
  F0 = .StrengthScaleHumerus*PCSA*.ConstParam.MusStress;
  AnyVar Lf0Temp = 0.120000; // Estimated value
  Lt0 = 0.1*Lf0Temp; // Estimated value
  Lf0 =Lf0Temp;
  Gamma0 = (pi/180)* 5.000000; // Estimated
  Epsilon0 = Epsilon0Temp;
  K1 = K1Temp;
  K2 = K2Temp;
  Fcfast = FcfastTemp;
  Jt = JtTemp;
  Jpe = JpeTemp;
  PEFactor = PEFactorTemp;
};

AnyMuscleModel3E pectoralis_major_thoracic_part_3 = {
  AnyVar PCSA = 130.00000; // mm^2 Holzbaur2005
  F0 = .StrengthScaleHumerus*PCSA*.ConstParam.MusStress;
  AnyVar Lf0Temp = 0.120000; // Estimated value
  Lf0 =Lf0Temp;
  Lt0 = 0.1*Lf0Temp; // Estimated value
  Gamma0 = (pi/180)* 5.000000; // Estimated
  Epsilon0 = Epsilon0Temp;
  K1 = K1Temp;
  K2 = K2Temp;
  Fcfast = FcfastTemp;
  Jt = JtTemp;
  Jpe = JpeTemp;
  PEFactor = PEFactorTemp;
};

AnyMuscleModel3E pectoralis_major_thoracic_part_4 = {
  AnyVar PCSA = 130.00000; // mm^2 Holzbaur2005
  F0 = .StrengthScaleHumerus*PCSA*.ConstParam.MusStress;
  AnyVar Lf0Temp = 0.120000; // Estimated value
  Lf0 =Lf0Temp;
  Lt0 = 0.1*Lf0Temp; // Estimated value
  Gamma0 = (pi/180)* 5.000000; // Estimated
  Epsilon0 = Epsilon0Temp;
  K1 = K1Temp;
  K2 = K2Temp;
  Fcfast = FcfastTemp;
  Jt = JtTemp;
  Jpe = JpeTemp;
  PEFactor = PEFactorTemp;
};

AnyMuscleModel3E pectoralis_major_thoracic_part_5 = {
  AnyVar PCSA = 130.00000; // mm^2 Holzbaur2005
  F0 = .StrengthScaleHumerus*PCSA*.ConstParam.MusStress;
  AnyVar Lf0Temp = 0.120000; // Estimated value
  Lf0 =Lf0Temp;
  Lt0 = 0.1*Lf0Temp; // Estimated value
  Gamma0 = (pi/180)* 5.000000; // Estimated
  Epsilon0 = Epsilon0Temp;
  K1 = K1Temp;
  K2 = K2Temp;
  Fcfast = FcfastTemp;
  Jt = JtTemp;
  Jpe = JpeTemp;
  PEFactor = PEFactorTemp;
};

AnyMuscleModel3E pectoralis_major_clavicular_part_1 = {
  AnyVar PCSA = 52.00000; // mm^2 Holzbaur2005
  F0 = .StrengthScaleHumerus*PCSA*.ConstParam.MusStress;
  AnyVar Lf0Temp = 0.120000; // Estimated value
  Lf0 =Lf0Temp;
  Lt0 = 0.1*Lf0Temp; // Estimated value
  Gamma0 = (pi/180)* 5.000000; // Estimated
  Epsilon0 = Epsilon0Temp;
  K1 = K1Temp;
  K2 = K2Temp;
  Fcfast = FcfastTemp;
  Jt = JtTemp;
  Jpe = JpeTemp;
  PEFactor = PEFactorTemp;
};

AnyMuscleModel3E pectoralis_major_clavicular_part_2 = {
  AnyVar PCSA = 52.00000; // mm^2 Holzbaur2005

  F0 = .StrengthScaleHumerus*PCSA*.ConstParam.MusStress;
  AnyVar Lf0Temp = 0.120000; // Estimated value
  Lf0 =Lf0Temp;
  Lt0 = 0.1*Lf0Temp; // Estimated value
  Gamma0 = (pi/180)* 5.000000; // Estimated
  Epsilon0 = Epsilon0Temp;
  K1 = K1Temp;
  K2 = K2Temp;
  Fcfast = FcfastTemp;
  Jt = JtTemp;
  Jpe = JpeTemp;
  PEFactor = PEFactorTemp;
};

AnyMuscleModel3E pectoralis_major_clavicular_part_3 = {
  AnyVar PCSA = 52.00000; // mm^2 Holzbaur2005
  F0 = .StrengthScaleHumerus*PCSA*.ConstParam.MusStress;
  AnyVar Lf0Temp = 0.120000; // Estimated value
  Lt0 = 0.1*Lf0Temp; // Estimated value
  Lf0 =Lf0Temp;
  Gamma0 = (pi/180)* 5.000000; // Estimated
  Epsilon0 = Epsilon0Temp;
  K1 = K1Temp;
  K2 = K2Temp;
  Fcfast = FcfastTemp;
  Jt = JtTemp;
  Jpe = JpeTemp;
  PEFactor = PEFactorTemp;
};

AnyMuscleModel3E pectoralis_major_clavicular_part_4 = {
  AnyVar PCSA = 52.00000; // mm^2 Holzbaur2005
  F0 = .StrengthScaleHumerus*PCSA*.ConstParam.MusStress;
  AnyVar Lf0Temp = 0.120000; // Estimated value
  Lt0 = 0.1*Lf0Temp; // Estimated value
  Lf0 =Lf0Temp;
  Gamma0 = (pi/180)* 5.000000; // Estimated
  Epsilon0 = Epsilon0Temp;
  K1 = K1Temp;
  K2 = K2Temp;
  Fcfast = FcfastTemp;
  Jt = JtTemp;
  Jpe = JpeTemp;
  PEFactor = PEFactorTemp;
};

AnyMuscleModel3E pectoralis_major_clavicular_part_5 = {
  AnyVar PCSA = 52.00000; // mm^2 Holzbaur2005
  F0 = .StrengthScaleHumerus*PCSA*.ConstParam.MusStress;
  AnyVar Lf0Temp = 0.120000; // Estimated value
  Lt0 = 0.1*Lf0Temp; // Estimated value
  Lf0 =Lf0Temp;
  Gamma0 = (pi/180)* 5.000000; // Estimated
  Epsilon0 = Epsilon0Temp;
  K1 = K1Temp;
  K2 = K2Temp;
  Fcfast = FcfastTemp;
  Jt = JtTemp;
  Jpe = JpeTemp;
  PEFactor = PEFactorTemp;
};

AnyMuscleModel3E pectoralis_minor_1 = {
  AnyVar PCSA = 85.700000; // mm^2 VU study
  F0 = .StrengthScaleHumerus*PCSA*.ConstParam.MusStress;
  AnyVar Lf0Temp = 0.080000; // Estimated value
  Lf0 =Lf0Temp;
  Lt0 = 0.1*Lf0Temp; // Estimated value
  Gamma0 = (pi/180)* 5.000000; // Estimated
  Epsilon0 = Epsilon0Temp;
  K1 = K1Temp;
  K2 = K2Temp;
  Fcfast = FcfastTemp;
  Jt = JtTemp;
  Jpe = JpeTemp;
  PEFactor = PEFactorTemp;
};

AnyMuscleModel3E pectoralis_minor_2 = {
  AnyVar PCSA = 85.700000; // mm^2 VU study
  F0 = .StrengthScaleHumerus*PCSA*.ConstParam.MusStress;
  AnyVar Lf0Temp = 0.080000; // Estimated value
  Lt0 = 0.1*Lf0Temp; // Estimated value
  Lf0 =Lf0Temp;
  Gamma0 = (pi/180)* 5.000000; // Estimated
  Epsilon0 = Epsilon0Temp;
  K1 = K1Temp;
  K2 = K2Temp;
  Fcfast = FcfastTemp;
  Jt = JtTemp;
  Jpe = JpeTemp;
  PEFactor = PEFactorTemp;
};

AnyMuscleModel3E pectoralis_minor_3 = {
  AnyVar PCSA = 85.700000; // mm^2 VU study
  F0 = .StrengthScaleHumerus*PCSA*.ConstParam.MusStress;
  AnyVar Lf0Temp = 0.080000; // Estimated value
  Lf0 =Lf0Temp;
  Lt0 = 0.1*Lf0Temp; // Estimated value
  Gamma0 = (pi/180)* 5.000000; // Estimated
  Epsilon0 = Epsilon0Temp;
  K1 = K1Temp;
  K2 = K2Temp;
  Fcfast = FcfastTemp;
  Jt = JtTemp;
  Jpe = JpeTemp;
  PEFactor = PEFactorTemp;
};

AnyMuscleModel3E pectoralis_minor_4 = {
  AnyVar PCSA = 85.700000; // mm^2 VU study
  F0 = .StrengthScaleHumerus*PCSA*.ConstParam.MusStress;
  AnyVar Lf0Temp = 0.080000; // Estimated value
  Lt0 = 0.1*Lf0Temp; // Estimated value
  Lf0 =Lf0Temp;
  Gamma0 = (pi/180)* 5.000000; // Estimated
  Epsilon0 = Epsilon0Temp;
  K1 = K1Temp;
  K2 = K2Temp;
  Fcfast = FcfastTemp;
  Jt = JtTemp;
  Jpe = JpeTemp;
  PEFactor = PEFactorTemp;
};

AnyMuscleModel3E rhomboideus_1 = {
  AnyVar PCSA = 252.300000; // mm^2 VU study
  F0 = .StrengthScaleHumerus*PCSA*.ConstParam.MusStress;
  AnyVar Lf0Temp = 0.068; //Kamibayashi1998
  Lt0 = 0.2*Lf0Temp;
  Lf0 =Lf0Temp;
  Gamma0 = (pi/180)* 5.000000; //Kamibayashi1998
  Epsilon0 = Epsilon0Temp;
  K1 = K1Temp;
  K2 = K2Temp;
  Fcfast = FcfastTemp;
  Jt = JtTemp;
  Jpe = JpeTemp;
  PEFactor = PEFactorTemp;
};

AnyMuscleModel3E rhomboideus_2 = {
  AnyVar PCSA = 252.300000; // mm^2 VU study
  F0 = .StrengthScaleHumerus*PCSA*.ConstParam.MusStress;
  AnyVar Lf0Temp = 0.068; //Kamibayashi1998
  Lf0 =Lf0Temp;
  Lt0 = 0.2*Lf0Temp;
  Gamma0 = (pi/180)* 5.000000; //Kamibayashi1998
  Epsilon0 = Epsilon0Temp;
  K1 = K1Temp;
  K2 = K2Temp;
  Fcfast = FcfastTemp;
  Jt = JtTemp;
  Jpe = JpeTemp;
  PEFactor = PEFactorTemp;
};

AnyMuscleModel3E rhomboideus_3 = {
  AnyVar PCSA = 252.300000; // mm^2 VU study
  F0 = .StrengthScaleHumerus*PCSA*.ConstParam.MusStress;
  AnyVar Lf0Temp = 0.068; //Kamibayashi1998
  Lf0 =Lf0Temp;
  Lt0 = 0.2*Lf0Temp;
  Gamma0 = (pi/180)* 5.000000; //Kamibayashi1998
  Epsilon0 = Epsilon0Temp;
  K1 = K1Temp;
  K2 = K2Temp;
  Fcfast = FcfastTemp;
  Jt = JtTemp;
  Jpe = JpeTemp;
  PEFactor = PEFactorTemp;
};

AnyMuscleModel3E serratus_anterior_1 = {
  AnyVar PCSA = 190.500000; // mm^2 VU study
  F0 = .StrengthScaleHumerus*PCSA*.ConstParam.MusStress;
  AnyVar Lf0Temp = 0.073; // Estimated
  Lf0 =Lf0Temp;
  Lt0 = 0.1*Lf0Temp; // Estimated
  Gamma0 = (pi/180)* 0.000000; // Estimated
  Epsilon0 = Epsilon0Temp;
  K1 = K1Temp;
  K2 = K2Temp;
  Fcfast = FcfastTemp;
  Jt = JtTemp;
  Jpe = JpeTemp;
  PEFactor = PEFactorTemp;
};

AnyMuscleModel3E serratus_anterior_2 = {
  AnyVar PCSA = 190.500000; // mm^2 VU study
  F0 = .StrengthScaleHumerus*PCSA*.ConstParam.MusStress;
  AnyVar Lf0Temp = 0.073; // Estimated
  Lf0 =Lf0Temp;
  Lt0 = 0.1*Lf0Temp; // Estimated
  Gamma0 = (pi/180)* 0.000000; // Estimated
  Epsilon0 = Epsilon0Temp;
  K1 = K1Temp;
  K2 = K2Temp;
  Fcfast = FcfastTemp;
  Jt = JtTemp;
  Jpe = JpeTemp;
  PEFactor = PEFactorTemp;
};

AnyMuscleModel3E serratus_anterior_3 = {
  AnyVar PCSA = 190.500000; // mm^2 VU study
  F0 = .StrengthScaleHumerus*PCSA*.ConstParam.MusStress;
  AnyVar Lf0Temp = 0.073; // Estimated
  Lf0 =Lf0Temp;
  Lt0 = 0.1*Lf0Temp; // Estimated
  Gamma0 = (pi/180)* 0.000000; // Estimated
  Epsilon0 = Epsilon0Temp;
  K1 = K1Temp;
  K2 = K2Temp;
  Fcfast = FcfastTemp;
  Jt = JtTemp;
  Jpe = JpeTemp;
  PEFactor = PEFactorTemp;
};

AnyMuscleModel3E serratus_anterior_4 = {
  AnyVar PCSA = 190.500000; // mm^2 VU study
  F0 = .StrengthScaleHumerus*PCSA*.ConstParam.MusStress;
  AnyVar Lf0Temp = 0.073; // Estimated
  Lf0 =Lf0Temp;
  Lt0 = 0.1*Lf0Temp; // Estimated
  Gamma0 = (pi/180)* 0.000000; // Estimated
  Epsilon0 = Epsilon0Temp;
  K1 = K1Temp;
  K2 = K2Temp;
  Fcfast = FcfastTemp;
  Jt = JtTemp;
  Jpe = JpeTemp;
  PEFactor = PEFactorTemp;
};

AnyMuscleModel3E serratus_anterior_5 = {
  AnyVar PCSA = 190.500000; // mm^2 VU study
  F0 = .StrengthScaleHumerus*PCSA*.ConstParam.MusStress;
  AnyVar Lf0Temp = 0.073; // Estimated
  Lf0 =Lf0Temp;
  Lt0 = 0.1*Lf0Temp; // Estimated
  Gamma0 = (pi/180)* 0.000000; // Estimated
  Epsilon0 = Epsilon0Temp;
  K1 = K1Temp;
  K2 = K2Temp;
  Fcfast = FcfastTemp;
  Jt = JtTemp;
  Jpe = JpeTemp;
  PEFactor = PEFactorTemp;
};

AnyMuscleModel3E serratus_anterior_6 = {
  AnyVar PCSA = 190.500000; // mm^2 VU study
  F0 = .StrengthScaleHumerus*PCSA*.ConstParam.MusStress;
  AnyVar Lf0Temp = 0.073; // Estimated
  Lf0 =Lf0Temp;
  Lt0 = 0.1*Lf0Temp; // Estimated
  Gamma0 = (pi/180)* 0.000000; // Estimated
  Epsilon0 = Epsilon0Temp;
  K1 = K1Temp;
  K2 = K2Temp;
  Fcfast = FcfastTemp;
  Jt = JtTemp;
  Jpe = JpeTemp;
  PEFactor = PEFactorTemp;
};


//Moved from neck model
AnyMuscleModel SternocleidomastoidPar = {
  AnyVar PCSA = 4.92/2 * 100; //Physiological Cross Sectional Area in mm2
  F0 = .StrengthScaleHumerus*PCSA*.ConstParam.MusStress;
};


AnyMuscleModel3E subscapularis_1 = {
  AnyVar PCSA = 250.000000; // mm^2 VU study
  F0 = .StrengthScaleHumerus*PCSA*.ConstParam.MusStress;
  AnyVar Lf0Temp = 0.080; //Guesstimate
  Lf0 =Lf0Temp;
  Lt0 = 0.5*Lf0Temp;
  Gamma0 = (pi/180)* 4.000000;
  Epsilon0 = Epsilon0Temp;
  K1 = K1Temp;
  K2 = K2Temp;
  Fcfast = FcfastTemp;
  Jt = JtTemp;
  Jpe = JpeTemp;
  PEFactor = PEFactorTemp;
};

AnyMuscleModel3E subscapularis_2 = {
  AnyVar PCSA = 250.000000; // mm^2 VU study
  F0 = .StrengthScaleHumerus*PCSA*.ConstParam.MusStress;
  AnyVar Lf0Temp = 0.080; //Guesstimate
  Lf0 =Lf0Temp;
  Lt0 = 0.5*Lf0Temp;
  Gamma0 = (pi/180)* 4.000000;
  Epsilon0 = Epsilon0Temp;
  K1 = K1Temp;
  K2 = K2Temp;
  Fcfast = FcfastTemp;
  Jt = JtTemp;
  Jpe = JpeTemp;
  PEFactor = PEFactorTemp;
};

AnyMuscleModel3E subscapularis_3 = {
  AnyVar PCSA = 250.000000; // mm^2 VU study
  F0 = .StrengthScaleHumerus*PCSA*.ConstParam.MusStress;
  AnyVar Lf0Temp = 0.080; //Guesstimate
  Lf0 =Lf0Temp;
  Lt0 = 0.5*Lf0Temp;
  Gamma0 = (pi/180)* 4.000000;
  Epsilon0 = Epsilon0Temp;
  K1 = K1Temp;
  K2 = K2Temp;
  Fcfast = FcfastTemp;
  Jt = JtTemp;
  Jpe = JpeTemp;
  PEFactor = PEFactorTemp;
};

AnyMuscleModel3E subscapularis_4 = {
  AnyVar PCSA = 250.000000; // mm^2 VU study
  F0 = .StrengthScaleHumerus*PCSA*.ConstParam.MusStress;
  AnyVar Lf0Temp = 0.080; //Guesstimate
  Lf0 =Lf0Temp;
  Lt0 = 0.5*Lf0Temp;
  Gamma0 = (pi/180)* 4.000000;
  Epsilon0 = Epsilon0Temp;
  K1 = K1Temp;
  K2 = K2Temp;
  Fcfast = FcfastTemp;
  Jt = JtTemp;
  Jpe = JpeTemp;
  PEFactor = PEFactorTemp;
};

AnyMuscleModel3E subscapularis_5 = {
  AnyVar PCSA = 250.000000; // mm^2 VU study
  F0 = .StrengthScaleHumerus*PCSA*.ConstParam.MusStress;
  AnyVar Lf0Temp = 0.080; //Guesstimate
  Lf0 =Lf0Temp;
  Lt0 = 0.5*Lf0Temp;
  Gamma0 = (pi/180)* 4.000000;
  Epsilon0 = Epsilon0Temp;
  K1 = K1Temp;
  K2 = K2Temp;
  Fcfast = FcfastTemp;
  Jt = JtTemp;
  Jpe = JpeTemp;
  PEFactor = PEFactorTemp;
};

AnyMuscleModel3E subscapularis_6 = {
  AnyVar PCSA = 250.000000; // mm^2 VU study
  F0 = .StrengthScaleHumerus*PCSA*.ConstParam.MusStress;
  AnyVar Lf0Temp = 0.080; //Guesstimate
  Lf0 =Lf0Temp;
  Lt0 = 0.5*Lf0Temp;
  Gamma0 = (pi/180)* 4.000000;
  Epsilon0 = Epsilon0Temp;
  K1 = K1Temp;
  K2 = K2Temp;
  Fcfast = FcfastTemp;
  Jt = JtTemp;
  Jpe = JpeTemp;
  PEFactor = PEFactorTemp;
};

AnyMuscleModel3E supraspinatus_1 = {
  AnyVar PCSA = 78.000000; // mm^2 VU study
  F0 = .StrengthScaleHumerus*PCSA*.ConstParam.MusStress;
  AnyVar Lf0Temp = 0.0470; // Juul-Kristensen2000
  Lf0 =Lf0Temp;
  Lt0 = 0.08*Lf0Temp; // Estimated
  Gamma0 = (pi/180)* 0.000000; // Estimated
  Epsilon0 = Epsilon0Temp;
  K1 = K1Temp;
  K2 = K2Temp;
  Fcfast = FcfastTemp;
  Jt = JtTemp;
  Jpe = JpeTemp;
  PEFactor = PEFactorTemp;
};

AnyMuscleModel3E supraspinatus_2 = {
  AnyVar PCSA = 78.000000; // mm^2 VU study
  F0 = .StrengthScaleHumerus*PCSA*.ConstParam.MusStress;
  AnyVar Lf0Temp = 0.0470; // Juul-Kristensen2000
  Lf0 =Lf0Temp;
  Lt0 = 0.08*Lf0Temp; // Estimated
  Gamma0 = (pi/180)* 0.000000; // Estimated
  Epsilon0 = Epsilon0Temp;
  K1 = K1Temp;
  K2 = K2Temp;
  Fcfast = FcfastTemp;
  Jt = JtTemp;
  Jpe = JpeTemp;
  PEFactor = PEFactorTemp;
};

AnyMuscleModel3E supraspinatus_3 = {
  AnyVar PCSA = 78.000000; // mm^2 VU study
  F0 = .StrengthScaleHumerus*PCSA*.ConstParam.MusStress;
  AnyVar Lf0Temp = 0.0470; // Juul-Kristensen2000
  Lf0 =Lf0Temp;
  Lt0 = 0.08*Lf0Temp; // Estimated
  Gamma0 = (pi/180)* 0.000000; // Estimated
  Epsilon0 = Epsilon0Temp;
  K1 = K1Temp;
  K2 = K2Temp;
  Fcfast = FcfastTemp;
  Jt = JtTemp;
  Jpe = JpeTemp;
  PEFactor = PEFactorTemp;
};

AnyMuscleModel3E supraspinatus_4 = {
  AnyVar PCSA = 78.000000; // mm^2 VU study
  F0 = .StrengthScaleHumerus*PCSA*.ConstParam.MusStress;
  AnyVar Lf0Temp = 0.0470; // Juul-Kristensen2000
  Lf0 =Lf0Temp;
  Lt0 = 0.08*Lf0Temp; // Estimated
  Gamma0 = (pi/180)* 0.000000; // Estimated
  Epsilon0 = Epsilon0Temp;
  K1 = K1Temp;
  K2 = K2Temp;
  Fcfast = FcfastTemp;
  Jt = JtTemp;
  Jpe = JpeTemp;
  PEFactor = PEFactorTemp;
};

AnyMuscleModel3E supraspinatus_5 = {
  AnyVar PCSA = 78.000000; // mm^2 VU study
  F0 = .StrengthScaleHumerus*PCSA*.ConstParam.MusStress;
  AnyVar Lf0Temp = 0.0470; // Juul-Kristensen2000
  Lf0 =Lf0Temp;
  Lt0 = 0.08*Lf0Temp; // Estimated
  Gamma0 = (pi/180)* 0.000000; // Estimated
  Epsilon0 = Epsilon0Temp;
  K1 = K1Temp;
  K2 = K2Temp;
  Fcfast = FcfastTemp;
  Jt = JtTemp;
  Jpe = JpeTemp;
  PEFactor = PEFactorTemp;
};

AnyMuscleModel3E supraspinatus_6 = {
  AnyVar PCSA = 78.000000; // mm^2 VU study
  F0 = .StrengthScaleHumerus*PCSA*.ConstParam.MusStress;
  AnyVar Lf0Temp = 0.0470; // Juul-Kristensen2000
  Lf0 =Lf0Temp;
  Lt0 = 0.08*Lf0Temp; // Estimated
  Gamma0 = (pi/180)* 0.000000; // Estimated
  Epsilon0 = Epsilon0Temp;
  K1 = K1Temp;
  K2 = K2Temp;
  Fcfast = FcfastTemp;
  Jt = JtTemp;
  Jpe = JpeTemp;
  PEFactor = PEFactorTemp;
};

AnyMuscleModel3E teres_major_1 = {
  AnyVar PCSA = 50.00000; //Holzbaur2005
  F0 = .StrengthScaleHumerus*PCSA*.ConstParam.MusStress;
  AnyVar Lf0Temp = 0.100000; // Estimated
  Lf0 =Lf0Temp;
  Lt0 = 0.1*Lf0Temp;
  Gamma0 = (pi/180)* 2.000000;
  Epsilon0 = Epsilon0Temp;
  K1 = K1Temp;
  K2 = K2Temp;
  Fcfast = FcfastTemp;
  Jt = JtTemp;
  Jpe = JpeTemp;
  PEFactor = PEFactorTemp;
};

AnyMuscleModel3E teres_major_2 = {
  AnyVar PCSA = 50.00000; //Holzbaur2005
  F0 = .StrengthScaleHumerus*PCSA*.ConstParam.MusStress;
  AnyVar Lf0Temp = 0.100000; // Estimated
  Lf0 =Lf0Temp;
  Lt0 = 0.1*Lf0Temp;
  Gamma0 = (pi/180)* 2.000000;
  Epsilon0 = Epsilon0Temp;
  K1 = K1Temp;
  K2 = K2Temp;
  Fcfast = FcfastTemp;
  Jt = JtTemp;
  Jpe = JpeTemp;
  PEFactor = PEFactorTemp;
};

AnyMuscleModel3E teres_major_3 = {
  AnyVar PCSA = 50.00000; //Holzbaur2005
  F0 = .StrengthScaleHumerus*PCSA*.ConstParam.MusStress;
  AnyVar Lf0Temp = 0.100000; // Estimated
  Lf0 =Lf0Temp;
  Lt0 = 0.1*Lf0Temp;
  Gamma0 = (pi/180)* 2.000000;
  Epsilon0 = Epsilon0Temp;
  K1 = K1Temp;
  K2 = K2Temp;
  Fcfast = FcfastTemp;
  Jt = JtTemp;
  Jpe = JpeTemp;
  PEFactor = PEFactorTemp;
};

AnyMuscleModel3E teres_major_4 = {
  AnyVar PCSA = 50.00000; //Holzbaur2005
  F0 = .StrengthScaleHumerus*PCSA*.ConstParam.MusStress;
  AnyVar Lf0Temp = 0.100000; // Estimated
  Lf0 =Lf0Temp;
  Lt0 = 0.1*Lf0Temp;
  Gamma0 = (pi/180)* 2.000000;
  Epsilon0 = Epsilon0Temp;
  K1 = K1Temp;
  K2 = K2Temp;
  Fcfast = FcfastTemp;
  Jt = JtTemp;
  Jpe = JpeTemp;
  PEFactor = PEFactorTemp;
};

AnyMuscleModel3E teres_major_5 = {
  AnyVar PCSA = 50.00000; //Holzbaur2005
  F0 = .StrengthScaleHumerus*PCSA*.ConstParam.MusStress;
  AnyVar Lf0Temp = 0.100000; // Estimated
  Lf0 =Lf0Temp;
  Lt0 = 0.1*Lf0Temp;
  Gamma0 = (pi/180)* 2.000000;
  Epsilon0 = Epsilon0Temp;
  K1 = K1Temp;
  K2 = K2Temp;
  Fcfast = FcfastTemp;
  Jt = JtTemp;
  Jpe = JpeTemp;
  PEFactor = PEFactorTemp;
};

AnyMuscleModel3E teres_major_6 = {
  AnyVar PCSA = 50.00000; //Holzbaur2005
  F0 = .StrengthScaleHumerus*PCSA*.ConstParam.MusStress;
  AnyVar Lf0Temp = 0.100000; // Estimated
  Lf0 =Lf0Temp;
  Lt0 = 0.1*Lf0Temp;
  Gamma0 = (pi/180)* 2.000000;
  Epsilon0 = Epsilon0Temp;
  K1 = K1Temp;
  K2 = K2Temp;
  Fcfast = FcfastTemp;
  Jt = JtTemp;
  Jpe = JpeTemp;
  PEFactor = PEFactorTemp;
};

AnyMuscleModel3E teres_minor_1 = {
  AnyVar PCSA = 51.600000; // mm^2 VU study
  F0 = .StrengthScaleHumerus*PCSA*.ConstParam.MusStress;
  AnyVar Lf0Temp = 0.07000; // Estimated
  Lf0 =Lf0Temp;
  Lt0 = 0.1*Lf0Temp; // Estimated
  Gamma0 = (pi/180)* 2.000000; // Estimated
  Epsilon0 = Epsilon0Temp;
  K1 = K1Temp;
  K2 = K2Temp;
  Fcfast = FcfastTemp;
  Jt = JtTemp;
  Jpe = JpeTemp;
  PEFactor = PEFactorTemp;
};

AnyMuscleModel3E teres_minor_2 = {
  AnyVar PCSA = 51.600000; // mm^2 VU study
  F0 = .StrengthScaleHumerus*PCSA*.ConstParam.MusStress;
  AnyVar Lf0Temp = 0.07000; // Estimated
  Lf0 =Lf0Temp;
  Lt0 = 0.1*Lf0Temp; // Estimated
  Gamma0 = (pi/180)* 2.000000; // Estimated
  Epsilon0 = Epsilon0Temp;
  K1 = K1Temp;
  K2 = K2Temp;
  Fcfast = FcfastTemp;
  Jt = JtTemp;
  Jpe = JpeTemp;
  PEFactor = PEFactorTemp;
};

AnyMuscleModel3E teres_minor_3 = {
  AnyVar PCSA = 51.600000; // mm^2 VU study
  F0 = .StrengthScaleHumerus*PCSA*.ConstParam.MusStress;
  AnyVar Lf0Temp = 0.07000; // Estimated
  Lt0 = 0.1*Lf0Temp; // Estimated
  Lf0 =Lf0Temp;
  Gamma0 = (pi/180)* 2.000000; // Estimated
  Epsilon0 = Epsilon0Temp;
  K1 = K1Temp;
  K2 = K2Temp;
  Fcfast = FcfastTemp;
  Jt = JtTemp;
  Jpe = JpeTemp;
  PEFactor = PEFactorTemp;
};

AnyMuscleModel3E teres_minor_4 = {
  AnyVar PCSA = 51.600000; // mm^2 VU study
  F0 = .StrengthScaleHumerus*PCSA*.ConstParam.MusStress;
  AnyVar Lf0Temp = 0.07000; // Estimated
  Lf0 =Lf0Temp;
  Lt0 = 0.1*Lf0Temp; // Estimated
  Gamma0 = (pi/180)* 2.000000; // Estimated
  Epsilon0 = Epsilon0Temp;
  K1 = K1Temp;
  K2 = K2Temp;
  Fcfast = FcfastTemp;
  Jt = JtTemp;
  Jpe = JpeTemp;
  PEFactor = PEFactorTemp;
};

AnyMuscleModel3E teres_minor_5 = {
  AnyVar PCSA = 51.600000; // mm^2 VU study
  F0 = .StrengthScaleHumerus*PCSA*.ConstParam.MusStress;
  AnyVar Lf0Temp = 0.07000; // Estimated
  Lf0 =Lf0Temp;
  Lt0 = 0.1*Lf0Temp; // Estimated
  Gamma0 = (pi/180)* 2.000000; // Estimated
  Epsilon0 = Epsilon0Temp;
  K1 = K1Temp;
  K2 = K2Temp;
  Fcfast = FcfastTemp;
  Jt = JtTemp;
  Jpe = JpeTemp;
  PEFactor = PEFactorTemp;
};

AnyMuscleModel3E teres_minor_6 = {
  AnyVar PCSA = 51.600000; // mm^2 VU study
  F0 = .StrengthScaleHumerus*PCSA*.ConstParam.MusStress;
  AnyVar Lf0Temp = 0.07000; // Estimated
  Lf0 =Lf0Temp;
  Lt0 = 0.1*Lf0Temp; // Estimated
  Gamma0 = (pi/180)* 2.000000; // Estimated
  Epsilon0 = Epsilon0Temp;
  K1 = K1Temp;
  K2 = K2Temp;
  Fcfast = FcfastTemp;
  Jt = JtTemp;
  Jpe = JpeTemp;
  PEFactor = PEFactorTemp;
};

AnyMuscleModel3E trapezius_scapular_part_1 = {
  AnyVar PCSA = 145.500000; // mm^2 VU study
  F0 = .StrengthScaleHumerus*PCSA*.ConstParam.MusStress;
  AnyVar Lf0Temp = 0.10000;
  Lf0 =Lf0Temp;
  Lt0 = 0.2*Lf0Temp;
  Gamma0 = (pi/180)* 10.000000; // Yamaguchi
  Epsilon0 = Epsilon0Temp;
  K1 = K1Temp;
  K2 = K2Temp;
  Fcfast = FcfastTemp;
  Jt = JtTemp;
  Jpe = JpeTemp;
  PEFactor = PEFactorTemp;
};

AnyMuscleModel3E trapezius_scapular_part_2 = {
  AnyVar PCSA = 145.500000; // mm^2 VU study
  F0 = .StrengthScaleHumerus*PCSA*.ConstParam.MusStress;
  AnyVar Lf0Temp = 0.10000;
  Lf0 =Lf0Temp;
  Lt0 = 0.2*Lf0Temp;
  Gamma0 = (pi/180)* 10.000000; // Yamaguchi
  Epsilon0 = Epsilon0Temp;
  K1 = K1Temp;
  K2 = K2Temp;
  Fcfast = FcfastTemp;
  Jt = JtTemp;
  Jpe = JpeTemp;
  PEFactor = PEFactorTemp;
};

AnyMuscleModel3E trapezius_scapular_part_3 = {
  AnyVar PCSA = 145.500000; // mm^2 VU study
  F0 = .StrengthScaleHumerus*PCSA*.ConstParam.MusStress;
  AnyVar Lf0Temp = 0.10000;
  Lf0 =Lf0Temp;
  Lt0 = 0.2*Lf0Temp;
  Gamma0 = (pi/180)* 10.000000; // Yamaguchi
  Epsilon0 = Epsilon0Temp;
  K1 = K1Temp;
  K2 = K2Temp;
  Fcfast = FcfastTemp;
  Jt = JtTemp;
  Jpe = JpeTemp;
  PEFactor = PEFactorTemp;
};

AnyMuscleModel3E trapezius_scapular_part_4 = {
  AnyVar PCSA = 145.500000; // mm^2 VU study
  F0 = .StrengthScaleHumerus*PCSA*.ConstParam.MusStress;
  AnyVar Lf0Temp = 0.10000;
  Lf0 =Lf0Temp;
  Lt0 = 0.2*Lf0Temp;
  Gamma0 = (pi/180)* 10.000000; // Yamaguchi
  Epsilon0 = Epsilon0Temp;
  K1 = K1Temp;
  K2 = K2Temp;
  Fcfast = FcfastTemp;
  Jt = JtTemp;
  Jpe = JpeTemp;
  PEFactor = PEFactorTemp;
};

AnyMuscleModel3E trapezius_scapular_part_5 = {
  AnyVar PCSA = 145.500000; // mm^2 VU study
  F0 = .StrengthScaleHumerus*PCSA*.ConstParam.MusStress;
  AnyVar Lf0Temp = 0.10000;
  Lf0 =Lf0Temp;
  Lt0 = 0.2*Lf0Temp;
  Gamma0 = (pi/180)* 10.000000; // Yamaguchi
  Epsilon0 = Epsilon0Temp;
  K1 = K1Temp;
  K2 = K2Temp;
  Fcfast = FcfastTemp;
  Jt = JtTemp;
  Jpe = JpeTemp;
  PEFactor = PEFactorTemp;
};

AnyMuscleModel3E trapezius_scapular_part_6 = {
  AnyVar PCSA = 145.500000; // mm^2 VU study
  F0 = .StrengthScaleHumerus*PCSA*.ConstParam.MusStress;
  AnyVar Lf0Temp = 0.10000;
  Lf0 =Lf0Temp;
  Lt0 = 0.2*Lf0Temp;
  Gamma0 = (pi/180)* 10.000000; // Yamaguchi
  Epsilon0 = Epsilon0Temp;
  K1 = K1Temp;
  K2 = K2Temp;
  Fcfast = FcfastTemp;
  Jt = JtTemp;
  Jpe = JpeTemp;
  PEFactor = PEFactorTemp;
};

AnyMuscleModel3E trapezius_clavicular_part_1 = {
  AnyVar PCSA = 145.500000; // mm^2 VU study
  F0 = .StrengthScaleHumerus*PCSA*.ConstParam.MusStress;
  AnyVar Lf0Temp = 0.10000;
  Lf0 =Lf0Temp;
  Lt0 = 0.1*Lf0Temp;
  Gamma0 = (pi/180)* 10.000000; // Yamaguchi
  Epsilon0 = Epsilon0Temp;
  K1 = K1Temp;
  K2 = K2Temp;
  Fcfast = FcfastTemp;
  Jt = JtTemp;
  Jpe = JpeTemp;
  PEFactor = PEFactorTemp;
};

AnyMuscleModel3E trapezius_clavicular_part_2 = {
  AnyVar PCSA = 145.500000; // mm^2 VU study
  F0 = .StrengthScaleHumerus*PCSA*.ConstParam.MusStress;
  AnyVar Lf0Temp = 0.10000;
  Lf0 =Lf0Temp;
  Lt0 = 0.1*Lf0Temp;
  Gamma0 = (pi/180)* 10.000000; // Yamaguchi
  Epsilon0 = Epsilon0Temp;
  K1 = K1Temp;
  K2 = K2Temp;
  Fcfast = FcfastTemp;
  Jt = JtTemp;
  Jpe = JpeTemp;
  PEFactor = PEFactorTemp;
};

AnyMuscleModel3E trapezius_clavicular_part_3 = {
  AnyVar PCSA = 145.500000; // mm^2 VU study
  F0 = .StrengthScaleHumerus*PCSA*.ConstParam.MusStress;
  AnyVar Lf0Temp = 0.10000;
  Lf0 =Lf0Temp;
  Lt0 = 0.1*Lf0Temp;
  Gamma0 = (pi/180)* 10.000000; // Yamaguchi
  Epsilon0 = Epsilon0Temp;
  K1 = K1Temp;
  K2 = K2Temp;
  Fcfast = FcfastTemp;
  Jt = JtTemp;
  Jpe = JpeTemp;
  PEFactor = PEFactorTemp;
};

AnyMuscleModel3E trapezius_clavicular_part_4 = {
  AnyVar PCSA = 145.500000; // mm^2 VU study
  F0 = .StrengthScaleHumerus*PCSA*.ConstParam.MusStress;
  AnyVar Lf0Temp = 0.10000;
  Lf0 =Lf0Temp;
  Lt0 = 0.1*Lf0Temp;
  Gamma0 = (pi/180)* 10.000000; // Yamaguchi
  Epsilon0 = Epsilon0Temp;
  K1 = K1Temp;
  K2 = K2Temp;
  Fcfast = FcfastTemp;
  Jt = JtTemp;
  Jpe = JpeTemp;
  PEFactor = PEFactorTemp;
};

AnyMuscleModel3E trapezius_clavicular_part_5 = {
  AnyVar PCSA = 145.500000; // mm^2 VU study
  F0 = .StrengthScaleHumerus*PCSA*.ConstParam.MusStress;
  AnyVar Lf0Temp = 0.10000;
  Lf0 =Lf0Temp;
  Lt0 = 0.1*Lf0Temp;
  Gamma0 = (pi/180)* 10.000000; // Yamaguchi
  Epsilon0 = Epsilon0Temp;
  K1 = K1Temp;
  K2 = K2Temp;
  Fcfast = FcfastTemp;
  Jt = JtTemp;
  Jpe = JpeTemp;
  PEFactor = PEFactorTemp;
};

AnyMuscleModel3E trapezius_clavicular_part_6 = {
  AnyVar PCSA = 145.500000; // mm^2 VU study
  F0 = .StrengthScaleHumerus*PCSA*.ConstParam.MusStress;
  AnyVar Lf0Temp = 0.10000;
  Lf0 =Lf0Temp;
  Lt0 = 0.1*Lf0Temp;
  Gamma0 = (pi/180)* 10.000000; // Yamaguchi
  Epsilon0 = Epsilon0Temp;
  K1 = K1Temp;
  K2 = K2Temp;
  Fcfast = FcfastTemp;
  Jt = JtTemp;
  Jpe = JpeTemp;
  PEFactor = PEFactorTemp;
};


// ****************************************
//Muscle parameters for the forearm, data from MAYO sub2
// ****************************************
AnyMuscleModel3E Triceps_LH_1 = {
  AnyVar Volume = 0.5*146.00000/10^6; //m^3 mayo k2_2
  AnyVar MuscleBellyLength = 0.300; //m mayo k2_2
  AnyVar PCSA = Volume/(MuscleBellyLength*cos(Gamma0));
  AnyVar Lt0Temp = 0.35*Lf0Temp;

  F0 = .StrengthScaleHumerus*PCSA*.ConstParam.MusStressForearm;
  AnyVar  Lf0Temp = 0.094000;//mm mayo k2_2
  Lf0 = Lf0Temp;

  Lt0 = Lt0Temp;
  Gamma0 = Gamma0Temp;
  Epsilon0 = Epsilon0Temp;
  K1 = K1Temp;
  K2 = K2Temp;
  Fcfast = FcfastTemp;
  Jt = JtTemp;
  Jpe = JpeTemp;
  PEFactor = PEFactorTemp;
};

AnyMuscleModel3E Triceps_LH_2 = {
  AnyVar Volume = 0.5*146.00000/10^6; //m^3 mayo k2_2
  AnyVar MuscleBellyLength = 0.300; //m mayo k2_2
  AnyVar PCSA = Volume/(MuscleBellyLength*cos(Gamma0));

  F0 = .StrengthScaleHumerus*PCSA*.ConstParam.MusStressForearm;
  AnyVar   Lf0Temp = 0.094000;//mm mayo k2_2
  AnyVar Lt0Temp = 0.35*Lf0Temp;

  Lf0 = Lf0Temp;
  Lt0 = Lt0Temp;
  Gamma0 = Gamma0Temp;
  Epsilon0 = Epsilon0Temp;
  K1 = K1Temp;
  K2 = K2Temp;
  Fcfast = FcfastTemp;
  Jt = JtTemp;
  Jpe = JpeTemp;
  PEFactor = PEFactorTemp;
};

AnyMuscleModel3E Brachialis_1 = {
  AnyVar Volume= 0.5*102.00000/10^6; //m^3 mayo k2_2
  AnyVar MuscleBellyLength = 0.173; //m mayo k2_2
  AnyVar PCSA= Volume/(MuscleBellyLength*cos(Gamma0));

  F0 = .StrengthScaleHumerus*PCSA*.ConstParam.MusStressForearm;
  AnyVar   Lf0Temp = 0.123000;
  Lf0 = Lf0Temp;
  Lt0 = Lt0Temp;
  AnyVar Lt0Temp = 0.15*Lf0Temp;

  Gamma0 = Gamma0Temp;
  Epsilon0 = Epsilon0Temp;
  K1 = K1Temp;
  K2 = K2Temp;
  Fcfast = FcfastTemp;
  Jt = JtTemp;
  Jpe = JpeTemp;
  PEFactor = PEFactorTemp;
};

AnyMuscleModel3E Brachialis_2 = {
  AnyVar Volume= 0.5*102.00000/10^6; //m^3 mayo k2_2
  AnyVar MuscleBellyLength = 0.173; //m mayo k2_2
  AnyVar PCSA= Volume/(MuscleBellyLength*cos(Gamma0));

  F0 = .StrengthScaleHumerus*PCSA*.ConstParam.MusStressForearm;
  AnyVar   Lf0Temp = 0.123000;//mm mayo k2_2
  Lf0 = Lf0Temp;
  AnyVar Lt0Temp = 0.15*Lf0Temp;

  Lt0 = Lt0Temp;
  Gamma0 = Gamma0Temp;
  Epsilon0 = Epsilon0Temp;
  K1 = K1Temp;
  K2 = K2Temp;
  Fcfast = FcfastTemp;
  Jt = JtTemp;
  Jpe = JpeTemp;
  PEFactor = PEFactorTemp;
};

AnyMuscleModel3E Triceps_ME_1 = {
  AnyVar Volume= 0.5*160.00000/10^6; //m^3 mayo k2_2
  AnyVar MuscleBellyLength = 0.250; //m mayo k2_2
  AnyVar PCSA= Volume/(MuscleBellyLength*cos(Gamma0));

  F0 = .StrengthScaleHumerus*PCSA*.ConstParam.MusStressForearm;
  AnyVar Lf0Temp = 0.087000;//mm mayo k2_2
  Lf0 = Lf0Temp;
  AnyVar Lt0Temp = 0.15*Lf0Temp;

  Lt0 = Lt0Temp;
  Gamma0 = Gamma0Temp;
  Epsilon0 = Epsilon0Temp;
  K1 = K1Temp;
  K2 = K2Temp;
  Fcfast = FcfastTemp;
  Jt = JtTemp;
  Jpe = JpeTemp;
  PEFactor = PEFactorTemp;
};

AnyMuscleModel3E Triceps_ME_2 = {
  AnyVar Volume= 0.5*160.00000/10^6; //m^3 mayo k2_2
  AnyVar MuscleBellyLength = 0.250; //m mayo k2_2
  AnyVar PCSA= Volume/(MuscleBellyLength*cos(Gamma0));

  F0 = .StrengthScaleHumerus*PCSA*.ConstParam.MusStressForearm;
  AnyVar  Lf0Temp = 0.087000;//mm mayo k2_2
  Lf0 = Lf0Temp;
  AnyVar Lt0Temp = 0.15*Lf0Temp;

  Lt0 = Lt0Temp;
  Gamma0 = Gamma0Temp;
  Epsilon0 = Epsilon0Temp;
  K1 = K1Temp;
  K2 = K2Temp;
  Fcfast = FcfastTemp;
  Jt = JtTemp;
  Jpe = JpeTemp;
  PEFactor = PEFactorTemp;
};

AnyMuscleModel3E Triceps_LA_1 = {
  AnyVar Volume= 0.5*108.00000/10^6; //m^3 mayo k2_2
  AnyVar MuscleBellyLength = 0.260; //m mayo k2_2
  AnyVar PCSA= Volume/(MuscleBellyLength*cos(Gamma0));

  F0 = .StrengthScaleHumerus*PCSA*.ConstParam.MusStressForearm;
  AnyVar  Lf0Temp = 0.055000;//mm mayo k2_2
  Lf0 = Lf0Temp;
  AnyVar Lt0Temp = 0.25*Lf0Temp;

  Lt0 = Lt0Temp;
  Gamma0 = Gamma0Temp;
  Epsilon0 = Epsilon0Temp;
  K1 = K1Temp;
  K2 = K2Temp;
  Fcfast = FcfastTemp;
  Jt = JtTemp;
  Jpe = JpeTemp;
  PEFactor = PEFactorTemp;
};

AnyMuscleModel3E Triceps_LA_2 = {
  AnyVar Volume= 0.5*108.00000/10^6; //m^3 mayo k2_2
  AnyVar MuscleBellyLength = 0.260; //m mayo k2_2
  AnyVar PCSA= Volume/(MuscleBellyLength*cos(Gamma0));

  F0 = .StrengthScaleHumerus*PCSA*.ConstParam.MusStressForearm;
  AnyVar  Lf0Temp = 0.055000;//mm mayo k2_2
  Lf0 = Lf0Temp;
  AnyVar Lt0Temp = 0.25*Lf0Temp;

  Lt0 = Lt0Temp;
  Gamma0 = Gamma0Temp;
  Epsilon0 = Epsilon0Temp;
  K1 = K1Temp;
  K2 = K2Temp;
  Fcfast = FcfastTemp;
  Jt = JtTemp;
  Jpe = JpeTemp;
  PEFactor = PEFactorTemp;
};

AnyMuscleModel3E Brach_rad_1 = {
  AnyVar Volume= 0.5*34.00000/10^6; //m^3 mayo k2_2
  AnyVar MuscleBellyLength = 0.160; //m mayo k2_2
  AnyVar PCSA= Volume/(MuscleBellyLength*cos(Gamma0));

  F0 = .StrengthScaleUlna*PCSA*.ConstParam.MusStressForearm;
  AnyVar  Lf0Temp = 0.128000;//mm mayo k2_2
  Lf0 = Lf0Temp;
  AnyVar Lt0Temp = 0.15*Lf0Temp;

  Lt0 = Lt0Temp;
  Gamma0 = Gamma0Temp;
  Epsilon0 = Epsilon0Temp;
  K1 = K1Temp;
  K2 = K2Temp;
  Fcfast = FcfastTemp;
  Jt = JtTemp;
  Jpe = JpeTemp;
  PEFactor = PEFactorTemp;
};

AnyMuscleModel3E Brach_rad_2 = {
  AnyVar Volume= 0.5*34.00000/10^6; //m^3 mayo k2_2
  AnyVar MuscleBellyLength = 0.160; //m mayo k2_2
  AnyVar PCSA= Volume/(MuscleBellyLength*cos(Gamma0));

  F0 = .StrengthScaleUlna*PCSA*.ConstParam.MusStressForearm;
  AnyVar   Lf0Temp = 0.128000;//mm mayo k2_2
  Lf0 = Lf0Temp;
  AnyVar Lt0Temp = 0.15*Lf0Temp;

  Lt0 = Lt0Temp;
  Gamma0 = Gamma0Temp;
  Epsilon0 = Epsilon0Temp;
  K1 = K1Temp;
  K2 = K2Temp;
  Fcfast = FcfastTemp;
  Jt = JtTemp;
  Jpe = JpeTemp;
  PEFactor = PEFactorTemp;
};

AnyMuscleModel3E Anconeus_1 = {
  AnyVar Volume= 0.5*8.00000/10^6; //m^3 mayo k2_2
  AnyVar MuscleBellyLength = 0.50; //m mayo k2_2 guesstimate from other subject
  AnyVar PCSA= Volume/(MuscleBellyLength*cos(Gamma0));

  F0 = .StrengthScaleUlna*PCSA*.ConstParam.MusStressForearm;
  AnyVar  Lf0Temp = 0.024000;//mm mayo k2_2
  Lf0 = Lf0Temp;
  AnyVar Lt0Temp = 0.25*Lf0Temp;
  Lt0 = Lt0Temp;
  Gamma0 = Gamma0Temp;
  Epsilon0 = Epsilon0Temp;
  K1 = K1Temp;
  K2 = K2Temp;
  Fcfast = FcfastTemp;
  Jt = JtTemp;
  Jpe = JpeTemp;
  PEFactor = PEFactorTemp;
};

AnyMuscleModel3E Anconeus_2 = {
  AnyVar Volume= 0.5*8.00000/10^6; //m^3 mayo k2_2
  AnyVar MuscleBellyLength = 0.50; //m mayo k2_2 guesstimate from other subject
  AnyVar PCSA= Volume/(MuscleBellyLength*cos(Gamma0));

  F0 = .StrengthScaleUlna*PCSA*.ConstParam.MusStressForearm;
  AnyVar  Lf0Temp = 0.024000;//mm mayo k2_2
  Lf0 = Lf0Temp;
  AnyVar Lt0Temp = 0.25*Lf0Temp;

  Lt0 = Lt0Temp;
  Gamma0 = Gamma0Temp;
  Epsilon0 = Epsilon0Temp;
  K1 = K1Temp;
  K2 = K2Temp;
  Fcfast = FcfastTemp;
  Jt = JtTemp;
  Jpe = JpeTemp;
  PEFactor = PEFactorTemp;
};

AnyMuscleModel3E Pronator_teres_caput_humeral_1 = {
  AnyVar Volume= 0.5*31.5/10^6; //m^3 mayo k2_2
  AnyVar MuscleBellyLength = 0.175; //m mayo k2_2 guesstimate from other subject
  AnyVar PCSA= Volume/(MuscleBellyLength*cos(Gamma0));

  F0 = .StrengthScaleUlna*PCSA*.ConstParam.MusStressForearm;
  AnyVar Lf0Temp = 0.066500;//mm mayo k2_2
  Lf0 = Lf0Temp;
  AnyVar Lt0Temp = 0.15*Lf0Temp;

  Lt0 = Lt0Temp;
  Gamma0 = Gamma0Temp;
  Epsilon0 = Epsilon0Temp;
  K1 = K1Temp;
  K2 = K2Temp;
  Fcfast = FcfastTemp;
  Jt = JtTemp;
  Jpe = JpeTemp;
  PEFactor = PEFactorTemp;
};

AnyMuscleModel3E Pronator_teres_caput_humeral_2 = {
  AnyVar Volume= 0.5*31.5/10^6; //m^3 mayo k2_2
  AnyVar MuscleBellyLength = 0.175; //m mayo k2_2 guesstimate from other subject
  AnyVar PCSA= Volume/(MuscleBellyLength*cos(Gamma0));

  F0 = .StrengthScaleUlna*PCSA*.ConstParam.MusStressForearm;
  AnyVar  Lf0Temp = 0.066500;//mm mayo k2_2
  AnyVar Lt0Temp = 0.15*Lf0Temp;

  Lf0 = Lf0Temp;
  Lt0 = Lt0Temp;
  Gamma0 = Gamma0Temp;
  Epsilon0 = Epsilon0Temp;
  K1 = K1Temp;
  K2 = K2Temp;
  Fcfast = FcfastTemp;
  Jt = JtTemp;
  Jpe = JpeTemp;
  PEFactor = PEFactorTemp;
};

AnyMuscleModel3E Pronator_teres_caput_ulnare_1 = {
  AnyVar Volume= 31.5/10^6; //m^3 mayo k2_2
  AnyVar MuscleBellyLength = 0.175; //m mayo k2_2 guesstimate from other subject
  AnyVar PCSA= Volume/(MuscleBellyLength*cos(Gamma0));

  F0 = .StrengthScaleUlna*PCSA*.ConstParam.MusStressForearm;
  AnyVar  Lf0Temp = 0.066500;//mm mayo k2_2
  Lf0 = Lf0Temp;
  AnyVar Lt0Temp = 0.15*Lf0Temp;

  Lt0 = Lt0Temp;
  Gamma0 = Gamma0Temp;
  Epsilon0 = Epsilon0Temp;
  K1 = K1Temp;
  K2 = K2Temp;
  Fcfast = FcfastTemp;
  Jt = JtTemp;
  Jpe = JpeTemp;
  PEFactor = PEFactorTemp;
};

AnyMuscleModel3E Supinator_humerus_part_1 = {
  AnyVar Volume= 0.5*23/10^6; //m^3 mayo k2_2
  AnyVar MuscleBellyLength = 0.040; //m mayo k2_2
  AnyVar PCSA= Volume/(MuscleBellyLength*cos(Gamma0));

  F0 = .StrengthScaleUlna*PCSA*.ConstParam.MusStressForearm;
  AnyVar  Lf0Temp = 0.040000;//mm mayo k2_2
  Lf0 = Lf0Temp;
  AnyVar Lt0Temp = 0.15*Lf0Temp;
  Lt0 = Lt0Temp;
  Gamma0 = Gamma0Temp;
  Epsilon0 = Epsilon0Temp;
  K1 = K1Temp;
  K2 = K2Temp;
  Fcfast = FcfastTemp;
  Jt = JtTemp;
  Jpe = JpeTemp;
  PEFactor = PEFactorTemp;
};

AnyMuscleModel3E Supinator_humerus_part_2 = {
  AnyVar Volume= 0.5*23/10^6; //m^3 mayo k2_2
  AnyVar MuscleBellyLength = 0.040; //m mayo k2_2
  AnyVar PCSA= Volume/(MuscleBellyLength*cos(Gamma0));

  F0 = .StrengthScaleUlna*PCSA*.ConstParam.MusStressForearm;
  AnyVar  Lf0Temp = 0.040000;//mm mayo k2_2
  Lf0 = Lf0Temp;
  AnyVar Lt0Temp = 0.15*Lf0Temp;
  Lt0 = Lt0Temp;
  Gamma0 = Gamma0Temp;
  Epsilon0 = Epsilon0Temp;
  K1 = K1Temp;
  K2 = K2Temp;
  Fcfast = FcfastTemp;
  Jt = JtTemp;
  Jpe = JpeTemp;
  PEFactor = PEFactorTemp;
};

AnyMuscleModel3E Supinator_ulna_part_1 = {
  AnyVar Volume= 0.5*23/10^6; //m^3 mayo k2_2
  AnyVar MuscleBellyLength = 0.040; //m mayo k2_2
  AnyVar PCSA= Volume/(MuscleBellyLength*cos(Gamma0));

  F0 = .StrengthScaleUlna*PCSA*.ConstParam.MusStressForearm;
  Lf0 = Lf0Temp;
  AnyVar Lf0Temp = 0.040000;//mm mayo k2_2
  Lt0 = Lt0Temp;
  AnyVar Lt0Temp = 0.15*Lf0Temp;

  Gamma0 = Gamma0Temp;
  Epsilon0 = Epsilon0Temp;
  K1 = K1Temp;
  K2 = K2Temp;
  Fcfast = FcfastTemp;
  Jt = JtTemp;
  Jpe = JpeTemp;
  PEFactor = PEFactorTemp;
};

AnyMuscleModel3E Supinator_ulna_part_2 = {
  AnyVar Volume= 0.5*23/10^6; //m^3 mayo k2_2
  AnyVar MuscleBellyLength = 0.040; //m mayo k2_2
  AnyVar PCSA= Volume/(MuscleBellyLength*cos(Gamma0));

  F0 = .StrengthScaleUlna*PCSA*.ConstParam.MusStressForearm;
  Lf0 = Lf0Temp;
  AnyVar Lf0Temp = 0.040000;//mm mayo k2_2
  Lt0 = Lt0Temp;
  AnyVar Lt0Temp = 0.15*Lf0Temp;
  Gamma0 = Gamma0Temp;
  Epsilon0 = Epsilon0Temp;
  K1 = K1Temp;
  K2 = K2Temp;
  Fcfast = FcfastTemp;
  Jt = JtTemp;
  Jpe = JpeTemp;
  PEFactor = PEFactorTemp;
};

AnyMuscleModel3E Pron_quadr_1 = {
  AnyVar Volume= 0.5*8.5/10^6; //m^3 mayo k2_2
  AnyVar MuscleBellyLength = 0.040; //m mayo k2_2 guesstimate from other subject
  AnyVar PCSA= Volume/(MuscleBellyLength*cos(Gamma0));

  F0 = .StrengthScaleUlna*PCSA*.ConstParam.MusStressForearm;
  Lf0 = Lf0Temp;
  AnyVar Lf0Temp = 0.02000;
  AnyVar Lt0Temp = 0.01*Lf0Temp;
  Lt0 = Lt0Temp;
  Gamma0 = Gamma0Temp;
  Epsilon0 = Epsilon0Temp;
  K1 = K1Temp;
  K2 = K2Temp;
  Fcfast = FcfastTemp;
  Jt = JtTemp;
  Jpe = JpeTemp;
  PEFactor = PEFactorTemp;
};

AnyMuscleModel3E Pron_quadr_2 = {
  AnyVar Volume= 0.5*8.5/10^6; //m^3 mayo k2_2
  AnyVar MuscleBellyLength = 0.040; //m mayo k2_2 guesstimate from other subject
  AnyVar PCSA= Volume/(MuscleBellyLength*cos(Gamma0));

  F0 = .StrengthScaleUlna*PCSA*.ConstParam.MusStressForearm;
  Lf0 = Lf0Temp;
  AnyVar Lf0Temp = 0.02000;
  AnyVar Lt0Temp = 0.01*Lf0Temp;

  Lt0 = Lt0Temp;
  Gamma0 = Gamma0Temp;
  Epsilon0 = Epsilon0Temp;
  K1 = K1Temp;
  K2 = K2Temp;
  Fcfast = FcfastTemp;
  Jt = JtTemp;
  Jpe = JpeTemp;
  PEFactor = PEFactorTemp;
};


#if _HAND_MUSCLE_PARAMETERS_3E_HILL == "ORIGINAL"

AnyMuscleModel3E Extensor_Pollicis_Longus = {
  AnyVar PCSA = 90.00000; // mm^2 Lieber1
  F0 = .StrengthScaleUlna*PCSA*.ConstParam.MusStressHand;
  Lf0 = 0.05500;
  Lt0 = 0.194;
  Gamma0 = 7*(pi/180);
  Epsilon0 = Epsilon0Temp;
  K1 = K1Temp;
  K2 = K2Temp;
  Fcfast = FcfastTemp;
  Jt = JtTemp;
  Jpe = JpeTemp;
  PEFactor = PEFactorTemp;
};

AnyMuscleModel3E  Extensor_Pollicis_Brevis = {
  AnyVar PCSA = 30.00000; // mm^2 Lieber1
  F0 =  .StrengthScaleUlna*PCSA*.ConstParam.MusStressHand;
  Lf0 = 0.068;
  Lt0 = 0.115;
  Gamma0 = 7*(pi/180);
  Epsilon0 = Epsilon0Temp;
  K1 = K1Temp;
  K2 = K2Temp;
  Fcfast = FcfastTemp;
  Jt = JtTemp;
  Jpe = JpeTemp;
  PEFactor = PEFactorTemp;
};

AnyMuscleModel3E Abductor_Pollicis_Longus = {
  AnyVar PCSA = 130.000; // mm^2 Liber1
  F0 =  .StrengthScaleUlna*PCSA*.ConstParam.MusStressHand;
  Lf0 = 0.05400;
  Lt0 = 0.221;
  Gamma0 = 6*(pi/180);
  Epsilon0 = Epsilon0Temp;
  K1 = K1Temp;
  K2 = K2Temp;
  Fcfast = FcfastTemp;
  Jt = JtTemp;
  Jpe = JpeTemp;
  PEFactor = PEFactorTemp;
};


AnyMuscleModel3E Extensor_Indicis = {
  AnyVar PCSA = 50.0000; // mm^2 Liber1
  F0 =  .StrengthScaleUlna*PCSA*.ConstParam.MusStressHand;
  Lf0 = 0.05900;
  Lt0 = 0.186;
  Gamma0 = 6*(pi/180);
  Epsilon0 = Epsilon0Temp;
  K1 = K1Temp;
  K2 = K2Temp;
  Fcfast = FcfastTemp;
  Jt = JtTemp;
  Jpe = JpeTemp;
  PEFactor = PEFactorTemp;
};

AnyMuscleModel3E Extensor_Carpi_Ulnaris = {
  AnyVar PCSA = 210.0000; // mm^2 Lieber2
  F0 = .StrengthScaleUlna*PCSA*.ConstParam.MusStressHand;
  Lf0 = 0.051;
  Lt0 = 0.265;
  Gamma0 = 12*(pi/180);
  Epsilon0 = Epsilon0Temp;
  K1 = K1Temp;
  K2 = K2Temp;
  Fcfast = FcfastTemp;
  Jt = JtTemp;
  Jpe = JpeTemp;
  PEFactor = PEFactorTemp;
};


//Fake muscle with no anatomical sense
AnyMuscleModel3E Intrinsic_Muscle_1 = {
  AnyVar PCSA = 210.0000; // mm^2 Lieber2
  F0 = .StrengthScaleUlna*PCSA*.ConstParam.MusStressHand;
  Lf0 = 0.051;
  Lt0 = 0.265;
  Gamma0 = 12*(pi/180);
  Epsilon0 = Epsilon0Temp;
  K1 = K1Temp;
  K2 = K2Temp;
  Fcfast = FcfastTemp;
  Jt = JtTemp;
  Jpe = JpeTemp;
  PEFactor = PEFactorTemp;
};


AnyMuscleModel3E Extensor_Carpi_Radialis_Longus = {
  AnyVar PCSA = 220.000; // mm^2 Murray
  F0 = .StrengthScaleUlna*PCSA*.ConstParam.MusStressHand;
  Lf0 = 0.081;
  Lt0 = 0.224;
  Gamma0 = 0*(pi/180);
  Epsilon0 = Epsilon0Temp;
  K1 = K1Temp;
  K2 = K2Temp;
  Fcfast = FcfastTemp;
  Jt = JtTemp;
  Jpe = JpeTemp;
  PEFactor = PEFactorTemp;
};


AnyMuscleModel3E Extensor_Carpi_Radialis_Brevis = {
  AnyVar PCSA = 220; // mm^2 Murray
  F0 = .StrengthScaleUlna*PCSA*.ConstParam.MusStressHand;
  Lf0 = 0.059;
  Lt0 = 0.222;
  Gamma0 = 0*(pi/180);
  Epsilon0 = Epsilon0Temp;
  K1 = K1Temp;
  K2 = K2Temp;
  Fcfast = FcfastTemp;
  Jt = JtTemp;
  Jpe = JpeTemp;
  PEFactor = PEFactorTemp;
};


AnyMuscleModel3E Flexor_Carpi_Radialis = {
  AnyVar PCSA = 160; //mm^2 Lieber1
  F0 = .StrengthScaleUlna*PCSA*.ConstParam.MusStressHand;
  Lf0 = 0.063;
  Lt0 = 0.244;
  Gamma0 = 3*(pi/180);
  Epsilon0 = Epsilon0Temp;
  K1 = K1Temp;
  K2 = K2Temp;
  Fcfast = FcfastTemp;
  Jt = JtTemp;
  Jpe = JpeTemp;
  PEFactor = PEFactorTemp;
};

AnyMuscleModel3E Flexor_Carpi_Ulnaris = {
  AnyVar PCSA = 290; //mm^2 Lieber1
  F0 = .StrengthScaleUlna*PCSA*.ConstParam.MusStressHand;
  Lf0 = 0.051;
  Lt0 = 0.265;
  Gamma0 = 12*(pi/180);
  Epsilon0 = Epsilon0Temp;
  K1 = K1Temp;
  K2 = K2Temp;
  Fcfast = FcfastTemp;
  Jt = JtTemp;
  Jpe = JpeTemp;
  PEFactor = PEFactorTemp;
};


AnyMuscleModel3E Palmaris_Longus = {
  AnyVar PCSA = 60; //mm^2 Lieber2
  F0 = .StrengthScaleUlna*PCSA*.ConstParam.MusStressHand;
  Lf0 = 0.064;
  Lt0 = 0.269;
  Gamma0 = 4*(pi/180);
  Epsilon0 = Epsilon0Temp;
  K1 = K1Temp;
  K2 = K2Temp;
  Fcfast = FcfastTemp;
  Jt = JtTemp;
  Jpe = JpeTemp;
  PEFactor = PEFactorTemp;
};


AnyMuscleModel3E Flexor_Digitorum_Superficialis_Digit5 = {
  AnyVar PCSA = 40; //mm^2 Lieber 2
  F0 = .StrengthScaleUlna*PCSA*.ConstParam.MusStressHand;
  Lf0 = 0.052;
  Lt0 = 0.338;
  Gamma0 = 5*(pi/180);
  Epsilon0 = Epsilon0Temp;
  K1 = K1Temp;
  K2 = K2Temp;
  Fcfast = FcfastTemp;
  Jt = JtTemp;
  Jpe = JpeTemp;
  PEFactor = PEFactorTemp;
};

AnyMuscleModel3E Flexor_Digitorum_Superficialis_Digit4 = {
  AnyVar PCSA = 130; //mm^2 Lieber 2
  F0 = .StrengthScaleUlna*PCSA*.ConstParam.MusStressHand;
  Lf0 = 0.074;
  Lt0 = 0.328;
  Gamma0 = 4*(pi/180);
  Epsilon0 = Epsilon0Temp;
  K1 = K1Temp;
  K2 = K2Temp;
  Fcfast = FcfastTemp;
  Jt = JtTemp;
  Jpe = JpeTemp;
  PEFactor = PEFactorTemp;
};


AnyMuscleModel3E Flexor_Digitorum_Superficialis_Digit3 = {
  AnyVar PCSA = 200; //mm^2 Lieber 2
  F0 = .StrengthScaleUlna*PCSA*.ConstParam.MusStressHand;
  Lf0 = 0.075;
  Lt0 = 0.295;
  Gamma0 = 7*(pi/180);
  Epsilon0 = Epsilon0Temp;
  K1 = K1Temp;
  K2 = K2Temp;
  Fcfast = FcfastTemp;
  Jt = JtTemp;
  Jpe = JpeTemp;
  PEFactor = PEFactorTemp;
};

AnyMuscleModel3E Flexor_Digitorum_Superficialis_Digit2 = {
  AnyVar PCSA = 140; //mm^2 Lieber 2
  F0 = .StrengthScaleUlna*PCSA*.ConstParam.MusStressHand;
  Lf0 = 0.084;
  Lt0 = 0.275;
  Gamma0 = 6*(pi/180);
  Epsilon0 = Epsilon0Temp;
  K1 = K1Temp;
  K2 = K2Temp;
  Fcfast = FcfastTemp;
  Jt = JtTemp;
  Jpe = JpeTemp;
  PEFactor = PEFactorTemp;
};


AnyMuscleModel3E Flexor_Digitorum_Profundus_Digit5 = {
  AnyVar PCSA = 180; //mm^2 Lieber 2
  F0 = .StrengthScaleUlna*PCSA*.ConstParam.MusStressHand;
  Lf0 = 0.075;
  Lt0 = 0.282;
  Gamma0 = 8*(pi/180);
  Epsilon0 = Epsilon0Temp;
  K1 = K1Temp;
  K2 = K2Temp;
  Fcfast = FcfastTemp;
  Jt = JtTemp;
  Jpe = JpeTemp;
  PEFactor = PEFactorTemp;
};


AnyMuscleModel3E Flexor_Digitorum_Profundus_Digit4 = {
  AnyVar PCSA = 140; //mm^2 Lieber 2
  F0 = .StrengthScaleUlna*PCSA*.ConstParam.MusStressHand;
  Lf0 = 0.08;
  Lt0 = 0.282;
  Gamma0 = 7*(pi/180);
  Epsilon0 = Epsilon0Temp;
  K1 = K1Temp;
  K2 = K2Temp;
  Fcfast = FcfastTemp;
  Jt = JtTemp;
  Jpe = JpeTemp;
  PEFactor = PEFactorTemp;
};

AnyMuscleModel3E Flexor_Digitorum_Profundus_Digit3 = {
  AnyVar PCSA = 180; //mm^2 Lieber 2
  F0 = .StrengthScaleUlna*PCSA*.ConstParam.MusStressHand;
  Lf0 = 0.084;
  Lt0 = 0.293;
  Gamma0 = 6*(pi/180);
  Epsilon0 = Epsilon0Temp;
  K1 = K1Temp;
  K2 = K2Temp;
  Fcfast = FcfastTemp;
  Jt = JtTemp;
  Jpe = JpeTemp;
  PEFactor = PEFactorTemp;
};

AnyMuscleModel3E Flexor_Digitorum_Profundus_Digit2 = {
  AnyVar PCSA = 150; //mm^2 Lieber 2
  F0 = .StrengthScaleUlna*PCSA*.ConstParam.MusStressHand;
  Lf0 = 0.075;
  Lt0 = 0.294;
  Gamma0 = 2*(pi/180);
  Epsilon0 = Epsilon0Temp;
  K1 = K1Temp;
  K2 = K2Temp;
  Fcfast = FcfastTemp;
  Jt = JtTemp;
  Jpe = JpeTemp;
  PEFactor = PEFactorTemp;
};


AnyMuscleModel3E Extensor_Digitorum_Digit5 = {
  AnyVar PCSA = 30; //mm^2 Lieber 2
  F0 = .StrengthScaleUlna*PCSA*.ConstParam.MusStressHand;
  Lf0 = 0.065;
  Lt0 = 0.297;
  Gamma0 = 2*(pi/180);
  Epsilon0 = Epsilon0Temp;
  K1 = K1Temp;
  K2 = K2Temp;
  Fcfast = FcfastTemp;
  Jt = JtTemp;
  Jpe = JpeTemp;
  PEFactor = PEFactorTemp;
};

AnyMuscleModel3E Extensor_Digitorum_Digit4 = {
  AnyVar PCSA = 80; //mm^2 Lieber 2
  F0 = .StrengthScaleUlna*PCSA*.ConstParam.MusStressHand;
  Lf0 = 0.063;
  Lt0 = 0.327;
  Gamma0 = 3*(pi/180);
  Epsilon0 = Epsilon0Temp;
  K1 = K1Temp;
  K2 = K2Temp;
  Fcfast = FcfastTemp;
  Jt = JtTemp;
  Jpe = JpeTemp;
  PEFactor = PEFactorTemp;
};


AnyMuscleModel3E Extensor_Digitorum_Digit3 = {
  AnyVar PCSA = 80; //mm^2 Lieber 2
  F0 = .StrengthScaleUlna*PCSA*.ConstParam.MusStressHand;
  Lf0 = 0.072;
  Lt0 = 0.335;
  Gamma0 = 3*(pi/180);
  Epsilon0 = Epsilon0Temp;
  K1 = K1Temp;
  K2 = K2Temp;
  Fcfast = FcfastTemp;
  Jt = JtTemp;
  Jpe = JpeTemp;
  PEFactor = PEFactorTemp;
};

AnyMuscleModel3E Extensor_Digitorum_Digit2 = {
  AnyVar PCSA = 40; //mm^2 Lieber 2
  F0 = .StrengthScaleUlna*PCSA*.ConstParam.MusStressHand;
  Lf0 = 0.07;
  Lt0 = 0.325;
  Gamma0 = 3*(pi/180);
  Epsilon0 = Epsilon0Temp;
  K1 = K1Temp;
  K2 = K2Temp;
  Fcfast = FcfastTemp;
  Jt = JtTemp;
  Jpe = JpeTemp;
  PEFactor = PEFactorTemp;
};

AnyMuscleModel3E Extensor_Digiti_Minimi = {
  AnyVar PCSA = 60; //mm^2 Lieber 2
  F0 = .StrengthScaleUlna*PCSA*.ConstParam.MusStressHand;
  Lf0 = 0.068;
  Lt0 = 0.322;
  Gamma0 = 3*(pi/180);
  Epsilon0 = Epsilon0Temp;
  K1 = K1Temp;
  K2 = K2Temp;
  Fcfast = FcfastTemp;
  Jt = JtTemp;
  Jpe = JpeTemp;
  PEFactor = PEFactorTemp;
};

AnyMuscleModel3E Flexor_Pollicis_Longus = {
  AnyVar PCSA = 170; //mm^2 Lieber 2
  F0 = .StrengthScaleUlna*PCSA*.ConstParam.MusStressHand;
  Lf0 = 0.055;
  Lt0 = 0.194;
  Gamma0 = 7*(pi/180);
  Epsilon0 = Epsilon0Temp;
  K1 = K1Temp;
  K2 = K2Temp;
  Fcfast = FcfastTemp;
  Jt = JtTemp;
  Jpe = JpeTemp;
  PEFactor = PEFactorTemp;
};


//NEW ADDED by loopluc
AnyMuscleModel3E Abductor_Digiti_Minimi = {
  AnyVar PCSA = 60; //mm^2 Lieber 2
  F0 = .StrengthScaleUlna*PCSA*.ConstParam.MusStressHand;
  Lfbar = 0.068;
  Lt0 = 0.322;
  Gammabar = 3*(pi/180);
  Epsilon0 = EpsilonbarTemp;
  K1 = K1Temp;
  K2 = K2Temp;
  Fcfast = FcfastTemp;
  Jt = JtTemp;
  Jpe = JpeTemp;
  PEFactor = PEFactorTemp;
};

AnyMuscleModel3E Flexor_Digiti_Minimi = {
  AnyVar PCSA = 60; //mm^2 Lieber 2
  F0 = .StrengthScaleUlna*PCSA*.ConstParam.MusStressHand;
  Lfbar = 0.068;
  Lt0 = 0.322;
  Gammabar = 3*(pi/180);
  Epsilon0 = EpsilonbarTemp;
  K1 = K1Temp;
  K2 = K2Temp;
  Fcfast = FcfastTemp;
  Jt = JtTemp;
  Jpe = JpeTemp;
  PEFactor = PEFactorTemp;
};


AnyMuscleModel3E Palmar_Interosseous_Digit2 = {
  AnyVar PCSA = 60; //mm^2 Lieber 2
  F0 = .StrengthScaleUlna*PCSA*.ConstParam.MusStressHand;
  Lfbar = 0.068;
  Lt0 = 0.322;
  Gammabar = 3*(pi/180);
  Epsilon0 = EpsilonbarTemp;
  K1 = K1Temp;
  K2 = K2Temp;
  Fcfast = FcfastTemp;
  Jt = JtTemp;
  Jpe = JpeTemp;
  PEFactor = PEFactorTemp;
};
AnyMuscleModel3E Palmar_Interosseous_Digit4 = {
  AnyVar PCSA = 60; //mm^2 Lieber 2
  F0 = .StrengthScaleUlna*PCSA*.ConstParam.MusStressHand;
  Lfbar = 0.068;
  Lt0 = 0.322;
  Gammabar = 3*(pi/180);
  Epsilon0 = EpsilonbarTemp;
  K1 = K1Temp;
  K2 = K2Temp;
  Fcfast = FcfastTemp;
  Jt = JtTemp;
  Jpe = JpeTemp;
  PEFactor = PEFactorTemp;
};
AnyMuscleModel3E Palmar_Interosseous_Digit5 = {
  AnyVar PCSA = 60; //mm^2 Lieber 2
  F0 = .StrengthScaleUlna*PCSA*.ConstParam.MusStressHand;
  Lfbar = 0.068;
  Lt0 = 0.322;
  Gammabar = 3*(pi/180);
  Epsilon0 = EpsilonbarTemp;
  K1 = K1Temp;
  K2 = K2Temp;
  Fcfast = FcfastTemp;
  Jt = JtTemp;
  Jpe = JpeTemp;
  PEFactor = PEFactorTemp;
};

//Lumbrical
AnyMuscleModel3E Lumbrical_Digit2 = {
  AnyVar PCSA = 60; //mm^2 Lieber 2
  F0 = .StrengthScaleUlna*PCSA*.ConstParam.MusStressHand;
  Lfbar = 0.068;
  Lt0 = 0.322;
  Gammabar = 3*(pi/180);
  Epsilon0 = EpsilonbarTemp;
  K1 = K1Temp;
  K2 = K2Temp;
  Fcfast = FcfastTemp;
  Jt = JtTemp;
  Jpe = JpeTemp;
  PEFactor = PEFactorTemp;
};

AnyMuscleModel3E Lumbrical_Digit3 = {
  AnyVar PCSA = 60; //mm^2 Lieber 2
  F0 = .StrengthScaleUlna*PCSA*.ConstParam.MusStressHand;
  Lfbar = 0.068;
  Lt0 = 0.322;
  Gammabar = 3*(pi/180);
  Epsilon0 = EpsilonbarTemp;
  K1 = K1Temp;
  K2 = K2Temp;
  Fcfast = FcfastTemp;
  Jt = JtTemp;
  Jpe = JpeTemp;
  PEFactor = PEFactorTemp;
};
AnyMuscleModel3E Lumbrical_Digit41 = {
  AnyVar PCSA = 60; //mm^2 Lieber 2
  F0 = .StrengthScaleUlna*PCSA*.ConstParam.MusStressHand;
  Lfbar = 0.068;
  Lt0 = 0.322;
  Gammabar = 3*(pi/180);
  Epsilon0 = EpsilonbarTemp;
  K1 = K1Temp;
  K2 = K2Temp;
  Fcfast = FcfastTemp;
  Jt = JtTemp;
  Jpe = JpeTemp;
  PEFactor = PEFactorTemp;
};
AnyMuscleModel3E Lumbrical_Digit42 = {
  AnyVar PCSA = 60; //mm^2 Lieber 2
  F0 = .StrengthScaleUlna*PCSA*.ConstParam.MusStressHand;
  Lfbar = 0.068;
  Lt0 = 0.322;
  Gammabar = 3*(pi/180);
  Epsilon0 = EpsilonbarTemp;
  K1 = K1Temp;
  K2 = K2Temp;
  Fcfast = FcfastTemp;
  Jt = JtTemp;
  Jpe = JpeTemp;
  PEFactor = PEFactorTemp;
};
AnyMuscleModel3E Lumbrical_Digit51 = {
  AnyVar PCSA = 60; //mm^2 Lieber 2
  F0 = .StrengthScaleUlna*PCSA*.ConstParam.MusStressHand;
  Lfbar = 0.068;
  Lt0 = 0.322;
  Gammabar = 3*(pi/180);
  Epsilon0 = EpsilonbarTemp;
  K1 = K1Temp;
  K2 = K2Temp;
  Fcfast = FcfastTemp;
  Jt = JtTemp;
  Jpe = JpeTemp;
  PEFactor = PEFactorTemp;
};
AnyMuscleModel3E Lumbrical_Digit52 = {
  AnyVar PCSA = 60; //mm^2 Lieber 2
  F0 = .StrengthScaleUlna*PCSA*.ConstParam.MusStressHand;
  Lfbar = 0.068;
  Lt0 = 0.322;
  Gammabar = 3*(pi/180);
  Epsilon0 = EpsilonbarTemp;
  K1 = K1Temp;
  K2 = K2Temp;
  Fcfast = FcfastTemp;
  Jt = JtTemp;
  Jpe = JpeTemp;
  PEFactor = PEFactorTemp;
};
//DorsalInterosseous

AnyMuscleModel3E DorsalInterosseous_Digit21 = {
  AnyVar PCSA = 60; //mm^2 Lieber 2
  F0 = .StrengthScaleUlna*PCSA*.ConstParam.MusStressHand;
  Lfbar = 0.068;
  Lt0 = 0.322;
  Gammabar = 3*(pi/180);
  Epsilon0 = EpsilonbarTemp;
  K1 = K1Temp;
  K2 = K2Temp;
  Fcfast = FcfastTemp;
  Jt = JtTemp;
  Jpe = JpeTemp;
  PEFactor = PEFactorTemp;
};

AnyMuscleModel3E DorsalInterosseous_Digit22 = {
  AnyVar PCSA = 60; //mm^2 Lieber 2
  F0 = .StrengthScaleUlna*PCSA*.ConstParam.MusStressHand;
  Lfbar = 0.068;
  Lt0 = 0.322;
  Gammabar = 3*(pi/180);
  Epsilon0 = EpsilonbarTemp;
  K1 = K1Temp;
  K2 = K2Temp;
  Fcfast = FcfastTemp;
  Jt = JtTemp;
  Jpe = JpeTemp;
  PEFactor = PEFactorTemp;
};
AnyMuscleModel3E DorsalInterosseous_Digit31 = {
  AnyVar PCSA = 60; //mm^2 Lieber 2
  F0 = .StrengthScaleUlna*PCSA*.ConstParam.MusStressHand;
  Lfbar = 0.068;
  Lt0 = 0.322;
  Gammabar = 3*(pi/180);
  Epsilon0 = EpsilonbarTemp;
  K1 = K1Temp;
  K2 = K2Temp;
  Fcfast = FcfastTemp;
  Jt = JtTemp;
  Jpe = JpeTemp;
  PEFactor = PEFactorTemp;
};
AnyMuscleModel3E DorsalInterosseous_Digit32 = {
  AnyVar PCSA = 60; //mm^2 Lieber 2
  F0 = .StrengthScaleUlna*PCSA*.ConstParam.MusStressHand;
  Lfbar = 0.068;
  Lt0 = 0.322;
  Gammabar = 3*(pi/180);
  Epsilon0 = EpsilonbarTemp;
  K1 = K1Temp;
  K2 = K2Temp;
  Fcfast = FcfastTemp;
  Jt = JtTemp;
  Jpe = JpeTemp;
  PEFactor = PEFactorTemp;
};
AnyMuscleModel3E DorsalInterosseous_Digit33 = {
  AnyVar PCSA = 60; //mm^2 Lieber 2
  F0 = .StrengthScaleUlna*PCSA*.ConstParam.MusStressHand;
  Lfbar = 0.068;
  Lt0 = 0.322;
  Gammabar = 3*(pi/180);
  Epsilon0 = EpsilonbarTemp;
  K1 = K1Temp;
  K2 = K2Temp;
  Fcfast = FcfastTemp;
  Jt = JtTemp;
  Jpe = JpeTemp;
  PEFactor = PEFactorTemp;
};
AnyMuscleModel3E DorsalInterosseous_Digit34 = {
  AnyVar PCSA = 60; //mm^2 Lieber 2
  F0 = .StrengthScaleUlna*PCSA*.ConstParam.MusStressHand;
  Lfbar = 0.068;
  Lt0 = 0.322;
  Gammabar = 3*(pi/180);
  Epsilon0 = EpsilonbarTemp;
  K1 = K1Temp;
  K2 = K2Temp;
  Fcfast = FcfastTemp;
  Jt = JtTemp;
  Jpe = JpeTemp;
  PEFactor = PEFactorTemp;
};
AnyMuscleModel3E DorsalInterosseous_Digit41 = {
  AnyVar PCSA = 60; //mm^2 Lieber 2
  F0 = .StrengthScaleUlna*PCSA*.ConstParam.MusStressHand;
  Lfbar = 0.068;
  Lt0 = 0.322;
  Gammabar = 3*(pi/180);
  Epsilon0 = EpsilonbarTemp;
  K1 = K1Temp;
  K2 = K2Temp;
  Fcfast = FcfastTemp;
  Jt = JtTemp;
  Jpe = JpeTemp;
  PEFactor = PEFactorTemp;
};
AnyMuscleModel3E DorsalInterosseous_Digit42 = {
  AnyVar PCSA = 60; //mm^2 Lieber 2
  F0 = .StrengthScaleUlna*PCSA*.ConstParam.MusStressHand;
  Lfbar = 0.068;
  Lt0 = 0.322;
  Gammabar = 3*(pi/180);
  Epsilon0 = EpsilonbarTemp;
  K1 = K1Temp;
  K2 = K2Temp;
  Fcfast = FcfastTemp;
  Jt = JtTemp;
  Jpe = JpeTemp;
  PEFactor = PEFactorTemp;
};
AnyMuscleModel3E Abductor_Pollicis_Brevis = {
  AnyVar PCSA = 60; //mm^2 Lieber 2
  F0 = .StrengthScaleUlna*PCSA*.ConstParam.MusStressHand;
  Lfbar = 0.068;
  Lt0 = 0.322;
  Gammabar = 3*(pi/180);
  Epsilon0 = EpsilonbarTemp;
  K1 = K1Temp;
  K2 = K2Temp;
  Fcfast = FcfastTemp;
  Jt = JtTemp;
  Jpe = JpeTemp;
  PEFactor = PEFactorTemp;
};
AnyMuscleModel3E Abductor_Pollicis = {
  AnyVar PCSA = 1.94; //mm^2 Lieber 2
  F0 = .StrengthScaleUlna*PCSA*.ConstParam.MusStressHand;
  Lfbar = 0.068;
  Lt0 = 0.322;
  Gammabar = 3*(pi/180);
  Epsilon0 = EpsilonbarTemp;
  K1 = K1Temp;
  K2 = K2Temp;
  Fcfast = FcfastTemp;
  Jt = JtTemp;
  Jpe = JpeTemp;
  PEFactor = PEFactorTemp;
};
AnyMuscleModel3E Flexor_Pollicis_Brevis = {
  AnyVar PCSA = 60; //mm^2 Lieber 2
  F0 = .StrengthScaleUlna*PCSA*.ConstParam.MusStressHand;
  Lfbar = 0.068;
  Lt0 = 0.322;
  Gammabar = 3*(pi/180);
  Epsilon0 = EpsilonbarTemp;
  K1 = K1Temp;
  K2 = K2Temp;
  Fcfast = FcfastTemp;
  Jt = JtTemp;
  Jpe = JpeTemp;
  PEFactor = PEFactorTemp;
};
AnyMuscleModel3E Opponens_Pollicis = {
  AnyVar PCSA = 60; //mm^2 Lieber 2
  F0 = .StrengthScaleUlna*PCSA*.ConstParam.MusStressHand;
  Lfbar = 0.068;
  Lt0 = 0.322;
  Gammabar = 3*(pi/180);
  Epsilon0 = EpsilonbarTemp;
  K1 = K1Temp;
  K2 = K2Temp;
  Fcfast = FcfastTemp;
  Jt = JtTemp;
  Jpe = JpeTemp;
  PEFactor = PEFactorTemp;
};

//--End of loopluc

#endif

//Jacobson
//Jacobson, M. D., R. Raab, B. M. Fazeli, R. A. Abrams, M. J. Botte, and R. L. Lieber.
//Architectural design of the human intrinsic hand muscles.
// J. Hand Surg. [Am.] 17:804809, 1992.

//Lieber1
//Lieber, R. L., M. D. Jacobson, B. M. Fazeli, R. A. Abrams, and M. J. Botte.
//Architecture of selected muscles of the arm and forearm: Anatomy and implications for tendon transfer.
//J. Hand Surg. [Am.] 17:787-798, 1992.

//Lieber2
//Lieber, R. L., B. M. Fazeli, and M. J. Botte.
//Architecture of selected wrist flexor and extensor muscles.
//J. Hand Surg. [Am.] 15:244-250, 1990.


#if _HAND_MUSCLE_PARAMETERS_3E_HILL == "JACOBSONLIEBER"

AnyMuscleModel3E Extensor_Pollicis_Longus = {
  AnyVar PCSA = 98; // mm^2 Lieber1
  // standard deviation of the PCSA
  AnyVar SD = 13;
  F0 = .StrengthScaleUlna*PCSA*.ConstParam.MusStressHand;
  Lf0 = 0.044; //SD= 0.0026
  Lt0 = 0.138-Lf0; //SD= 0.0072
  Gamma0 = 6*(pi/180);  //SD=  1.3*(pi/180)
  Epsilon0 = Epsilon0Temp;
  K1 = K1Temp;
  K2 = K2Temp;
  Fcfast = FcfastTemp;
  Jt = JtTemp;
  Jpe = JpeTemp;
  PEFactor = PEFactorTemp;
};

AnyMuscleModel3E  Extensor_Pollicis_Brevis = {
  AnyVar PCSA = 47; // mm^2 Jacobson
  // standard deviation of the PCSA
  AnyVar SD = 32;
  F0 =  .StrengthScaleUlna*PCSA*.ConstParam.MusStressHand;
  Lf0 = 0.055; //SD= 0.0075
  Lt0 = 0.1056-Lf0; //SD= 0.0225
  Gamma0 = 7.2*(pi/180); //SD= 4.4 *(pi/180)
  Epsilon0 = Epsilon0Temp;
  K1 = K1Temp;
  K2 = K2Temp;
  Fcfast = FcfastTemp;
  Jt = JtTemp;
  Jpe = JpeTemp;
  PEFactor = PEFactorTemp;
};

AnyMuscleModel3E Abductor_Pollicis_Longus = {
  AnyVar PCSA = 193; // mm^2 Jacobson
  // standard deviation of the PCSA
  AnyVar SD = 59;
  F0 =  .StrengthScaleUlna*PCSA*.ConstParam.MusStressHand;
  Lf0 = 0.0581; //SD= 0.0074
  Lt0 = 0.1604-Lf0; //SD= 0.015
  Gamma0 = 7.5*(pi/180); //SD=  2.0*(pi/180)
  Epsilon0 = Epsilon0Temp;
  K1 = K1Temp;
  K2 = K2Temp;
  Fcfast = FcfastTemp;
  Jt = JtTemp;
  Jpe = JpeTemp;
  PEFactor = PEFactorTemp;
};


AnyMuscleModel3E Extensor_Indicis = {
  AnyVar PCSA = 56; // mm^2 Lieber1
  // standard deviation of the PCSA
  AnyVar SD = 11;
  F0 =  .StrengthScaleUlna*PCSA*.ConstParam.MusStressHand;
  Lf0 = 0.048; //SD= 0.0023
  Lt0 = 0.105-Lf0; //SD= 0.0066
  Gamma0 = 6*(pi/180); //SD=  0.8*(pi/180)
  Epsilon0 = Epsilon0Temp;
  K1 = K1Temp;
  K2 = K2Temp;
  Fcfast = FcfastTemp;
  Jt = JtTemp;
  Jpe = JpeTemp;
  PEFactor = PEFactorTemp;
};

AnyMuscleModel3E Extensor_Carpi_Ulnaris = {
  AnyVar PCSA = 260; // mm^2 Lieber2
  // standard deviation of the PCSA
  AnyVar SD = 71;
  F0 = .StrengthScaleUlna*PCSA*.ConstParam.MusStressHand;
  Lf0 = 0.0507; //SD= 0.0025
  Lt0 = 0.1816-Lf0; //SD= 0.0006
  Gamma0 = 3.5*(pi/180); //SD=  0.3*(pi/180)
  Epsilon0 = Epsilon0Temp;
  K1 = K1Temp;
  K2 = K2Temp;
  Fcfast = FcfastTemp;
  Jt = JtTemp;
  Jpe = JpeTemp;
  PEFactor = PEFactorTemp;
};


//Fake muscle with no anatomical sense
AnyMuscleModel3E Intrinsic_Muscle_1 = {
  AnyVar PCSA = 146; // mm^2 Lieber2
  // standard deviation of the PCSA
  AnyVar SD = 11;
  F0 = .StrengthScaleUlna*PCSA*.ConstParam.MusStressHand;
  Lf0 = 0.0763; //SD= 0.0059
  Lt0 = 0.0937-Lf0; //SD= 0.0074
  Gamma0 = 2.5*(pi/180); //SD=  0.7*(pi/180)
  Epsilon0 = Epsilon0Temp;
  K1 = K1Temp;
  K2 = K2Temp;
  Fcfast = FcfastTemp;
  Jt = JtTemp;
  Jpe = JpeTemp;
  PEFactor = PEFactorTemp;
};


AnyMuscleModel3E Extensor_Carpi_Radialis_Longus = {
  AnyVar PCSA = 146; // mm^2 Lieber2
  // standard deviation of the PCSA
  AnyVar SD = 11;
  F0 = .StrengthScaleUlna*PCSA*.ConstParam.MusStressHand;
  Lf0 = 0.0763; //SD= 0.0059
  Lt0 = 0.0937-Lf0; //SD= 0.0074
  Gamma0 = 2.5*(pi/180); //SD=  0.7*(pi/180)
  Epsilon0 = Epsilon0Temp;
  K1 = K1Temp;
  K2 = K2Temp;
  Fcfast = FcfastTemp;
  Jt = JtTemp;
  Jpe = JpeTemp;
  PEFactor = PEFactorTemp;
};


AnyMuscleModel3E Extensor_Carpi_Radialis_Brevis = {
  AnyVar PCSA = 273; // mm^2 Lieber2
  // standard deviation of the PCSA
  AnyVar SD = 18;
  F0 = .StrengthScaleUlna*PCSA*.ConstParam.MusStressHand;
  Lf0 = 0.0477; //SD= 0.0037
  Lt0 = 0.1272-Lf0; //SD= 0.010
  Gamma0 = 8.9*(pi/180); //SD=  2.0*(pi/180)
  Epsilon0 = Epsilon0Temp;
  K1 = K1Temp;
  K2 = K2Temp;
  Fcfast = FcfastTemp;
  Jt = JtTemp;
  Jpe = JpeTemp;
  PEFactor = PEFactorTemp;
};


AnyMuscleModel3E Flexor_Carpi_Radialis = {
  AnyVar PCSA = 199; //mm^2 Lieber2
  // standard deviation of the PCSA
  AnyVar SD = 27;
  F0 = .StrengthScaleUlna*PCSA*.ConstParam.MusStressHand;
  Lf0 = 0.0512; //SD= 0.0019
  Lt0 = 0.1637-Lf0; //SD= 0.0039
  Gamma0 = 3.1*(pi/180); //SD=  1.2*(pi/180)
  Epsilon0 = Epsilon0Temp;
  K1 = K1Temp;
  K2 = K2Temp;
  Fcfast = FcfastTemp;
  Jt = JtTemp;
  Jpe = JpeTemp;
  PEFactor = PEFactorTemp;
};

AnyMuscleModel3E Flexor_Carpi_Ulnaris = {
  AnyVar PCSA = 342; //mm^2 Lieber2
  // standard deviation of the PCSA
  AnyVar SD = 23;
  F0 = .StrengthScaleUlna*PCSA*.ConstParam.MusStressHand;
  Lf0 = 0.0415; //SD= 0.0023
  Lt0 = 0.2278-Lf0; //SD= 0.0159
  Gamma0 = 12.1*(pi/180); //SD=  0.6*(pi/180)
  Epsilon0 = Epsilon0Temp;
  K1 = K1Temp;
  K2 = K2Temp;
  Fcfast = FcfastTemp;
  Jt = JtTemp;
  Jpe = JpeTemp;
  PEFactor = PEFactorTemp;
};


AnyMuscleModel3E Palmaris_Longus = {
  AnyVar PCSA = 69; //mm^2 Lieber1
  // standard deviation of the PCSA
  AnyVar SD = 17;
  F0 = .StrengthScaleUlna*PCSA*.ConstParam.MusStressHand;
  Lf0 = 0.052; //SD= 0.0031
  Lt0 = 0.134-Lf0; //SD= 0.0115
  Gamma0 = 4.0*(pi/180); //SD=  1.2*(pi/180)
  Epsilon0 = Epsilon0Temp;
  K1 = K1Temp;
  K2 = K2Temp;
  Fcfast = FcfastTemp;
  Jt = JtTemp;
  Jpe = JpeTemp;
  PEFactor = PEFactorTemp;
};


AnyMuscleModel3E Flexor_Digitorum_Superficialis_Digit5 = {
  AnyVar PCSA = 40; //mm^2 Lieber1
  // standard deviation of the PCSA
  AnyVar SD = 5;
  F0 = .StrengthScaleUlna*PCSA*.ConstParam.MusStressHand;
  Lf0 = 0.042; //SD= 0.0022
  Lt0 = 0.103-Lf0; //SD= 0.0063
  Gamma0 = 5*(pi/180); //SD=  0.7*(pi/180)
  Epsilon0 = Epsilon0Temp;
  K1 = K1Temp;
  K2 = K2Temp;
  Fcfast = FcfastTemp;
  Jt = JtTemp;
  Jpe = JpeTemp;
  PEFactor = PEFactorTemp;
};

AnyMuscleModel3E Flexor_Digitorum_Superficialis_Digit4 = {
  AnyVar PCSA = 161; //mm^2 Lieber1
  // standard deviation of the PCSA
  AnyVar SD = 18;
  F0 = .StrengthScaleUlna*PCSA*.ConstParam.MusStressHand;
  Lf0 = 0.060; //SD= 0.0027
  Lt0 = 0.155-Lf0; //SD= 0.0077
  Gamma0 = 4*(pi/180); //SD=  0.6*(pi/180)
  Epsilon0 = Epsilon0Temp;
  K1 = K1Temp;
  K2 = K2Temp;
  Fcfast = FcfastTemp;
  Jt = JtTemp;
  Jpe = JpeTemp;
  PEFactor = PEFactorTemp;
};


AnyMuscleModel3E Flexor_Digitorum_Superficialis_Digit3 = {
  AnyVar PCSA = 253; //mm^2 Lieber1
  // standard deviation of the PCSA
  AnyVar SD = 34;
  F0 = .StrengthScaleUlna*PCSA*.ConstParam.MusStressHand;
  Lf0 = 0.061; //SD= 0.0039
  Lt0 = 0.183-Lf0; //SD= 0.0115
  Gamma0 = 7*(pi/180); //SD=  0.7*(pi/180)
  Epsilon0 = Epsilon0Temp;
  K1 = K1Temp;
  K2 = K2Temp;
  Fcfast = FcfastTemp;
  Jt = JtTemp;
  Jpe = JpeTemp;
  PEFactor = PEFactorTemp;
};

AnyMuscleModel3E Flexor_Digitorum_Superficialis_Digit2 = {
  AnyVar PCSA = 171; //mm^2 Lieber1
  // standard deviation of the PCSA
  AnyVar SD = 28;
  F0 = .StrengthScaleUlna*PCSA*.ConstParam.MusStressHand;
  Lf0 = 0.068; //SD= 0.0028
  Lt0 = 0.207-Lf0; //SD= 0.0107
  Gamma0 = 6*(pi/180); //SD=  0.2*(pi/180)
  Epsilon0 = Epsilon0Temp;
  K1 = K1Temp;
  K2 = K2Temp;
  Fcfast = FcfastTemp;
  Jt = JtTemp;
  Jpe = JpeTemp;
  PEFactor = PEFactorTemp;
};


AnyMuscleModel3E Flexor_Digitorum_Profundus_Digit5 = {
  AnyVar PCSA = 220; //mm^2 Lieber1
  // standard deviation of the PCSA
  AnyVar SD = 30;
  F0 = .StrengthScaleUlna*PCSA*.ConstParam.MusStressHand;
  Lf0 = 0.061; //SD= 0.0039
  Lt0 = 0.150-Lf0; //SD= 0.0047
  Gamma0 = 8*(pi/180); //SD=  0.9*(pi/180)
  Epsilon0 = Epsilon0Temp;
  K1 = K1Temp;
  K2 = K2Temp;
  Fcfast = FcfastTemp;
  Jt = JtTemp;
  Jpe = JpeTemp;
  PEFactor = PEFactorTemp;
};


AnyMuscleModel3E Flexor_Digitorum_Profundus_Digit4 = {
  AnyVar PCSA = 172; //mm^2 Lieber1
  // standard deviation of the PCSA
  AnyVar SD = 18;
  F0 = .StrengthScaleUlna*PCSA*.ConstParam.MusStressHand;
  Lf0 = 0.065; //SD= 0.0026
  Lt0 = 0.194-Lf0; //SD= 0.007
  Gamma0 = 7*(pi/180); //SD=  0.5*(pi/180)
  Epsilon0 = Epsilon0Temp;
  K1 = K1Temp;
  K2 = K2Temp;
  Fcfast = FcfastTemp;
  Jt = JtTemp;
  Jpe = JpeTemp;
  PEFactor = PEFactorTemp;
};

AnyMuscleModel3E Flexor_Digitorum_Profundus_Digit3 = {
  AnyVar PCSA = 223; //mm^2 Lieber1
  // standard deviation of the PCSA
  AnyVar SD = 22;
  F0 = .StrengthScaleUlna*PCSA*.ConstParam.MusStressHand;
  Lf0 = 0.068; //SD= 0.0027
  Lt0 = 0.200-Lf0; //SD= 0.0082
  Gamma0 = 6*(pi/180); //SD=  0.3*(pi/180)
  Epsilon0 = Epsilon0Temp;
  K1 = K1Temp;
  K2 = K2Temp;
  Fcfast = FcfastTemp;
  Jt = JtTemp;
  Jpe = JpeTemp;
  PEFactor = PEFactorTemp;
};

AnyMuscleModel3E Flexor_Digitorum_Profundus_Digit2 = {
  AnyVar PCSA = 177; //mm^2 Lieber1
  // standard deviation of the PCSA
  AnyVar SD = 16;
  F0 = .StrengthScaleUlna*PCSA*.ConstParam.MusStressHand;
  Lf0 = 0.061; //SD= 0.0024
  Lt0 = 0.149-Lf0; //SD= 0.0038
  Gamma0 = 7*(pi/180); //SD=  0.7*(pi/180)
  Epsilon0 = Epsilon0Temp;
  K1 = K1Temp;
  K2 = K2Temp;
  Fcfast = FcfastTemp;
  Jt = JtTemp;
  Jpe = JpeTemp;
  PEFactor = PEFactorTemp;
};


AnyMuscleModel3E Extensor_Digitorum_Digit5 = {
  AnyVar PCSA = 40; //mm^2 Lieber1
  // standard deviation of the PCSA
  AnyVar SD = 6;
  F0 = .StrengthScaleUlna*PCSA*.ConstParam.MusStressHand;
  Lf0 = 0.053; //SD= 0.0052
  Lt0 = 0.121-Lf0; //SD= 0.008
  Gamma0 = 2*(pi/180); //SD=  0.7*(pi/180)
  Epsilon0 = Epsilon0Temp;
  K1 = K1Temp;
  K2 = K2Temp;
  Fcfast = FcfastTemp;
  Jt = JtTemp;
  Jpe = JpeTemp;
  PEFactor = PEFactorTemp;
};

AnyMuscleModel3E Extensor_Digitorum_Digit4 = {
  AnyVar PCSA = 86; //mm^2 Lieber1
  // standard deviation of the PCSA
  AnyVar SD = 13;
  F0 = .StrengthScaleUlna*PCSA*.ConstParam.MusStressHand;
  Lf0 = 0.051; //SD= 0.0018
  Lt0 = 0.125-Lf0; //SD= 0.0107
  Gamma0 = 3*(pi/180); //SD=  0.5*(pi/180)
  Epsilon0 = Epsilon0Temp;
  K1 = K1Temp;
  K2 = K2Temp;
  Fcfast = FcfastTemp;
  Jt = JtTemp;
  Jpe = JpeTemp;
  PEFactor = PEFactorTemp;
};


AnyMuscleModel3E Extensor_Digitorum_Digit3 = {
  AnyVar PCSA = 102; //mm^2 Lieber1
  // standard deviation of the PCSA
  AnyVar SD = 20;
  F0 = .StrengthScaleUlna*PCSA*.ConstParam.MusStressHand;
  Lf0 = 0.059; //SD= 0.0035
  Lt0 = 0.112-Lf0; //SD= 0.0047
  Gamma0 = 3*(pi/180); //SD=  1*(pi/180)
  Epsilon0 = Epsilon0Temp;
  K1 = K1Temp;
  K2 = K2Temp;
  Fcfast = FcfastTemp;
  Jt = JtTemp;
  Jpe = JpeTemp;
  PEFactor = PEFactorTemp;
};

AnyMuscleModel3E Extensor_Digitorum_Digit2 = {
  AnyVar PCSA = 52; //mm^2 Lieber1
  // standard deviation of the PCSA
  AnyVar SD = 8;
  F0 = .StrengthScaleUlna*PCSA*.ConstParam.MusStressHand;
  Lf0 = 0.057; //SD= 0.0036
  Lt0 = 0.114-Lf0; //SD= 0.0034
  Gamma0 = 3*(pi/180); //SD=  0.5*(pi/180)
  Epsilon0 = Epsilon0Temp;
  K1 = K1Temp;
  K2 = K2Temp;
  Fcfast = FcfastTemp;
  Jt = JtTemp;
  Jpe = JpeTemp;
  PEFactor = PEFactorTemp;
};

AnyMuscleModel3E Extensor_Digiti_Minimi = {
  AnyVar PCSA = 64; //mm^2 Lieber1
  // standard deviation of the PCSA
  AnyVar SD = 10;
  F0 = .StrengthScaleUlna*PCSA*.ConstParam.MusStressHand;
  Lf0 = 0.055; //SD= 0.0037
  Lt0 = 0.152-Lf0; //SD= 0.0092
  Gamma0 = 3*(pi/180); //SD=  0.6*(pi/180)
  Epsilon0 = Epsilon0Temp;
  K1 = K1Temp;
  K2 = K2Temp;
  Fcfast = FcfastTemp;
  Jt = JtTemp;
  Jpe = JpeTemp;
  PEFactor = PEFactorTemp;
};

AnyMuscleModel3E Flexor_Pollicis_Longus = {
  AnyVar PCSA = 208; //mm^2 Lieber1
  // standard deviation of the PCSA
  AnyVar SD = 22;
  F0 = .StrengthScaleUlna*PCSA*.ConstParam.MusStressHand;
  Lf0 = 0.045; //SD= 0.0021
  Lt0 = 0.168-Lf0; //SD= 0.010
  Gamma0 = 7*(pi/180); //SD=  0.2*(pi/180)
  Epsilon0 = Epsilon0Temp;
  K1 = K1Temp;
  K2 = K2Temp;
  Fcfast = FcfastTemp;
  Jt = JtTemp;
  Jpe = JpeTemp;
  PEFactor = PEFactorTemp;
};


//NEW ADDED by loopluc
AnyMuscleModel3E Abductor_Digiti_Minimi = {
  AnyVar PCSA = 89; //mm^2 Jacobson
  // standard deviation of the PCSA
  AnyVar SD = 49;
  F0 = .StrengthScaleUlna*PCSA*.ConstParam.MusStressHand;
  Lf0 = 0.0462; //SD= 0.0072
  Lt0 = 0.0684-Lf0; //SD= 0.0065
  Gammabar = 3.9*(pi/180); //SD=  1.3*(pi/180)
  Epsilon0 = EpsilonbarTemp;
  K1 = K1Temp;
  K2 = K2Temp;
  Fcfast = FcfastTemp;
  Jt = JtTemp;
  Jpe = JpeTemp;
  PEFactor = PEFactorTemp;
};

AnyMuscleModel3E Flexor_Digiti_Minimi = {
  AnyVar PCSA = 54; //mm^2 Lieber 2
  // standard deviation of the PCSA
  AnyVar SD = 36;
  F0 = .StrengthScaleUlna*PCSA*.ConstParam.MusStressHand;
  Lf0 = 0.0406; //SD= 0.0137
  Lt0 = 0.0592-Lf0; //SD= 0.0104
  Gammabar = 3.6*(pi/180); //SD=  1.0*(pi/180)
  Epsilon0 = EpsilonbarTemp;
  K1 = K1Temp;
  K2 = K2Temp;
  Fcfast = FcfastTemp;
  Jt = JtTemp;
  Jpe = JpeTemp;
  PEFactor = PEFactorTemp;
};


AnyMuscleModel3E Palmar_Interosseous_Digit2 = {
  AnyVar PCSA = 75; //mm^2 Jacobson
  // standard deviation of the PCSA
  AnyVar SD = 25;
  F0 = .StrengthScaleUlna*PCSA*.ConstParam.MusStressHand;
  Lf0 = 0.025; //SD= 0.005
  Lt0 = 0.0551-Lf0; //SD= 0.005
  Gammabar = 6.3*(pi/180); //SD=  2.2*(pi/180)
  Epsilon0 = EpsilonbarTemp;
  K1 = K1Temp;
  K2 = K2Temp;
  Fcfast = FcfastTemp;
  Jt = JtTemp;
  Jpe = JpeTemp;
  PEFactor = PEFactorTemp;
};
AnyMuscleModel3E Palmar_Interosseous_Digit4 = {
  AnyVar PCSA = 65; //mm^2 Jacobson
  // standard deviation of the PCSA
  AnyVar SD = 26;
  F0 = .StrengthScaleUlna*PCSA*.ConstParam.MusStressHand;
  Lf0 = 0.026; //SD= 0.0043
  Lt0 = 0.0482-Lf0; //SD= 0.0029
  Gammabar = 7.7*(pi/180); //SD=  3.9*(pi/180)
  Epsilon0 = EpsilonbarTemp;
  K1 = K1Temp;
  K2 = K2Temp;
  Fcfast = FcfastTemp;
  Jt = JtTemp;
  Jpe = JpeTemp;
  PEFactor = PEFactorTemp;
};
AnyMuscleModel3E Palmar_Interosseous_Digit5 = {
  AnyVar PCSA = 61; //mm^2 Jacobson
  // standard deviation of the PCSA
  AnyVar SD = 23;
  F0 = .StrengthScaleUlna*PCSA*.ConstParam.MusStressHand;
  Lf0 = 0.0236; //SD= 0.0026
  Lt0 = 0.0453-Lf0; //SD= 0.0058
  Gammabar = 8.2*(pi/180); //SD=  3.5*(pi/180)
  Epsilon0 = EpsilonbarTemp;
  K1 = K1Temp;
  K2 = K2Temp;
  Fcfast = FcfastTemp;
  Jt = JtTemp;
  Jpe = JpeTemp;
  PEFactor = PEFactorTemp;
};

//Lumbrical
AnyMuscleModel3E Lumbrical_Digit2 = {
  AnyVar PCSA = 11; //mm^2 Jacobson
  // standard deviation of the PCSA
  AnyVar SD = 3;
  F0 = .StrengthScaleUlna*PCSA*.ConstParam.MusStressHand;
  Lf0 = 0.0554; //SD= 0.0102
  Lt0 = 0.0649-Lf0; //SD= 0.010
  Gammabar = 1.2*(pi/180); //SD=  0.9*(pi/180)
  Epsilon0 = EpsilonbarTemp;
  K1 = K1Temp;
  K2 = K2Temp;
  Fcfast = FcfastTemp;
  Jt = JtTemp;
  Jpe = JpeTemp;
  PEFactor = PEFactorTemp;
};

AnyMuscleModel3E Lumbrical_Digit3 = {
  AnyVar PCSA = 8; //mm^2 Jacobson
  // standard deviation of the PCSA
  AnyVar SD = 4;
  F0 = .StrengthScaleUlna*PCSA*.ConstParam.MusStressHand;
  Lf0 = 0.0555; //SD= 0.0177
  Lt0 = 0.0612-Lf0; //SD= 0.0178
  Gammabar = 1.6*(pi/180); //SD=  1.3*(pi/180)
  Epsilon0 = EpsilonbarTemp;
  K1 = K1Temp;
  K2 = K2Temp;
  Fcfast = FcfastTemp;
  Jt = JtTemp;
  Jpe = JpeTemp;
  PEFactor = PEFactorTemp;
};
AnyMuscleModel3E Lumbrical_Digit41 = {
  AnyVar PCSA = 8/2; //mm^2 Jacobson
  // standard deviation of the PCSA
  AnyVar SD = 4/2;
  F0 = .StrengthScaleUlna*PCSA*.ConstParam.MusStressHand;
  Lf0 = 0.0562; //SD= 0.0107
  Lt0 = 0.0643-Lf0; //SD= 0.0089
  Gammabar = 1.1*(pi/180); //SD=  0.8*(pi/180)
  Epsilon0 = EpsilonbarTemp;
  K1 = K1Temp;
  K2 = K2Temp;
  Fcfast = FcfastTemp;
  Jt = JtTemp;
  Jpe = JpeTemp;
  PEFactor = PEFactorTemp;
};
AnyMuscleModel3E Lumbrical_Digit42 = {
  AnyVar PCSA = 8/2; //mm^2 Jacobson
  // standard deviation of the PCSA
  AnyVar SD = 4/2;
  F0 = .StrengthScaleUlna*PCSA*.ConstParam.MusStressHand;
  Lf0 = 0.0562; //SD= 0.0107
  Lt0 = 0.0643-Lf0; //SD= 0.0089
  Gammabar = 1.1*(pi/180); //SD=  0.8*(pi/180)
  Epsilon0 = EpsilonbarTemp;
  K1 = K1Temp;
  K2 = K2Temp;
  Fcfast = FcfastTemp;
  Jt = JtTemp;
  Jpe = JpeTemp;
  PEFactor = PEFactorTemp;

};
AnyMuscleModel3E Lumbrical_Digit51 = {
  AnyVar PCSA = 6/2; //mm^2 Jacobson
  // standard deviation of the PCSA
  AnyVar SD = 3/2;
  F0 = .StrengthScaleUlna*PCSA*.ConstParam.MusStressHand;
  Lf0 = 0.0501; //SD= 0.0084
  Lt0 = 0.0538-Lf0; //SD= 0.0115
  Gammabar = 0.7*(pi/180); //SD=  1.0*(pi/180)
  Epsilon0 = EpsilonbarTemp;
  K1 = K1Temp;
  K2 = K2Temp;
  Fcfast = FcfastTemp;
  Jt = JtTemp;
  Jpe = JpeTemp;
  PEFactor = PEFactorTemp;
};
AnyMuscleModel3E Lumbrical_Digit52 = {
  AnyVar PCSA = 6/2; //mm^2 Jacobson
  // standard deviation of the PCSA
  AnyVar SD = 3/2;
  F0 = .StrengthScaleUlna*PCSA*.ConstParam.MusStressHand;
  Lf0 = 0.0501; //SD= 0.0084
  Lt0 = 0.0538-Lf0; //SD= 0.0115
  Gammabar = 0.7*(pi/180); //SD=  1.0*(pi/180)
  Epsilon0 = EpsilonbarTemp;
  K1 = K1Temp;
  K2 = K2Temp;
  Fcfast = FcfastTemp;
  Jt = JtTemp;
  Jpe = JpeTemp;
  PEFactor = PEFactorTemp;
};
//DorsalInterosseous

AnyMuscleModel3E DorsalInterosseous_Digit21 = {
  AnyVar PCSA = 150/2; //mm^2 Jacobson
  // standard deviation of the PCSA
  AnyVar SD = 40/2;
  F0 = .StrengthScaleUlna*PCSA*.ConstParam.MusStressHand;
  Lf0 = 0.0317; //SD= 0.0028
  Lt0 = 0.0619-Lf0; //SD= 0.0025
  Gammabar = 9.2*(pi/180); //SD=  2.6*(pi/180)
  Epsilon0 = EpsilonbarTemp;
  K1 = K1Temp;
  K2 = K2Temp;
  Fcfast = FcfastTemp;
  Jt = JtTemp;
  Jpe = JpeTemp;
  PEFactor = PEFactorTemp;
};

AnyMuscleModel3E DorsalInterosseous_Digit22 = {
  AnyVar PCSA = 150/2; //mm^2 Jacobson
  // standard deviation of the PCSA
  AnyVar SD = 40/2;
  F0 = .StrengthScaleUlna*PCSA*.ConstParam.MusStressHand;
  Lf0 = 0.0317; //SD= 0.0028
  Lt0 = 0.0619-Lf0; //SD= 0.0025
  Gammabar = 9.2*(pi/180); //SD=  2.6*(pi/180)
  Epsilon0 = EpsilonbarTemp;
  K1 = K1Temp;
  K2 = K2Temp;
  Fcfast = FcfastTemp;
  Jt = JtTemp;
  Jpe = JpeTemp;
  PEFactor = PEFactorTemp;
};
AnyMuscleModel3E DorsalInterosseous_Digit31 = {
  AnyVar PCSA = 134/2; //mm^2 Jacobson
  // standard deviation of the PCSA
  AnyVar SD = 77/2;
  F0 = .StrengthScaleUlna*PCSA*.ConstParam.MusStressHand;
  Lf0 = 0.0251; //SD= 0.0063
  Lt0 = 0.0628-Lf0; //SD= 0.0081
  Gammabar = 8.2*(pi/180); //SD=  3.1*(pi/180)
  Epsilon0 = EpsilonbarTemp;
  K1 = K1Temp;
  K2 = K2Temp;
  Fcfast = FcfastTemp;
  Jt = JtTemp;
  Jpe = JpeTemp;
  PEFactor = PEFactorTemp;
};
AnyMuscleModel3E DorsalInterosseous_Digit32 = {
  AnyVar PCSA = 134/2; //mm^2 Jacobson
  // standard deviation of the PCSA
  AnyVar SD = 77/2;
  F0 = .StrengthScaleUlna*PCSA*.ConstParam.MusStressHand;
  Lf0 = 0.0251; //SD= 0.0063
  Lt0 = 0.0628-Lf0; //SD= 0.0081
  Gammabar = 8.2*(pi/180); //SD=  3.1*(pi/180)
  Epsilon0 = EpsilonbarTemp;
  K1 = K1Temp;
  K2 = K2Temp;
  Fcfast = FcfastTemp;
  Jt = JtTemp;
  Jpe = JpeTemp;
  PEFactor = PEFactorTemp;
};
AnyMuscleModel3E DorsalInterosseous_Digit33 = {
  AnyVar PCSA = 95/2; //mm^2 Jacobson
  // standard deviation of the PCSA
  AnyVar SD = 45/2;
  F0 = .StrengthScaleUlna*PCSA*.ConstParam.MusStressHand;
  Lf0 = 0.0258; //SD= 0.0034
  Lt0 = 0.0549-Lf0; //SD= 0.0046
  Gammabar = 9.8*(pi/180); //SD=  2.8*(pi/180)
  Epsilon0 = EpsilonbarTemp;
  K1 = K1Temp;
  K2 = K2Temp;
  Fcfast = FcfastTemp;
  Jt = JtTemp;
  Jpe = JpeTemp;
  PEFactor = PEFactorTemp;
};
AnyMuscleModel3E DorsalInterosseous_Digit34 = {
  AnyVar PCSA = 95/2; //mm^2 Jacobson
  // standard deviation of the PCSA
  AnyVar SD = 45/2;
  F0 = .StrengthScaleUlna*PCSA*.ConstParam.MusStressHand;
  Lf0 = 0.0258; //SD= 0.0034
  Lt0 = 0.0549-Lf0; //SD= 0.0046
  Gammabar = 9.8*(pi/180); //SD=  2.8*(pi/180)
  Epsilon0 = EpsilonbarTemp;
  K1 = K1Temp;
  K2 = K2Temp;
  Fcfast = FcfastTemp;
  Jt = JtTemp;
  Jpe = JpeTemp;
  PEFactor = PEFactorTemp;
};
AnyMuscleModel3E DorsalInterosseous_Digit41 = {
  AnyVar PCSA = 91/2; //mm^2 Jacobson
  // standard deviation of the PCSA
  AnyVar SD = 38/2;
  F0 = .StrengthScaleUlna*PCSA*.ConstParam.MusStressHand;
  Lf0 = 0.0258; //SD= 0.0034
  Lt0 = 0.0501-Lf0; //SD= 0.0053
  Gammabar = 9.4*(pi/180); //SD=  4.2*(pi/180)
  Epsilon0 = EpsilonbarTemp;
  K1 = K1Temp;
  K2 = K2Temp;
  Fcfast = FcfastTemp;
  Jt = JtTemp;
  Jpe = JpeTemp;
  PEFactor = PEFactorTemp;
};
AnyMuscleModel3E DorsalInterosseous_Digit42 = {
  AnyVar PCSA = 91/2; //mm^2 Jacobson
  // standard deviation of the PCSA
  AnyVar SD = 38/2;
  F0 = .StrengthScaleUlna*PCSA*.ConstParam.MusStressHand;
  Lf0 = 0.0258; //SD= 0.0034
  Lt0 = 0.0501-Lf0; //SD= 0.0053
  Gammabar = 9.4*(pi/180); //SD=  4.2*(pi/180)
  Epsilon0 = EpsilonbarTemp;
  K1 = K1Temp;
  K2 = K2Temp;
  Fcfast = FcfastTemp;
  Jt = JtTemp;
  Jpe = JpeTemp;
  PEFactor = PEFactorTemp;
};
AnyMuscleModel3E Abductor_Pollicis_Brevis = {
  AnyVar PCSA = 68; //mm^2 Jacobson
  // standard deviation of the PCSA
  AnyVar SD = 28;
  F0 = .StrengthScaleUlna*PCSA*.ConstParam.MusStressHand;
  Lf0 = 0.0462; //SD= 0.0072
  Lt0 = 0.0684-Lf0; //SD= 0.0065
  Gammabar =3.9*(pi/180); //SD=  1.3*(pi/180)
  Epsilon0 = EpsilonbarTemp;
  K1 = K1Temp;
  K2 = K2Temp;
  Fcfast = FcfastTemp;
  Jt = JtTemp;
  Jpe = JpeTemp;
  PEFactor = PEFactorTemp;
};
AnyMuscleModel3E Abductor_Pollicis = {
  AnyVar PCSA = 194; //mm^2 Jacobson
  // standard deviation of the PCSA
  AnyVar SD = 39;
  F0 = .StrengthScaleUlna*PCSA*.ConstParam.MusStressHand;
  Lf0 = 0.034; //SD= 0.0075
  Lt0 = 0.0546-Lf0; //SD= 0.0089
  Gammabar = 17.3*(pi/180); //SD=  3.4*(pi/180)
  Epsilon0 = EpsilonbarTemp;
  K1 = K1Temp;
  K2 = K2Temp;
  Fcfast = FcfastTemp;
  Jt = JtTemp;
  Jpe = JpeTemp;
  PEFactor = PEFactorTemp;
};
AnyMuscleModel3E Flexor_Pollicis_Brevis = {
  AnyVar PCSA = 66; //mm^2 Jacobson
  // standard deviation of the PCSA
  AnyVar SD = 20;
  F0 = .StrengthScaleUlna*PCSA*.ConstParam.MusStressHand;
  Lf0 = 0.0415; //SD= 0.0052
  Lt0 = 0.0572-Lf0; //SD= 0.0037
  Gammabar = 6.2*(pi/180); //SD=  4.5*(pi/180)
  Epsilon0 = EpsilonbarTemp;
  K1 = K1Temp;
  K2 = K2Temp;
  Fcfast = FcfastTemp;
  Jt = JtTemp;
  Jpe = JpeTemp;
  PEFactor = PEFactorTemp;
};
AnyMuscleModel3E Opponens_Pollicis = {
  AnyVar PCSA = 102; //mm^2 Jacobson
  // standard deviation of the PCSA
  AnyVar SD = 35;
  F0 = .StrengthScaleUlna*PCSA*.ConstParam.MusStressHand;
  Lf0 = 0.0355; //SD= 0.0051
  Lt0 = 0.0555-Lf0; //SD= 0.0050
  Gammabar = 4.9*(pi/180); //SD=  2.5*(pi/180)
  Epsilon0 = EpsilonbarTemp;
  K1 = K1Temp;
  K2 = K2Temp;
  Fcfast = FcfastTemp;
  Jt = JtTemp;
  Jpe = JpeTemp;
  PEFactor = PEFactorTemp;
};

//--End of loopluc


#endif

#if _HAND_MUSCLE_PARAMETERS_3E_HILL == "MIRAKHORLO"

AnyMuscleModel3E Extensor_Pollicis_Longus = {
  AnyVar PCSA = 62.3; // mm^2 Mirakhorlo
  F0 = .StrengthScaleUlna*PCSA*.ConstParam.MusStressHand;
  Lf0 = 0.044;
  Lt0 = 0.202;
  Gamma0 = 0*(pi/180);
  Epsilon0 = Epsilon0Temp;
  K1 = K1Temp;
  K2 = K2Temp;
  Fcfast = FcfastTemp;
  Jt = JtTemp;
  Jpe = JpeTemp;
  PEFactor = PEFactorTemp;
};
AnyMuscleModel3E  Extensor_Pollicis_Brevis = {
  AnyVar PCSA = 58.4; // mm^2 Mirakhorlo
  F0 =  .StrengthScaleUlna*PCSA*.ConstParam.MusStressHand;
  Lf0 = 0.0405;
  Lt0 = 0.1357;
  Gamma0 = 21*(pi/180);
  Epsilon0 = Epsilon0Temp;
  K1 = K1Temp;
  K2 = K2Temp;
  Fcfast = FcfastTemp;
  Jt = JtTemp;
  Jpe = JpeTemp;
  PEFactor = PEFactorTemp;
};

AnyMuscleModel3E Abductor_Pollicis_Longus = {
  AnyVar PCSA = 111.4; // mm^2 Mirakhorlo
  F0 =  .StrengthScaleUlna*PCSA*.ConstParam.MusStressHand;
  Lf0 = 0.0501;
  Lt0 = 0.156;
  Gamma0 = 12*(pi/180);
  Epsilon0 = Epsilon0Temp;
  K1 = K1Temp;
  K2 = K2Temp;
  Fcfast = FcfastTemp;
  Jt = JtTemp;
  Jpe = JpeTemp;
  PEFactor = PEFactorTemp;
};


AnyMuscleModel3E Extensor_Indicis = {
  AnyVar PCSA = 61.0; // mm^2 Mirakhorlo
  F0 =  .StrengthScaleUlna*PCSA*.ConstParam.MusStressHand;
  Lf0 = 0.045;
  Lt0 = 0.206;
  Gamma0 = 0*(pi/180);
  Epsilon0 = Epsilon0Temp;
  K1 = K1Temp;
  K2 = K2Temp;
  Fcfast = FcfastTemp;
  Jt = JtTemp;
  Jpe = JpeTemp;
  PEFactor = PEFactorTemp;
};

AnyMuscleModel3E Extensor_Carpi_Ulnaris = {
  AnyVar PCSA = 184.8; // mm^2 Mirakhorlo
  F0 = .StrengthScaleUlna*PCSA*.ConstParam.MusStressHand;
  Lf0 = 0.0456;
  Lt0 = 0.137;
  Gamma0 = 11*(pi/180);
  Epsilon0 = Epsilon0Temp;
  K1 = K1Temp;
  K2 = K2Temp;
  Fcfast = FcfastTemp;
  Jt = JtTemp;
  Jpe = JpeTemp;
  PEFactor = PEFactorTemp;
};


//Fake muscle with no anatomical sense
AnyMuscleModel3E Intrinsic_Muscle_1 = {
  AnyVar PCSA = 84.8; // mm^2 Mirakhorlo
  F0 = .StrengthScaleUlna*PCSA*.ConstParam.MusStressHand;
  Lf0 = 0.0456;
  Lt0 = 0.137;
  Gamma0 = 11*(pi/180);
  Epsilon0 = Epsilon0Temp;
  K1 = K1Temp;
  K2 = K2Temp;
  Fcfast = FcfastTemp;
  Jt = JtTemp;
  Jpe = JpeTemp;
  PEFactor = PEFactorTemp;
};


AnyMuscleModel3E Extensor_Carpi_Radialis_Longus = {
  AnyVar PCSA = 181.1; // mm^2 Mirakhorlo
  F0 = .StrengthScaleUlna*PCSA*.ConstParam.MusStressHand;
  Lf0 = 0.0727;
  Lt0 = 0.210;
  Gamma0 = 0*(pi/180);
  Epsilon0 = Epsilon0Temp;
  K1 = K1Temp;
  K2 = K2Temp;
  Fcfast = FcfastTemp;
  Jt = JtTemp;
  Jpe = JpeTemp;
  PEFactor = PEFactorTemp;
};


AnyMuscleModel3E Extensor_Carpi_Radialis_Brevis = {
  AnyVar PCSA = 258.5; // mm^2 Mirakhorlo
  F0 = .StrengthScaleUlna*PCSA*.ConstParam.MusStressHand;
  Lf0 = 0.0351;
  Lt0 = 0.185;
  Gamma0 = 12*(pi/180);
  Epsilon0 = Epsilon0Temp;
  K1 = K1Temp;
  K2 = K2Temp;
  Fcfast = FcfastTemp;
  Jt = JtTemp;
  Jpe = JpeTemp;
  PEFactor = PEFactorTemp;
};


AnyMuscleModel3E Flexor_Carpi_Radialis = {
  AnyVar PCSA = 91.6; //mm^2 Mirakhorlo
  F0 = .StrengthScaleUlna*PCSA*.ConstParam.MusStressHand;
  Lf0 = 0.0764;
  Lt0 = 0.188;
  Gamma0 = 0*(pi/180);
  Epsilon0 = Epsilon0Temp;
  K1 = K1Temp;
  K2 = K2Temp;
  Fcfast = FcfastTemp;
  Jt = JtTemp;
  Jpe = JpeTemp;
  PEFactor = PEFactorTemp;
};

AnyMuscleModel3E Flexor_Carpi_Ulnaris = {
  AnyVar PCSA = 173.0; //mm^2 Mirakhorlo
  F0 = .StrengthScaleUlna*PCSA*.ConstParam.MusStressHand;
  Lf0 = 0.0728;
  Lt0 = 0.200;
  Gamma0 = 10*(pi/180);
  Epsilon0 = Epsilon0Temp;
  K1 = K1Temp;
  K2 = K2Temp;
  Fcfast = FcfastTemp;
  Jt = JtTemp;
  Jpe = JpeTemp;
  PEFactor = PEFactorTemp;
};


AnyMuscleModel3E Palmaris_Longus = {
  AnyVar PCSA = 36.1; //mm^2 Lieber2
  F0 = .StrengthScaleUlna*PCSA*.ConstParam.MusStressHand;
  Lf0 = 0.0892;
  Lt0 = 0.247;
  Gamma0 = 0*(pi/180);
  Epsilon0 = Epsilon0Temp;
  K1 = K1Temp;
  K2 = K2Temp;
  Fcfast = FcfastTemp;
  Jt = JtTemp;
  Jpe = JpeTemp;
  PEFactor = PEFactorTemp;
};


AnyMuscleModel3E Flexor_Digitorum_Superficialis_Digit5 = {
  AnyVar PCSA = 109.7/2; //mm^2 Mirakhorlo
  F0 = .StrengthScaleUlna*PCSA*.ConstParam.MusStressHand;
  Lf0 = 0.050;
  Lt0 = 0.260;
  Gamma0 = 0*(pi/180);
  Epsilon0 = Epsilon0Temp;
  K1 = K1Temp;
  K2 = K2Temp;
  Fcfast = FcfastTemp;
  Jt = JtTemp;
  Jpe = JpeTemp;
  PEFactor = PEFactorTemp;
};

AnyMuscleModel3E Flexor_Digitorum_Superficialis_Digit4 = {
  AnyVar PCSA = 109.7/2; //mm^2 Mirakhorlo
  F0 = .StrengthScaleUlna*PCSA*.ConstParam.MusStressHand;
  Lf0 = 0.050;
  Lt0 = 0.260;
  Gamma0 = 0*(pi/180);
  Epsilon0 = Epsilon0Temp;
  K1 = K1Temp;
  K2 = K2Temp;
  Fcfast = FcfastTemp;
  Jt = JtTemp;
  Jpe = JpeTemp;
  PEFactor = PEFactorTemp;
};


AnyMuscleModel3E Flexor_Digitorum_Superficialis_Digit3 = {
  AnyVar PCSA = 141.2; //mm^2 Mirakhorlo
  F0 = .StrengthScaleUlna*PCSA*.ConstParam.MusStressHand;
  Lf0 = 0.065;
  Lt0 = 0.240;
  Gamma0 = 15*(pi/180);
  Epsilon0 = Epsilon0Temp;
  K1 = K1Temp;
  K2 = K2Temp;
  Fcfast = FcfastTemp;
  Jt = JtTemp;
  Jpe = JpeTemp;
  PEFactor = PEFactorTemp;
};

AnyMuscleModel3E Flexor_Digitorum_Superficialis_Digit2 = {
  AnyVar PCSA = 183.6; //mm^2 Mirakhorlo
  F0 = .StrengthScaleUlna*PCSA*.ConstParam.MusStressHand;
  Lf0 = 0.0521;
  Lt0 = 0.215;
  Gamma0 = 16*(pi/180);
  Epsilon0 = Epsilon0Temp;
  K1 = K1Temp;
  K2 = K2Temp;
  Fcfast = FcfastTemp;
  Jt = JtTemp;
  Jpe = JpeTemp;
  PEFactor = PEFactorTemp;
};


AnyMuscleModel3E Flexor_Digitorum_Profundus_Digit5 = {
  AnyVar PCSA = 240.5/2; //mm^2 Mirakhorlo
  F0 = .StrengthScaleUlna*PCSA*.ConstParam.MusStressHand;
  Lf0 = 0.0547;
  Lt0 = 0.300;
  Gamma0 = 13.9*(pi/180);
  Epsilon0 = Epsilon0Temp;
  K1 = K1Temp;
  K2 = K2Temp;
  Fcfast = FcfastTemp;
  Jt = JtTemp;
  Jpe = JpeTemp;
  PEFactor = PEFactorTemp;
};


AnyMuscleModel3E Flexor_Digitorum_Profundus_Digit4 = {
  AnyVar PCSA = 240.5/2; //mm^2 Mirakhorlo
  F0 = .StrengthScaleUlna*PCSA*.ConstParam.MusStressHand;
  Lf0 = 0.0547;
  Lt0 = 0.300;
  Gamma0 = 13.9*(pi/180);
  Epsilon0 = Epsilon0Temp;
  K1 = K1Temp;
  K2 = K2Temp;
  Fcfast = FcfastTemp;
  Jt = JtTemp;
  Jpe = JpeTemp;
  PEFactor = PEFactorTemp;
};

AnyMuscleModel3E Flexor_Digitorum_Profundus_Digit3 = {
  AnyVar PCSA = 196.0; //mm^2 Mirakhorlo
  F0 = .StrengthScaleUlna*PCSA*.ConstParam.MusStressHand;
  Lf0 = 0.0594;
  Lt0 = 0.290;
  Gamma0 = 0*(pi/180);
  Epsilon0 = Epsilon0Temp;
  K1 = K1Temp;
  K2 = K2Temp;
  Fcfast = FcfastTemp;
  Jt = JtTemp;
  Jpe = JpeTemp;
  PEFactor = PEFactorTemp;
};

AnyMuscleModel3E Flexor_Digitorum_Profundus_Digit2 = {
  AnyVar PCSA = 138.5; //mm^2 Mirakhorlo
  F0 = .StrengthScaleUlna*PCSA*.ConstParam.MusStressHand;
  Lf0 = 0.0909;
  Lt0 = 0.260;
  Gamma0 = 10*(pi/180);
  Epsilon0 = Epsilon0Temp;
  K1 = K1Temp;
  K2 = K2Temp;
  Fcfast = FcfastTemp;
  Jt = JtTemp;
  Jpe = JpeTemp;
  PEFactor = PEFactorTemp;
};


AnyMuscleModel3E Extensor_Digitorum_Digit5 = {
  AnyVar PCSA = 40; //mm^2 Lieber1, hence it was not present in Mirakhorlo
  F0 = .StrengthScaleUlna*PCSA*.ConstParam.MusStressHand;
  Lf0 = 0.053;
  Lt0 = 0.121;
  Gamma0 = 2*(pi/180);
  Epsilon0 = Epsilon0Temp;
  K1 = K1Temp;
  K2 = K2Temp;
  Fcfast = FcfastTemp;
  Jt = JtTemp;
  Jpe = JpeTemp;
  PEFactor = PEFactorTemp;
};

AnyMuscleModel3E Extensor_Digitorum_Digit4 = {
  AnyVar PCSA = 223.8/2; //mm^2 Mirakhorlo
  F0 = .StrengthScaleUlna*PCSA*.ConstParam.MusStressHand;
  Lf0 = 0.0419;
  Lt0 = 0.2862;
  Gamma0 = 0*(pi/180);
  Epsilon0 = Epsilon0Temp;
  K1 = K1Temp;
  K2 = K2Temp;
  Fcfast = FcfastTemp;
  Jt = JtTemp;
  Jpe = JpeTemp;
  PEFactor = PEFactorTemp;
};


AnyMuscleModel3E Extensor_Digitorum_Digit3 = {
  AnyVar PCSA = 223.8/2; //mm^2 Mirakhorlo
  F0 = .StrengthScaleUlna*PCSA*.ConstParam.MusStressHand;
  Lf0 = 0.0419;
  Lt0 = 0.2862;
  Gamma0 = 0*(pi/180);
  Epsilon0 = Epsilon0Temp;
  K1 = K1Temp;
  K2 = K2Temp;
  Fcfast = FcfastTemp;
  Jt = JtTemp;
  Jpe = JpeTemp;
  PEFactor = PEFactorTemp;
};

AnyMuscleModel3E Extensor_Digitorum_Digit2 = {
  AnyVar PCSA = 48.9; //mm^2 Mirakhorlo
  F0 = .StrengthScaleUlna*PCSA*.ConstParam.MusStressHand;
  Lf0 = 0.0426;
  Lt0 = 0.153;
  Gamma0 = 0*(pi/180);
  Epsilon0 = Epsilon0Temp;
  K1 = K1Temp;
  K2 = K2Temp;
  Fcfast = FcfastTemp;
  Jt = JtTemp;
  Jpe = JpeTemp;
  PEFactor = PEFactorTemp;
};

AnyMuscleModel3E Extensor_Digiti_Minimi = {
  AnyVar PCSA = 80.5; //mm^2 Mirakhorlo
  F0 = .StrengthScaleUlna*PCSA*.ConstParam.MusStressHand;
  Lf0 = 0.0435;
  Lt0 = 0.259;
  Gamma0 = 0*(pi/180);
  Epsilon0 = Epsilon0Temp;
  K1 = K1Temp;
  K2 = K2Temp;
  Fcfast = FcfastTemp;
  Jt = JtTemp;
  Jpe = JpeTemp;
  PEFactor = PEFactorTemp;
};

AnyMuscleModel3E Flexor_Pollicis_Longus = {
  AnyVar PCSA = 125.2; //mm^2 Mirakhorlo
  F0 = .StrengthScaleUlna*PCSA*.ConstParam.MusStressHand;
  Lf0 = 0.059;
  Lt0 = 0.258;
  Gamma0 = 20*(pi/180);
  Epsilon0 = Epsilon0Temp;
  K1 = K1Temp;
  K2 = K2Temp;
  Fcfast = FcfastTemp;
  Jt = JtTemp;
  Jpe = JpeTemp;
  PEFactor = PEFactorTemp;
};


//NEW ADDED by loopluc
AnyMuscleModel3E Abductor_Digiti_Minimi = {
  AnyVar PCSA = 90.4; //mm^2 Mirakhorlo
  F0 = .StrengthScaleUlna*PCSA*.ConstParam.MusStressHand;
  Lf0 = 0.0377;
  Lt0 = 0.0195;
  Gamma0 = 0*(pi/180);
  Epsilon0 = EpsilonbarTemp;
  K1 = K1Temp;
  K2 = K2Temp;
  Fcfast = FcfastTemp;
  Jt = JtTemp;
  Jpe = JpeTemp;
  PEFactor = PEFactorTemp;
};

AnyMuscleModel3E Flexor_Digiti_Minimi = {
  AnyVar PCSA = 11.3; //mm^2 Mirakhorlo
  F0 = .StrengthScaleUlna*PCSA*.ConstParam.MusStressHand;
  Lf0 = 0.0336;
  Lt0 = 0.006;
  Gamma0 = 0*(pi/180);
  Epsilon0 = EpsilonbarTemp;
  K1 = K1Temp;
  K2 = K2Temp;
  Fcfast = FcfastTemp;
  Jt = JtTemp;
  Jpe = JpeTemp;
  PEFactor = PEFactorTemp;
};


AnyMuscleModel3E Palmar_Interosseous_Digit2 = {
  AnyVar PCSA = 51.7; //mm^2 Mirakhorlo
  F0 = .StrengthScaleUlna*PCSA*.ConstParam.MusStressHand;
  Lf0 = 0.0256;
  Lt0 = 0.025;
  Gamma0 = 0*(pi/180);
  Epsilon0 = EpsilonbarTemp;
  K1 = K1Temp;
  K2 = K2Temp;
  Fcfast = FcfastTemp;
  Jt = JtTemp;
  Jpe = JpeTemp;
  PEFactor = PEFactorTemp;
};
AnyMuscleModel3E Palmar_Interosseous_Digit4 = {
  AnyVar PCSA = 58.9; //mm^2 Mirakhorlo
  F0 = .StrengthScaleUlna*PCSA*.ConstParam.MusStressHand;
  Lf0 = 0.0209;
  Lt0 = 0.010;
  Gamma0 = 19*(pi/180);
  Epsilon0 = EpsilonbarTemp;
  K1 = K1Temp;
  K2 = K2Temp;
  Fcfast = FcfastTemp;
  Jt = JtTemp;
  Jpe = JpeTemp;
  PEFactor = PEFactorTemp;
};
AnyMuscleModel3E Palmar_Interosseous_Digit5 = {
  AnyVar PCSA = 64.6; //mm^2 Mirakhorlo
  F0 = .StrengthScaleUlna*PCSA*.ConstParam.MusStressHand;
  Lf0 = 0.0176;
  Lt0 = 0.0245;
  Gamma0 = 0*(pi/180);
  Epsilon0 = EpsilonbarTemp;
  K1 = K1Temp;
  K2 = K2Temp;
  Fcfast = FcfastTemp;
  Jt = JtTemp;
  Jpe = JpeTemp;
  PEFactor = PEFactorTemp;
};

//Lumbrical
AnyMuscleModel3E Lumbrical_Digit2 = {
  AnyVar PCSA = 7.2; //mm^2 Mirakhorlo
  F0 = .StrengthScaleUlna*PCSA*.ConstParam.MusStressHand;
  Lf0 = 0.0784;
  Lt0 = 0.00001;
  Gamma0 = 0*(pi/180);
  Epsilon0 = EpsilonbarTemp;
  K1 = K1Temp;
  K2 = K2Temp;
  Fcfast = FcfastTemp;
  Jt = JtTemp;
  Jpe = JpeTemp;
  PEFactor = PEFactorTemp;
};

AnyMuscleModel3E Lumbrical_Digit3 = {
  AnyVar PCSA = 12.8; //mm^2 Mirakhorlo
  F0 = .StrengthScaleUlna*PCSA*.ConstParam.MusStressHand;
  Lf0 = 0.0737;
  Lt0 = 0.00001;
  Gamma0 = 0*(pi/180);
  Epsilon0 = EpsilonbarTemp;
  K1 = K1Temp;
  K2 = K2Temp;
  Fcfast = FcfastTemp;
  Jt = JtTemp;
  Jpe = JpeTemp;
  PEFactor = PEFactorTemp;
};
AnyMuscleModel3E Lumbrical_Digit41 = {
  AnyVar PCSA = 11/2; //mm^2 Mirakhorlo
  F0 = .StrengthScaleUlna*PCSA*.ConstParam.MusStressHand;
  Lf0 = 0.0688;
  Lt0 = 0.00001;
  Gamma0 = 0*(pi/180);
  Epsilon0 = EpsilonbarTemp;
  K1 = K1Temp;
  K2 = K2Temp;
  Fcfast = FcfastTemp;
  Jt = JtTemp;
  Jpe = JpeTemp;
  PEFactor = PEFactorTemp;
};
AnyMuscleModel3E Lumbrical_Digit42 = {
  AnyVar PCSA = 11/2; //mm^2 Mirakhorlo
  F0 = .StrengthScaleUlna*PCSA*.ConstParam.MusStressHand;
  Lf0 = 0.0688;
  Lt0 = 0.00001;
  Gamma0 = 0*(pi/180);
  Epsilon0 = EpsilonbarTemp;
  K1 = K1Temp;
  K2 = K2Temp;
  Fcfast = FcfastTemp;
  Jt = JtTemp;
  Jpe = JpeTemp;
  PEFactor = PEFactorTemp;
};
AnyMuscleModel3E Lumbrical_Digit51 = {
  AnyVar PCSA = 7.7/2; //mm^2 Mirakhorlo
  F0 = .StrengthScaleUlna*PCSA*.ConstParam.MusStressHand;
  Lf0 = 0.0611;
  Lt0 = 0.00001;
  Gamma0 = 0*(pi/180);
  Epsilon0 = EpsilonbarTemp;
  K1 = K1Temp;
  K2 = K2Temp;
  Fcfast = FcfastTemp;
  Jt = JtTemp;
  Jpe = JpeTemp;
  PEFactor = PEFactorTemp;
};
AnyMuscleModel3E Lumbrical_Digit52 = {
  AnyVar PCSA = 7.7/2; //mm^2 Mirakhorlo
  F0 = .StrengthScaleUlna*PCSA*.ConstParam.MusStressHand;
  Lf0 = 0.0611;
  Lt0 = 0.00001;
  Gamma0 = 0*(pi/180);
  Epsilon0 = EpsilonbarTemp;
  K1 = K1Temp;
  K2 = K2Temp;
  Fcfast = FcfastTemp;
  Jt = JtTemp;
  Jpe = JpeTemp;
  PEFactor = PEFactorTemp;
};
//DorsalInterosseous

AnyMuscleModel3E DorsalInterosseous_Digit21 = {
  AnyVar PCSA = 62.1; //mm^2 Mirakhorlo
  F0 = .StrengthScaleUlna*PCSA*.ConstParam.MusStressHand;
  Lf0 = 0.0396;
  Lt0 = 0.0105;
  Gamma0 = 15*(pi/180);
  Epsilon0 = EpsilonbarTemp;
  K1 = K1Temp;
  K2 = K2Temp;
  Fcfast = FcfastTemp;
  Jt = JtTemp;
  Jpe = JpeTemp;
  PEFactor = PEFactorTemp;
};

AnyMuscleModel3E DorsalInterosseous_Digit22 = {
  AnyVar PCSA = 110.9; //mm^2 Mirakhorlo
  F0 = .StrengthScaleUlna*PCSA*.ConstParam.MusStressHand;
  Lf0 = 0.0196;
  Lt0 = 0.0217;
  Gamma0 = 40*(pi/180);
  Epsilon0 = EpsilonbarTemp;
  K1 = K1Temp;
  K2 = K2Temp;
  Fcfast = FcfastTemp;
  Jt = JtTemp;
  Jpe = JpeTemp;
  PEFactor = PEFactorTemp;
};
AnyMuscleModel3E DorsalInterosseous_Digit31 = {
  AnyVar PCSA = 112.2/2; //mm^2 Mirakhorlo
  F0 = .StrengthScaleUlna*PCSA*.ConstParam.MusStressHand;
  Lf0 = 0.0169;
  Lt0 = 0.036;
  Gamma0 = 25*(pi/180);
  Epsilon0 = EpsilonbarTemp;
  K1 = K1Temp;
  K2 = K2Temp;
  Fcfast = FcfastTemp;
  Jt = JtTemp;
  Jpe = JpeTemp;
  PEFactor = PEFactorTemp;
};
AnyMuscleModel3E DorsalInterosseous_Digit32 = {
  AnyVar PCSA = 112.2/2; //mm^2 Mirakhorlo
  F0 = .StrengthScaleUlna*PCSA*.ConstParam.MusStressHand;
  Lf0 = 0.0169;
  Lt0 = 0.036;
  Gamma0 = 25*(pi/180);
  Epsilon0 = EpsilonbarTemp;
  K1 = K1Temp;
  K2 = K2Temp;
  Fcfast = FcfastTemp;
  Jt = JtTemp;
  Jpe = JpeTemp;
  PEFactor = PEFactorTemp;
};
AnyMuscleModel3E DorsalInterosseous_Digit33 = {
  AnyVar PCSA = 123.5/2; //mm^2 Mirakhorlo
  F0 = .StrengthScaleUlna*PCSA*.ConstParam.MusStressHand;
  Lf0 = 0.0199;
  Lt0 = 0.041;
  Gamma0 = 15*(pi/180);
  Epsilon0 = EpsilonbarTemp;
  K1 = K1Temp;
  K2 = K2Temp;
  Fcfast = FcfastTemp;
  Jt = JtTemp;
  Jpe = JpeTemp;
  PEFactor = PEFactorTemp;
};
AnyMuscleModel3E DorsalInterosseous_Digit34 = {
  AnyVar PCSA = 123.5/2; //mm^2 Mirakhorlo
  F0 = .StrengthScaleUlna*PCSA*.ConstParam.MusStressHand;
  Lf0 = 0.0199;
  Lt0 = 0.041;
  Gamma0 = 15*(pi/180);
  Epsilon0 = EpsilonbarTemp;
  K1 = K1Temp;
  K2 = K2Temp;
  Fcfast = FcfastTemp;
  Jt = JtTemp;
  Jpe = JpeTemp;
  PEFactor = PEFactorTemp;
};
AnyMuscleModel3E DorsalInterosseous_Digit41 = {
  AnyVar PCSA = 114.2/2; //mm^2 Mirakhorlo
  F0 = .StrengthScaleUlna*PCSA*.ConstParam.MusStressHand;
  Lf0 = 0.0182;
  Lt0 = 0.028;
  Gamma0 = 20*(pi/180);
  Epsilon0 = EpsilonbarTemp;
  K1 = K1Temp;
  K2 = K2Temp;
  Fcfast = FcfastTemp;
  Jt = JtTemp;
  Jpe = JpeTemp;
  PEFactor = PEFactorTemp;
};
AnyMuscleModel3E DorsalInterosseous_Digit42 = {
  AnyVar PCSA = 114.2/2; //mm^2 Mirakhorlo
  F0 = .StrengthScaleUlna*PCSA*.ConstParam.MusStressHand;
  Lf0 = 0.0182;
  Lt0 = 0.028;
  Gamma0 = 20*(pi/180);
  Epsilon0 = EpsilonbarTemp;
  K1 = K1Temp;
  K2 = K2Temp;
  Fcfast = FcfastTemp;
  Jt = JtTemp;
  Jpe = JpeTemp;
  PEFactor = PEFactorTemp;
};
AnyMuscleModel3E Abductor_Pollicis_Brevis = {
  AnyVar PCSA = 43.8; //mm^2 Mirakhorlo
  F0 = .StrengthScaleUlna*PCSA*.ConstParam.MusStressHand;
  Lf0 = 0.0497;
  Lt0 = 0.0245;
  Gamma0 = 0*(pi/180);
  Epsilon0 = EpsilonbarTemp;
  K1 = K1Temp;
  K2 = K2Temp;
  Fcfast = FcfastTemp;
  Jt = JtTemp;
  Jpe = JpeTemp;
  PEFactor = PEFactorTemp;
};
AnyMuscleModel3E Abductor_Pollicis = {
  AnyVar PCSA = 129.3; //mm^2 Mirakhorlo
  F0 = .StrengthScaleUlna*PCSA*.ConstParam.MusStressHand;
  Lf0 = 0.0307;
  Lt0 = 0.00001;
  Gamma0 = 0*(pi/180);
  Epsilon0 = EpsilonbarTemp;
  K1 = K1Temp;
  K2 = K2Temp;
  Fcfast = FcfastTemp;
  Jt = JtTemp;
  Jpe = JpeTemp;
  PEFactor = PEFactorTemp;
};
AnyMuscleModel3E Flexor_Pollicis_Brevis = {
  AnyVar PCSA = 21; //mm^2 Mirakhorlo
  F0 = .StrengthScaleUlna*PCSA*.ConstParam.MusStressHand;
  Lf0 = 0.0496;
  Lt0 = 0.0148;
  Gamma0 = 0*(pi/180);
  Epsilon0 = EpsilonbarTemp;
  K1 = K1Temp;
  K2 = K2Temp;
  Fcfast = FcfastTemp;
  Jt = JtTemp;
  Jpe = JpeTemp;
  PEFactor = PEFactorTemp;
};

#endif

#if _HAND_MUSCLE_PARAMETERS_3E_HILL == "PLZEN"

#include "Plzen-Muscle-parameters-shoulder.any"

#endif
