AnyMuscleViaPoint Sternocleidomastoid_caput_clavicular = {
    AnyMuscleModel &MusMdl = ..MusPar.Sternocleidomastoid_1;
    AnyRefNode &Ins2 = ..Seg.Clavicula.SternocleidomastoidNode;
    AnyRefNode &Org = ..SkullSegRef.SternocleidomastoidNode;
    AnyDrawMuscle DrwMus = {#include "../drawSettings/MusDrawSettings.any"};
  };

AnyMuscleViaPoint Sternocleidomastoid_caput_Sternum = {
    AnyMuscleModel &MusMdl = ..MusPar.Sternocleidomastoid_2;
    AnyRefNode &Ins = ..ShoulderRef.SternocleidomastoidNode;
    AnyRefNode &Org = ..SkullSegRef.SternocleidomastoidNode;
    AnyDrawMuscle DrwMus = {#include "../drawSettings/MusDrawSettings.any"};
  };
