#class_template Template_Anthropometrics_XYZ
{

  #var AnyVar BMI = BodyMass/(BodyHeight^2);
  ///Estimation from Frankenfield et al. (2001) valid for men
  #var AnyVar FatPercent = (-0.09 + 0.0149*BMI - 0.00009*BMI^2)*100;

  #var AnyVar BodyMass = 78.3;
  #var AnyVar BodyHeight = 1.82;

  AnyFolder SegmentMasses = {

    //Segment masses in kg from Winter ("Biomechanics and motor control of human movement." David A. Winter)
    #var AnyVar Lumbar = 0.139*.BodyMass; // T12-L1 to L5-Sacrum
    #var AnyVar Thorax = 0.1894*.BodyMass; // C7-T1 to T12-L1 (modified from 0.216 winter to separate scapula)
    #var AnyVar Pelvis = 0.142*.BodyMass;
    #var AnyVar Head = 0.081*.BodyMass; // head and cervical

    AnyFolder Right =
    {
      #var AnyVar Clavicle = 0.0133*..BodyMass; //< Combined mass of shoulder muscles and scapula/clavicula bones.
      #var AnyVar UpperArm = 0.028*..BodyMass;
      #var AnyVar LowerArm = 0.016*..BodyMass;
      #var AnyVar Hand = 0.006*..BodyMass;

      #var AnyVar Thumb_MC = Hand/18;
      #var AnyVar Thumb_PP = Hand/18;
      #var AnyVar Thumb_DP = Hand/18;
      #var AnyVar Finger_MC = Hand/18;
      #var AnyVar Finger_PP = Hand/18;
      #var AnyVar Finger_MP = Hand/18;
      #var AnyVar Finger_DP = Hand/18;

      #var AnyVar Thigh = 0.1*..BodyMass;
      #var AnyVar Shank = 0.0465*..BodyMass;
      #var AnyVar Talus = 0.2*0.0145*..BodyMass; //20% of total foot (from bone volume ratio)
      #var AnyVar Foot =  0.8*0.0145*..BodyMass; //80% of total foot (from bone volume ratio)
    };

    AnyFolder Left =
    {
      #var AnyVar Clavicle = 0.0133*..BodyMass;
      #var AnyVar UpperArm = 0.028*..BodyMass;
      #var AnyVar LowerArm = 0.016*..BodyMass;
      #var AnyVar Hand = 0.006*..BodyMass;

      #var AnyVar Thumb_MC = Hand/18;
      #var AnyVar Thumb_PP = Hand/18;
      #var AnyVar Thumb_DP = Hand/18;
      #var AnyVar Finger_MC = Hand/18;
      #var AnyVar Finger_PP = Hand/18;
      #var AnyVar Finger_MP = Hand/18;
      #var AnyVar Finger_DP = Hand/18;

      #var AnyVar Thigh = 0.1*..BodyMass;
      #var AnyVar Shank = 0.0465*..BodyMass;
      #var AnyVar Talus = 0.2*0.0145*..BodyMass; //20% of total foot (from bone volume ratio)
      #var AnyVar Foot =  0.8*0.0145*..BodyMass; //80% of total foot (from bone volume ratio)
    };
  };

  AnyFolder SegmentScaleFactors =
  {

    AnyFolder Pelvis = { #var AnyFloat LengthScale = DesignVar(1); #var AnyFloat DepthScale = DesignVar(1); #var AnyFloat WidthScale = DesignVar(1); };
    AnyFolder Trunk = { #var AnyFloat LengthScale = DesignVar(1); #var AnyFloat DepthScale = DesignVar(1); #var AnyFloat WidthScale = DesignVar(1); };
    AnyFolder Head = { #var AnyFloat LengthScale = DesignVar(1); #var AnyFloat DepthScale = DesignVar(1); #var AnyFloat WidthScale = DesignVar(1); };
    AnyFolder Lumbar = { #var AnyFloat LengthScale = DesignVar(1); #var AnyFloat DepthScale = DesignVar(1); #var AnyFloat WidthScale = DesignVar(1); };

    AnyFolder Right =
    {
      AnyFolder Clavicula =  { #var AnyFloat LengthScale = DesignVar(1); #var AnyFloat DepthScale = DesignVar(1); #var AnyFloat WidthScale = DesignVar(1); };
      AnyFolder Scapula =  { #var AnyFloat LengthScale = DesignVar(1); #var AnyFloat DepthScale = DesignVar(1); #var AnyFloat WidthScale = DesignVar(1); };
      AnyFolder Humerus =  { #var AnyFloat LengthScale = DesignVar(1); #var AnyFloat DepthScale = DesignVar(1); #var AnyFloat WidthScale = DesignVar(1); };
      AnyFolder Radius =  { #var AnyFloat LengthScale = DesignVar(1); #var AnyFloat DepthScale = DesignVar(1); #var AnyFloat WidthScale = DesignVar(1); };
      AnyFolder Ulna  =  { #var AnyFloat LengthScale = DesignVar(1); #var AnyFloat DepthScale = DesignVar(1); #var AnyFloat WidthScale = DesignVar(1); };
      AnyFolder Hand =  { #var AnyFloat LengthScale = DesignVar(1); #var AnyFloat DepthScale = DesignVar(1); #var AnyFloat WidthScale = DesignVar(1); };

      AnyFolder CarpalsLength =  { #var AnyFloat LengthScale = DesignVar(1); #var AnyFloat DepthScale = DesignVar(1); #var AnyFloat WidthScale = DesignVar(1); };

      AnyFolder ThumbMCLength =  { #var AnyFloat LengthScale = DesignVar(1); #var AnyFloat DepthScale = DesignVar(1); #var AnyFloat WidthScale = DesignVar(1); };
      AnyFolder ThumbPPLength =  { #var AnyFloat LengthScale = DesignVar(1); #var AnyFloat DepthScale = DesignVar(1); #var AnyFloat WidthScale = DesignVar(1); };
      AnyFolder ThumbDPLength =  { #var AnyFloat LengthScale = DesignVar(1); #var AnyFloat DepthScale = DesignVar(1); #var AnyFloat WidthScale = DesignVar(1); };

      AnyFolder Finger2MCLength =  { #var AnyFloat LengthScale = DesignVar(1); #var AnyFloat DepthScale = DesignVar(1); #var AnyFloat WidthScale = DesignVar(1); };
      AnyFolder Finger2PPLength =  { #var AnyFloat LengthScale = DesignVar(1); #var AnyFloat DepthScale = DesignVar(1); #var AnyFloat WidthScale = DesignVar(1); };
      AnyFolder Finger2MPLength =  { #var AnyFloat LengthScale = DesignVar(1); #var AnyFloat DepthScale = DesignVar(1); #var AnyFloat WidthScale = DesignVar(1); };
      AnyFolder Finger2DPLength =  { #var AnyFloat LengthScale = DesignVar(1); #var AnyFloat DepthScale = DesignVar(1); #var AnyFloat WidthScale = DesignVar(1); };

      AnyFolder Finger3MCLength =  { #var AnyFloat LengthScale = DesignVar(1); #var AnyFloat DepthScale = DesignVar(1); #var AnyFloat WidthScale = DesignVar(1); };
      AnyFolder Finger3PPLength =  { #var AnyFloat LengthScale = DesignVar(1); #var AnyFloat DepthScale = DesignVar(1); #var AnyFloat WidthScale = DesignVar(1); };
      AnyFolder Finger3MPLength =  { #var AnyFloat LengthScale = DesignVar(1); #var AnyFloat DepthScale = DesignVar(1); #var AnyFloat WidthScale = DesignVar(1); };
      AnyFolder Finger3DPLength =  { #var AnyFloat LengthScale = DesignVar(1); #var AnyFloat DepthScale = DesignVar(1); #var AnyFloat WidthScale = DesignVar(1); };

      AnyFolder Finger4MCLength =  { #var AnyFloat LengthScale = DesignVar(1); #var AnyFloat DepthScale = DesignVar(1); #var AnyFloat WidthScale = DesignVar(1); };
      AnyFolder Finger4PPLength =  { #var AnyFloat LengthScale = DesignVar(1); #var AnyFloat DepthScale = DesignVar(1); #var AnyFloat WidthScale = DesignVar(1); };
      AnyFolder Finger4MPLength =  { #var AnyFloat LengthScale = DesignVar(1); #var AnyFloat DepthScale = DesignVar(1); #var AnyFloat WidthScale = DesignVar(1); };
      AnyFolder Finger4DPLength =  { #var AnyFloat LengthScale = DesignVar(1); #var AnyFloat DepthScale = DesignVar(1); #var AnyFloat WidthScale = DesignVar(1); };

      AnyFolder Finger5MCLength =  { #var AnyFloat LengthScale = DesignVar(1); #var AnyFloat DepthScale = DesignVar(1); #var AnyFloat WidthScale = DesignVar(1); };
      AnyFolder Finger5PPLength =  { #var AnyFloat LengthScale = DesignVar(1); #var AnyFloat DepthScale = DesignVar(1); #var AnyFloat WidthScale = DesignVar(1); };
      AnyFolder Finger5MPLength =  { #var AnyFloat LengthScale = DesignVar(1); #var AnyFloat DepthScale = DesignVar(1); #var AnyFloat WidthScale = DesignVar(1); };
      AnyFolder Finger5DPLength =  { #var AnyFloat LengthScale = DesignVar(1); #var AnyFloat DepthScale = DesignVar(1); #var AnyFloat WidthScale = DesignVar(1); };


      AnyFolder Foot =  { #var AnyFloat LengthScale = DesignVar(1); #var AnyFloat DepthScale = DesignVar(1); #var AnyFloat WidthScale = DesignVar(1); };
      AnyFolder Shank =  { #var AnyFloat LengthScale = DesignVar(1); #var AnyFloat DepthScale = DesignVar(1); #var AnyFloat WidthScale = DesignVar(1); };
      AnyFolder Thigh =  { #var AnyFloat LengthScale = DesignVar(1); #var AnyFloat DepthScale = DesignVar(1); #var AnyFloat WidthScale = DesignVar(1); };
    };
    AnyFolder Left =
    {
      AnyFolder Clavicula =  { #var AnyFloat LengthScale = DesignVar(1); #var AnyFloat DepthScale = DesignVar(1); #var AnyFloat WidthScale = DesignVar(1); };
      AnyFolder Scapula =  { #var AnyFloat LengthScale = DesignVar(1); #var AnyFloat DepthScale = DesignVar(1); #var AnyFloat WidthScale = DesignVar(1); };
      AnyFolder Humerus =  { #var AnyFloat LengthScale = DesignVar(1); #var AnyFloat DepthScale = DesignVar(1); #var AnyFloat WidthScale = DesignVar(1); };
      AnyFolder Radius =  { #var AnyFloat LengthScale = DesignVar(1); #var AnyFloat DepthScale = DesignVar(1); #var AnyFloat WidthScale = DesignVar(1); };
      AnyFolder Ulna  =  { #var AnyFloat LengthScale = DesignVar(1); #var AnyFloat DepthScale = DesignVar(1); #var AnyFloat WidthScale = DesignVar(1); };
      AnyFolder Hand =  { #var AnyFloat LengthScale = DesignVar(1); #var AnyFloat DepthScale = DesignVar(1); #var AnyFloat WidthScale = DesignVar(1); };

      AnyFolder CarpalsLength =  { #var AnyFloat LengthScale = DesignVar(1); #var AnyFloat DepthScale = DesignVar(1); #var AnyFloat WidthScale = DesignVar(1); };

      AnyFolder ThumbMCLength =  { #var AnyFloat LengthScale = DesignVar(1); #var AnyFloat DepthScale = DesignVar(1); #var AnyFloat WidthScale = DesignVar(1); };
      AnyFolder ThumbPPLength =  { #var AnyFloat LengthScale = DesignVar(1); #var AnyFloat DepthScale = DesignVar(1); #var AnyFloat WidthScale = DesignVar(1); };
      AnyFolder ThumbDPLength =  { #var AnyFloat LengthScale = DesignVar(1); #var AnyFloat DepthScale = DesignVar(1); #var AnyFloat WidthScale = DesignVar(1); };

      AnyFolder Finger2MCLength =  { #var AnyFloat LengthScale = DesignVar(1); #var AnyFloat DepthScale = DesignVar(1); #var AnyFloat WidthScale = DesignVar(1); };
      AnyFolder Finger2PPLength =  { #var AnyFloat LengthScale = DesignVar(1); #var AnyFloat DepthScale = DesignVar(1); #var AnyFloat WidthScale = DesignVar(1); };
      AnyFolder Finger2MPLength =  { #var AnyFloat LengthScale = DesignVar(1); #var AnyFloat DepthScale = DesignVar(1); #var AnyFloat WidthScale = DesignVar(1); };
      AnyFolder Finger2DPLength =  { #var AnyFloat LengthScale = DesignVar(1); #var AnyFloat DepthScale = DesignVar(1); #var AnyFloat WidthScale = DesignVar(1); };

      AnyFolder Finger3MCLength =  { #var AnyFloat LengthScale = DesignVar(1); #var AnyFloat DepthScale = DesignVar(1); #var AnyFloat WidthScale = DesignVar(1); };
      AnyFolder Finger3PPLength =  { #var AnyFloat LengthScale = DesignVar(1); #var AnyFloat DepthScale = DesignVar(1); #var AnyFloat WidthScale = DesignVar(1); };
      AnyFolder Finger3MPLength =  { #var AnyFloat LengthScale = DesignVar(1); #var AnyFloat DepthScale = DesignVar(1); #var AnyFloat WidthScale = DesignVar(1); };
      AnyFolder Finger3DPLength =  { #var AnyFloat LengthScale = DesignVar(1); #var AnyFloat DepthScale = DesignVar(1); #var AnyFloat WidthScale = DesignVar(1); };

      AnyFolder Finger4MCLength =  { #var AnyFloat LengthScale = DesignVar(1); #var AnyFloat DepthScale = DesignVar(1); #var AnyFloat WidthScale = DesignVar(1); };
      AnyFolder Finger4PPLength =  { #var AnyFloat LengthScale = DesignVar(1); #var AnyFloat DepthScale = DesignVar(1); #var AnyFloat WidthScale = DesignVar(1); };
      AnyFolder Finger4MPLength =  { #var AnyFloat LengthScale = DesignVar(1); #var AnyFloat DepthScale = DesignVar(1); #var AnyFloat WidthScale = DesignVar(1); };
      AnyFolder Finger4DPLength =  { #var AnyFloat LengthScale = DesignVar(1); #var AnyFloat DepthScale = DesignVar(1); #var AnyFloat WidthScale = DesignVar(1); };

      AnyFolder Finger5MCLength =  { #var AnyFloat LengthScale = DesignVar(1); #var AnyFloat DepthScale = DesignVar(1); #var AnyFloat WidthScale = DesignVar(1); };
      AnyFolder Finger5PPLength =  { #var AnyFloat LengthScale = DesignVar(1); #var AnyFloat DepthScale = DesignVar(1); #var AnyFloat WidthScale = DesignVar(1); };
      AnyFolder Finger5MPLength =  { #var AnyFloat LengthScale = DesignVar(1); #var AnyFloat DepthScale = DesignVar(1); #var AnyFloat WidthScale = DesignVar(1); };
      AnyFolder Finger5DPLength =  { #var AnyFloat LengthScale = DesignVar(1); #var AnyFloat DepthScale = DesignVar(1); #var AnyFloat WidthScale = DesignVar(1); };


      AnyFolder Foot =  { #var AnyFloat LengthScale = DesignVar(1); #var AnyFloat DepthScale = DesignVar(1); #var AnyFloat WidthScale = DesignVar(1); };
      AnyFolder Shank =  { #var AnyFloat LengthScale = DesignVar(1); #var AnyFloat DepthScale = DesignVar(1); #var AnyFloat WidthScale = DesignVar(1); };
      AnyFolder Thigh =  { #var AnyFloat LengthScale = DesignVar(1); #var AnyFloat DepthScale = DesignVar(1); #var AnyFloat WidthScale = DesignVar(1); };
    };
  };

};


#class_template Template_Anthropometrics(T_BM_SCALING = 0,
T_SCALING_LENGTHMASSFAT_MULTIDOFS_
)  {


  #var AnyVar BMI = BodyMass/(BodyHeight^2);
  ///Estimation from Frankenfield et al. (2001) valid for men
  #var AnyVar FatPercent = (-0.09 + 0.0149*BMI - 0.00009*BMI^2)*100;

  #var AnyVar BodyMass = 75;
  #var AnyVar BodyHeight = 180 /100;


  AnyFolder SegmentMasses = {

    //Segment masses in kg from Winter ("Biomechanics and motor control of human movement." David A. Winter)
    #var AnyVar Lumbar = 0.139*.BodyMass; // T12-L1 to L5-Sacrum
    #var AnyVar Thorax = 0.1894*.BodyMass; // C7-T1 to T12-L1 (modified from 0.216 winter to separate scapula)
    #var AnyVar Pelvis = 0.142*.BodyMass;
    #var AnyVar Head = 0.081*.BodyMass; // head and cervical

    AnyFolder Right =
    {
      #var AnyVar Clavicle = 0.0133*..BodyMass; //< Combined mass of shoulder muscles and scapula/clavicula bones.
      #var AnyVar UpperArm = 0.028*..BodyMass;
      #var AnyVar LowerArm = 0.016*..BodyMass;
      #var AnyVar Hand = 0.006*..BodyMass;

      #var AnyVar Thumb_MC = Hand/18;
      #var AnyVar Thumb_PP = Hand/18;
      #var AnyVar Thumb_DP = Hand/18;
      #var AnyVar Finger_MC = Hand/18;
      #var AnyVar Finger_PP = Hand/18;
      #var AnyVar Finger_MP = Hand/18;
      #var AnyVar Finger_DP = Hand/18;

      #var AnyVar Thigh = 0.1*..BodyMass;
      #var AnyVar Shank = 0.0465*..BodyMass;
      #var AnyVar Talus = 0.2*0.0145*..BodyMass; //20% of total foot (from bone volume ratio)
      #var AnyVar Foot =  0.8*0.0145*..BodyMass; //80% of total foot (from bone volume ratio)
    };

    AnyFolder Left =
    {
      #var AnyVar Clavicle = 0.0133*..BodyMass;
      #var AnyVar UpperArm = 0.028*..BodyMass;
      #var AnyVar LowerArm = 0.016*..BodyMass;
      #var AnyVar Hand = 0.006*..BodyMass;

      #var AnyVar Thumb_MC = Hand/18;
      #var AnyVar Thumb_PP = Hand/18;
      #var AnyVar Thumb_DP = Hand/18;
      #var AnyVar Finger_MC = Hand/18;
      #var AnyVar Finger_PP = Hand/18;
      #var AnyVar Finger_MP = Hand/18;
      #var AnyVar Finger_DP = Hand/18;

      #var AnyVar Thigh = 0.1*..BodyMass;
      #var AnyVar Shank = 0.0465*..BodyMass;
      #var AnyVar Talus = 0.2*0.0145*..BodyMass; //20% of total foot (from bone volume ratio)
      #var AnyVar Foot =  0.8*0.0145*..BodyMass; //80% of total foot (from bone volume ratio)
    };
  };


  AnyFolder SegmentDimensions = {
    #var AnyVar PelvisWidth = DesignVar(0.176*.BodyHeight/1.8); //distance between hip joints (0.16 for simple leg model)

    #if T_BM_SCALING == T_SCALING_LENGTHMASSFAT_MULTIDOFS_
    #var AnyVar PelvisDepth = DesignVar(0.1232*.BodyHeight/1.8);
    #endif

    #var AnyVar HeadHeight = DesignVar(0.14*.BodyHeight/1.8);//height in neutral position from  C1HatNode to top of head
    #var AnyVar TrunkHeight = DesignVar(0.620233*.BodyHeight/1.8);//height in neautral position from  C1HatNode to L5SacrumJnt


    // These two folders are used by the scaling laws
    AnyFolder Right ={
      #var AnyVar ThighLength = DesignVar(0.4098364*..BodyHeight/1.8);
      #var AnyVar ShankLength = DesignVar(0.4210448*..BodyHeight/1.8);
      #var AnyVar FootLength = DesignVar(0.2571425*..BodyHeight/1.8);
      #var AnyVar TalusLength = DesignVar(0.03808687*..BodyHeight/1.8);

      #var AnyVar UpperArmLength = DesignVar(0.340079*..BodyHeight/1.8);
      #var AnyVar LowerArmLength = DesignVar(0.2690167*..BodyHeight/1.8);
      #var AnyVar HandLength = DesignVar(0.182*..BodyHeight/1.8);

      #var AnyVar CarpalsLength = DesignVar(0.1949*HandLength);


      #var AnyVar  ThumbMCLength = DesignVar(0.2367*HandLength);
      #var AnyVar  ThumbPPLength = DesignVar(0.1611*HandLength);
      #var AnyVar  ThumbDPLength = DesignVar(0.1175*HandLength);

      #var AnyVar  Finger2MCLength = DesignVar(0.3503*HandLength);
      #var AnyVar  Finger2PPLength = DesignVar(0.2059*HandLength);
      #var AnyVar  Finger2MPLength = DesignVar(0.1198*HandLength);
      #var AnyVar  Finger2DPLength = DesignVar(0.0882*HandLength);

      #var AnyVar  Finger3MCLength = DesignVar(0.3369*HandLength);
      #var AnyVar  Finger3PPLength = DesignVar(0.2279*HandLength);
      #var AnyVar  Finger3MPLength = DesignVar(0.1462*HandLength);
      #var AnyVar  Finger3DPLength = DesignVar(0.0941*HandLength);

      #var AnyVar  Finger4MCLength = DesignVar(0.2983*HandLength);
      #var AnyVar  Finger4PPLength = DesignVar(0.2124*HandLength);
      #var AnyVar  Finger4MPLength = DesignVar(0.1389*HandLength);
      #var AnyVar  Finger4DPLength = DesignVar(0.0964*HandLength);

      #var AnyVar  Finger5MCLength = DesignVar(0.2732*HandLength);
      #var AnyVar  Finger5PPLength = DesignVar(0.1694*HandLength);
      #var AnyVar  Finger5MPLength = DesignVar(0.0968*HandLength);
      #var AnyVar  Finger5DPLength = DesignVar(0.0843*HandLength);


      #var AnyVar HandBreadth = DesignVar(0.085*..BodyHeight/1.8);
    };

    AnyFolder Left ={
      #var AnyVar ThighLength = DesignVar(0.4098364*..BodyHeight/1.8);
      #var AnyVar ShankLength = DesignVar(0.4210448*..BodyHeight/1.8);
      #var AnyVar FootLength = DesignVar(0.2571425*..BodyHeight/1.8);
      #var AnyVar TalusLength = DesignVar(0.03808687*..BodyHeight/1.8);

      #var AnyVar UpperArmLength = DesignVar(0.340079*..BodyHeight/1.8);
      #var AnyVar LowerArmLength = DesignVar(0.2690167*..BodyHeight/1.8);
      #var AnyVar HandLength = DesignVar(0.182*..BodyHeight/1.8);

      #var AnyVar  CarpalsLength = DesignVar(0.1949*HandLength);

      #var AnyVar  ThumbMCLength = DesignVar(0.2367*HandLength);
      #var AnyVar  ThumbPPLength = DesignVar(0.1611*HandLength);
      #var AnyVar  ThumbDPLength = DesignVar(0.1175*HandLength);

      #var AnyVar  Finger2MCLength = DesignVar(0.3503*HandLength);
      #var AnyVar  Finger2PPLength = DesignVar(0.2059*HandLength);
      #var AnyVar  Finger2MPLength = DesignVar(0.1198*HandLength);
      #var AnyVar  Finger2DPLength = DesignVar(0.0882*HandLength);

      #var AnyVar  Finger3MCLength = DesignVar(0.3369*HandLength);
      #var AnyVar  Finger3PPLength = DesignVar(0.2279*HandLength);
      #var AnyVar  Finger3MPLength = DesignVar(0.1462*HandLength);
      #var AnyVar  Finger3DPLength = DesignVar(0.0941*HandLength);

      #var AnyVar  Finger4MCLength = DesignVar(0.2983*HandLength);
      #var AnyVar  Finger4PPLength = DesignVar(0.2124*HandLength);
      #var AnyVar  Finger4MPLength = DesignVar(0.1389*HandLength);
      #var AnyVar  Finger4DPLength = DesignVar(0.0964*HandLength);

      #var AnyVar  Finger5MCLength = DesignVar(0.2732*HandLength);
      #var AnyVar  Finger5PPLength = DesignVar(0.1694*HandLength);
      #var AnyVar  Finger5MPLength = DesignVar(0.0968*HandLength);
      #var AnyVar  Finger5DPLength = DesignVar(0.0843*HandLength);


      #var AnyVar HandBreadth = DesignVar(0.085*..BodyHeight/1.8);
    };


  };
};


#class_template Template_Anthropometrics_exterior  {

  #var AnyVar BMI = BodyMass/(BodyHeight^2);
  ///Estimation from Frankenfield et al. (2001) valid for men
  #var AnyVar FatPercent = (-0.09 + 0.0149*BMI - 0.00009*BMI^2)*100;

  #var AnyVar BodyMass = (75);
  #var AnyVar BodyHeight = (180 /100);


  AnyFolder SegmentMasses = {

    //Segment masses in kg from Winter ("Biomechanics and motor control of human movement." David A. Winter)
    #var AnyVar Lumbar = 0.139*.BodyMass; // T12-L1 to L5-Sacrum
    #var AnyVar Thorax = 0.1894*.BodyMass; // C7-T1 to T12-L1 (modified from 0.216 winter to separate scapula)
    #var AnyVar Pelvis = 0.142*.BodyMass;
    #var AnyVar Head = 0.081*.BodyMass; // head and cervical

    AnyFolder Right =
    {
      #var AnyVar Clavicle = 0.0133*..BodyMass; //< Combined mass of shoulder muscles and scapula/clavicula bones.
      #var AnyVar UpperArm = 0.028*..BodyMass;
      #var AnyVar LowerArm = 0.016*..BodyMass;
      #var AnyVar Hand = 0.006*..BodyMass;

      #var AnyVar Thumb_MC = Hand/18;
      #var AnyVar Thumb_PP = Hand/18;
      #var AnyVar Thumb_DP = Hand/18;
      #var AnyVar Finger_MC = Hand/18;
      #var AnyVar Finger_PP = Hand/18;
      #var AnyVar Finger_MP = Hand/18;
      #var AnyVar Finger_DP = Hand/18;

      #var AnyVar Thigh = 0.1*..BodyMass;
      #var AnyVar Shank = 0.0465*..BodyMass;
      #var AnyVar Talus = 0.2*0.0145*..BodyMass; //20% of total foot (from bone volume ratio)
      #var AnyVar Foot =  0.8*0.0145*..BodyMass; //80% of total foot (from bone volume ratio)
    };

    AnyFolder Left =
    {
      #var AnyVar Clavicle = 0.0133*..BodyMass;
      #var AnyVar UpperArm = 0.028*..BodyMass;
      #var AnyVar LowerArm = 0.016*..BodyMass;
      #var AnyVar Hand = 0.006*..BodyMass;

      #var AnyVar Thumb_MC = Hand/18;
      #var AnyVar Thumb_PP = Hand/18;
      #var AnyVar Thumb_DP = Hand/18;
      #var AnyVar Finger_MC = Hand/18;
      #var AnyVar Finger_PP = Hand/18;
      #var AnyVar Finger_MP = Hand/18;
      #var AnyVar Finger_DP = Hand/18;

      #var AnyVar Thigh = 0.1*..BodyMass;
      #var AnyVar Shank = 0.0465*..BodyMass;
      #var AnyVar Talus = 0.2*0.0145*..BodyMass; //20% of total foot (from bone volume ratio)
      #var AnyVar Foot =  0.8*0.0145*..BodyMass; //80% of total foot (from bone volume ratio)
    };
  };


  AnyFolder SegmentDimensions = {
    #var AnyVar PelvisWidth = DesignVar(0.314); ///< between external bony tip of trochanter (horizontaly)
    #var AnyVar HeadHeight = DesignVar(0.246); ///< from chin to top of head (verticaly)
    #var AnyVar TrunkHeight = DesignVar(0.500); ///< From C7 to sacrum midle bony tip (verticaly)


    // These two folders are used by the scaling laws
    AnyFolder Right ={
      #var AnyVar UpperArmLength = DesignVar(0.414); ///< From elbow bony tip to acromion bony tip along humerus (elbow flexed 90 deg)
      #var AnyVar LowerArmLength = DesignVar(0.268); ///< From elbow bony tip to ulna styloid bony tip along ulna (elbow flexed 90 deg)
      #var AnyVar HandLength = DesignVar(0.182); ///< From the base of the palm to the tip of the middle finger.

      #var AnyVar  CarpalsLength = (0.1949)*HandLength;

      #var AnyVar  ThumbMCLength = (0.2367)*HandLength;
      #var AnyVar  ThumbPPLength = (0.1611)*HandLength;
      #var AnyVar  ThumbDPLength = (0.1175)*HandLength;

      #var AnyVar  Finger2MCLength = (0.3503)*HandLength;
      #var AnyVar  Finger2PPLength = (0.2059)*HandLength;
      #var AnyVar  Finger2MPLength = (0.1198)*HandLength;
      #var AnyVar  Finger2DPLength = (0.0882)*HandLength;

      #var AnyVar  Finger3MCLength = (0.3369)*HandLength;
      #var AnyVar  Finger3PPLength = (0.2279)*HandLength;
      #var AnyVar  Finger3MPLength = (0.1462)*HandLength;
      #var AnyVar  Finger3DPLength = (0.0941)*HandLength;

      #var AnyVar  Finger4MCLength = (0.2983)*HandLength;
      #var AnyVar  Finger4PPLength = (0.2124)*HandLength;
      #var AnyVar  Finger4MPLength = (0.1389)*HandLength;
      #var AnyVar  Finger4DPLength = (0.0964)*HandLength;

      #var AnyVar  Finger5MCLength = (0.2732)*HandLength;
      #var AnyVar  Finger5PPLength = (0.1694)*HandLength;
      #var AnyVar  Finger5MPLength = (0.0968)*HandLength;
      #var AnyVar  Finger5DPLength = (0.0843)*HandLength;


      #var AnyVar HandBreadth = DesignVar(0.072); ///< From the external landmark of the CMP joint of the index to the external landmark of the CMP joint of the little finger

      #var AnyVar FootLength = DesignVar(0.285); ///< from back of heel to tip of longest toe along foot
      #var AnyVar ThighLength = DesignVar(0.405); ///< from top of trochanter to epicondylus lateral along thigh
      #var AnyVar ShankLength = DesignVar(0.378); ///< from condulus medial to malleolus medial along shank
      #var AnyVar TalusLength = 0.133*FootLength; ///< calculated automaticaly from the foot size
    };

    AnyFolder Left ={
      #var AnyVar UpperArmLength = DesignVar(0.414); ///< From elbow bony tip to acromion bony tip along humerus (elbow flexed 90 deg)
      #var AnyVar LowerArmLength = DesignVar(0.268); ///< From elbow bony tip to ulna styloid bony tip along ulna (elbow flexed 90 deg)
      #var AnyVar HandLength = DesignVar(0.182); ///< From the base of the palm to the tip of the middle finger.

      #var AnyVar CarpalsLength = (0.1949)*HandLength;

      #var AnyVar  ThumbMCLength = (0.2367)*HandLength;
      #var AnyVar  ThumbPPLength = (0.1611)*HandLength;
      #var AnyVar  ThumbDPLength = (0.1175)*HandLength;

      #var AnyVar  Finger2MCLength = (0.3503)*HandLength;
      #var AnyVar  Finger2PPLength = (0.2059)*HandLength;
      #var AnyVar  Finger2MPLength = (0.1198)*HandLength;
      #var AnyVar  Finger2DPLength = (0.0882)*HandLength;

      #var AnyVar  Finger3MCLength = (0.3369)*HandLength;
      #var AnyVar  Finger3PPLength = (0.2279)*HandLength;
      #var AnyVar  Finger3MPLength = (0.1462)*HandLength;
      #var AnyVar  Finger3DPLength = (0.0941)*HandLength;

      #var AnyVar  Finger4MCLength = (0.2983)*HandLength;
      #var AnyVar  Finger4PPLength = (0.2124)*HandLength;
      #var AnyVar  Finger4MPLength = (0.1389)*HandLength;
      #var AnyVar  Finger4DPLength = (0.0964)*HandLength;

      #var AnyVar  Finger5MCLength = (0.2732)*HandLength;
      #var AnyVar  Finger5PPLength = (0.1694)*HandLength;
      #var AnyVar  Finger5MPLength = (0.0968)*HandLength;
      #var AnyVar  Finger5DPLength = (0.0843)*HandLength;


      #var AnyVar HandBreadth = DesignVar(0.072); ///< From the external landmark of the CMP joint of the index to the external landmark of the CMP joint of the little finger

      #var AnyVar ThighLength = DesignVar(0.405); ///< from top of trochanter to epicondylus lateral along thigh
      #var AnyVar ShankLength = DesignVar(0.378); ///< from condulus medial to malleolus medial along shank
      #var AnyVar FootLength = DesignVar(0.285); ///< from back of heel to tip of longest toe along foot
      #var AnyVar TalusLength = 0.133*FootLength; ///< calculated automaticaly from the foot size
    };


  };

}; //Template_Anthropometrics


#class_template Template_Anthropometrics_50th_percentile  {

  AnyVar BMI = BodyMass/(BodyHeight^2);

  ///Estimation from Frankenfield et al. (2001) valid for men
  AnyVar FatPercent = (-0.09 + 0.0149*BMI - 0.00009*BMI^2)*100;

  AnyVar BodyMass = Main.Model.BodyMass;
  AnyVar BodyHeight = Main.Model.BodyHeight;


  AnyFolder SegmentMasses = {

    //Segment masses in kg from Winter ("Biomechanics and motor control of human movement." David A. Winter)
    AnyVar Lumbar = 0.139*.BodyMass; // T12-L1 to L5-Sacrum
    AnyVar Thorax = 0.1894*.BodyMass; // C7-T1 to T12-L1 (modified from 0.216 winter to separate scapula)
    AnyVar Pelvis = 0.142*.BodyMass;
    AnyVar Head = 0.081*.BodyMass; // head and cervical

    AnyFolder Right =
    {
      AnyVar Clavicle = 0.0133*..BodyMass; //< Combined mass of shoulder muscles and scapula/clavicula bones.
      AnyVar UpperArm = 0.028*..BodyMass;
      AnyVar LowerArm = 0.016*..BodyMass;
      AnyVar Hand = 0.006*..BodyMass;

      AnyVar Thumb_MC = Hand/18;
      AnyVar Thumb_PP = Hand/18;
      AnyVar Thumb_DP = Hand/18;
      AnyVar Finger_MC = Hand/18;
      AnyVar Finger_PP = Hand/18;
      AnyVar Finger_MP = Hand/18;
      AnyVar Finger_DP = Hand/18;

      AnyVar Thigh = 0.1*..BodyMass;
      AnyVar Shank = 0.0465*..BodyMass;
      AnyVar Talus = 0.2*0.0145*..BodyMass; //20% of total foot (from bone volume ratio)
      AnyVar Foot =  0.8*0.0145*..BodyMass; //80% of total foot (from bone volume ratio)
    };

    AnyFolder Left =
    {
      AnyVar Clavicle = 0.0133*..BodyMass;
      AnyVar UpperArm = 0.028*..BodyMass;
      AnyVar LowerArm = 0.016*..BodyMass;
      AnyVar Hand = 0.006*..BodyMass;

      AnyVar Thumb_MC = Hand/18;
      AnyVar Thumb_PP = Hand/18;
      AnyVar Thumb_DP = Hand/18;
      AnyVar Finger_MC = Hand/18;
      AnyVar Finger_PP = Hand/18;
      AnyVar Finger_MP = Hand/18;
      AnyVar Finger_DP = Hand/18;

      AnyVar Thigh = 0.1*..BodyMass;
      AnyVar Shank = 0.0465*..BodyMass;
      AnyVar Talus = 0.2*0.0145*..BodyMass; //20% of total foot (from bone volume ratio)
      AnyVar Foot =  0.8*0.0145*..BodyMass; //80% of total foot (from bone volume ratio)
    };
  };


  AnyFolder SegmentDimensions = {
    AnyVar PelvisWidth = 0.176*.BodyHeight/1.75;     //distance between hip joints (0.16 for simple leg model)

    AnyVar HeadHeight = 0.14*.BodyHeight/1.75;       //height in neutral position from  C1HatNode to top of head
    AnyVar TrunkHeight = 0.620233*.BodyHeight/1.75;  //height in neautral position from  C1HatNode to L5SacrumJnt


    // These two folders are used by the scaling laws
    AnyFolder Right ={
      AnyVar ThighLength = 0.4098364*..BodyHeight/1.75;
      AnyVar ShankLength = 0.4210448*..BodyHeight/1.75;
      AnyVar FootLength = 0.2571425*..BodyHeight/1.75;
      AnyVar TalusLength = 0.03808687*..BodyHeight/1.75;

      AnyVar UpperArmLength = 0.34;
      AnyVar LowerArmLength = Main.Model.LowerArmLength;
      AnyVar HandLength = Main.Model.HandLength;

      AnyVar CarpalsLength = DesignVar(0.1949*HandLength);


      AnyVar  ThumbMCLength = DesignVar(0.2367*HandLength);
      AnyVar  ThumbPPLength = DesignVar(0.1611*HandLength);
      AnyVar  ThumbDPLength = DesignVar(0.1175*HandLength);

      AnyVar  Finger2MCLength = DesignVar(0.3503*HandLength);
      AnyVar  Finger2PPLength = DesignVar(0.2059*HandLength);
      AnyVar  Finger2MPLength = DesignVar(0.1198*HandLength);
      AnyVar  Finger2DPLength = DesignVar(0.0882*HandLength);

      AnyVar  Finger3MCLength = DesignVar(0.3369*HandLength);
      AnyVar  Finger3PPLength = DesignVar(0.2279*HandLength);
      AnyVar  Finger3MPLength = DesignVar(0.1462*HandLength);
      AnyVar  Finger3DPLength = DesignVar(0.0941*HandLength);

      AnyVar  Finger4MCLength = DesignVar(0.2983*HandLength);
      AnyVar  Finger4PPLength = DesignVar(0.2124*HandLength);
      AnyVar  Finger4MPLength = DesignVar(0.1389*HandLength);
      AnyVar  Finger4DPLength = DesignVar(0.0964*HandLength);

      AnyVar  Finger5MCLength = DesignVar(0.2732*HandLength);
      AnyVar  Finger5PPLength = DesignVar(0.1694*HandLength);
      AnyVar  Finger5MPLength = DesignVar(0.0968*HandLength);
      AnyVar  Finger5DPLength = DesignVar(0.0843*HandLength);


      AnyVar HandBreadth = 0.085;
    };

    AnyFolder Left ={
      AnyVar ThighLength = .Right.ThighLength;
      AnyVar ShankLength = .Right.ShankLength;
      AnyVar FootLength = .Right.FootLength;
      AnyVar TalusLength = .Right.TalusLength;

      AnyVar UpperArmLength = .Right.UpperArmLength;
      AnyVar LowerArmLength = .Right.LowerArmLength;
      AnyVar HandLength = .Right.HandLength;

      AnyVar CarpalsLength = DesignVar(0.1949*HandLength);

      AnyVar  ThumbMCLength = DesignVar(0.2367*HandLength);
      AnyVar  ThumbPPLength = DesignVar(0.1611*HandLength);
      AnyVar  ThumbDPLength = DesignVar(0.1175*HandLength);

      AnyVar  Finger2MCLength = DesignVar(0.3503*HandLength);
      AnyVar  Finger2PPLength = DesignVar(0.2059*HandLength);
      AnyVar  Finger2MPLength = DesignVar(0.1198*HandLength);
      AnyVar  Finger2DPLength = DesignVar(0.0882*HandLength);

      AnyVar  Finger3MCLength = DesignVar(0.3369*HandLength);
      AnyVar  Finger3PPLength = DesignVar(0.2279*HandLength);
      #var AnyVar  Finger3MPLength = DesignVar(0.1462*HandLength);
      #var AnyVar  Finger3DPLength = DesignVar(0.0941*HandLength);

      AnyVar  Finger4MCLength = DesignVar(0.2983*HandLength);
      AnyVar  Finger4PPLength = DesignVar(0.2124*HandLength);
      AnyVar  Finger4MPLength = DesignVar(0.1389*HandLength);
      AnyVar  Finger4DPLength = DesignVar(0.0964*HandLength);

      AnyVar  Finger5MCLength = DesignVar(0.2732*HandLength);
      AnyVar  Finger5PPLength = DesignVar(0.1694*HandLength);
      AnyVar  Finger5MPLength = DesignVar(0.0968*HandLength);
      AnyVar  Finger5DPLength = DesignVar(0.0843*HandLength);


      AnyVar HandBreadth = .Right.HandBreadth;
    };

  };
};  // Template_Anthropometrics_50th_Percentile
