/* ----------------------------------------------------------------
Default mannequin drivers:

-The pelvis is locked to the ground
-The remaining degrees of freedom are controlled by parameters in the "<BM_MANNEQUIN_FILE>" file.
-This file is a good way to get an overview of the dof in the full body model
 all the dof in the body model is driven from this file.
-In total

Soeren, March 1, 2006.
----------------------------------------------------------------  */


// The Default mannequin drivers are implemented as a class template.
// The implementation is a bit ackward, since all define statements
// and has to be passed into the class template as arguments.
//
// But the bennefit of this implementation is that all variables
// can be overridden, as if they were variables of a class.
// For example all weight can be customized:
// Main.HumanModel.DefaultMannequinDrivers = {
//       PostureDriverBending.Weights.Fun.Value = 0.1;
// };

// Impletemented in: #include "BodyModel.MannequinDrivers.ClassTemplate.any"
Template_MannequinDrivers DefaultMannequinDrivers(

MANNEQUIN_DRIVER_WEAK_SWITCH = BM_MANNEQUIN_DRIVER_WEAK_SWITCH,
GLOBAL_REFERENCE_FRAME_SWITCH = BM_GLOBAL_REFERENCE_FRAME_SWITCH,
MANNEQUIN_DRIVER_PELVIS_POS_X = BM_MANNEQUIN_DRIVER_PELVIS_POS_X,
MANNEQUIN_DRIVER_PELVIS_POS_Y = BM_MANNEQUIN_DRIVER_PELVIS_POS_Y,
MANNEQUIN_DRIVER_PELVIS_POS_Z = BM_MANNEQUIN_DRIVER_PELVIS_POS_Z,
MANNEQUIN_DRIVER_PELVIS_ROT_Z = BM_MANNEQUIN_DRIVER_PELVIS_ROT_Z,
MANNEQUIN_DRIVER_PELVIS_ROT_Y = BM_MANNEQUIN_DRIVER_PELVIS_ROT_Y,
MANNEQUIN_DRIVER_PELVIS_ROT_X = BM_MANNEQUIN_DRIVER_PELVIS_ROT_X,
MANNEQUIN_DRIVER_SKULL_THORAX_FLEXION = BM_MANNEQUIN_DRIVER_SKULL_THORAX_FLEXION,
MANNEQUIN_DRIVER_SKULL_THORAX_LATERALBENDING = BM_MANNEQUIN_DRIVER_SKULL_THORAX_LATERALBENDING,
MANNEQUIN_DRIVER_SKULL_THORAX_ROTATION = BM_MANNEQUIN_DRIVER_SKULL_THORAX_ROTATION,
MANNEQUIN_DRIVER_PELVIS_THORAX_LATERAL_BENDING = BM_MANNEQUIN_DRIVER_PELVIS_THORAX_LATERAL_BENDING,
MANNEQUIN_DRIVER_PELVIS_THORAX_ROTATION = BM_MANNEQUIN_DRIVER_PELVIS_THORAX_ROTATION,
MANNEQUIN_DRIVER_PELVIS_THORAX_EXTENSION = BM_MANNEQUIN_DRIVER_PELVIS_THORAX_EXTENSION,
MANNEQUIN_DRIVER_STERNOCLAVICULAR_PROTRACTION_RIGHT = BM_MANNEQUIN_DRIVER_STERNOCLAVICULAR_PROTRACTION_RIGHT,
MANNEQUIN_DRIVER_STERNOCLAVICULAR_ELEVATION_RIGHT = BM_MANNEQUIN_DRIVER_STERNOCLAVICULAR_ELEVATION_RIGHT,
MANNEQUIN_DRIVER_STERNOCLAVICULAR_AXIAL_ROTATION_RIGHT = BM_MANNEQUIN_DRIVER_STERNOCLAVICULAR_AXIAL_ROTATION_RIGHT,
MANNEQUIN_DRIVER_GLENOHUMERAL_ABDUCTION_RIGHT = BM_MANNEQUIN_DRIVER_GLENOHUMERAL_ABDUCTION_RIGHT,
MANNEQUIN_DRIVER_GLENOHUMERAL_FLEXION_RIGHT = BM_MANNEQUIN_DRIVER_GLENOHUMERAL_FLEXION_RIGHT,
MANNEQUIN_DRIVER_GLENOHUMERAL_EXTERNAL_ROTATION_RIGHT = BM_MANNEQUIN_DRIVER_GLENOHUMERAL_EXTERNAL_ROTATION_RIGHT,
MANNEQUIN_DRIVER_ELBOW_FLEXION_RIGHT = BM_MANNEQUIN_DRIVER_ELBOW_FLEXION_RIGHT,
MANNEQUIN_DRIVER_ELBOW_PRONATION_RIGHT = BM_MANNEQUIN_DRIVER_ELBOW_PRONATION_RIGHT,
MANNEQUIN_DRIVER_WRIST_FLEXION_RIGHT = BM_MANNEQUIN_DRIVER_WRIST_FLEXION_RIGHT,
MANNEQUIN_DRIVER_WRIST_ABDUCTION_RIGHT = BM_MANNEQUIN_DRIVER_WRIST_ABDUCTION_RIGHT,
MANNEQUIN_DRIVER_HIP_FLEXION_RIGHT = BM_MANNEQUIN_DRIVER_HIP_FLEXION_RIGHT,
MANNEQUIN_DRIVER_HIP_ABDUCTION_RIGHT = BM_MANNEQUIN_DRIVER_HIP_ABDUCTION_RIGHT,
MANNEQUIN_DRIVER_HIP_EXTERNAL_ROTATION_RIGHT = BM_MANNEQUIN_DRIVER_HIP_EXTERNAL_ROTATION_RIGHT,
MANNEQUIN_DRIVER_KNEE_FLEXION_RIGHT = BM_MANNEQUIN_DRIVER_KNEE_FLEXION_RIGHT,
MANNEQUIN_DRIVER_ANKLE_FLEXION_RIGHT = BM_MANNEQUIN_DRIVER_ANKLE_FLEXION_RIGHT,
MANNEQUIN_DRIVER_ANKLE_EVERSION_RIGHT = BM_MANNEQUIN_DRIVER_ANKLE_EVERSION_RIGHT,
MANNEQUIN_DRIVER_ANKLE_SUBTALAR_EVERSION_RIGHT = BM_MANNEQUIN_DRIVER_ANKLE_SUBTALAR_EVERSION_RIGHT,
MANNEQUIN_DRIVER_STERNOCLAVICULAR_PROTRACTION_LEFT = BM_MANNEQUIN_DRIVER_STERNOCLAVICULAR_PROTRACTION_LEFT,
MANNEQUIN_DRIVER_STERNOCLAVICULAR_ELEVATION_LEFT = BM_MANNEQUIN_DRIVER_STERNOCLAVICULAR_ELEVATION_LEFT,
MANNEQUIN_DRIVER_STERNOCLAVICULAR_AXIAL_ROTATION_LEFT = BM_MANNEQUIN_DRIVER_STERNOCLAVICULAR_AXIAL_ROTATION_LEFT,
MANNEQUIN_DRIVER_GLENOHUMERAL_ABDUCTION_LEFT = BM_MANNEQUIN_DRIVER_GLENOHUMERAL_ABDUCTION_LEFT,
MANNEQUIN_DRIVER_GLENOHUMERAL_FLEXION_LEFT = BM_MANNEQUIN_DRIVER_GLENOHUMERAL_FLEXION_LEFT,
MANNEQUIN_DRIVER_GLENOHUMERAL_EXTERNAL_ROTATION_LEFT = BM_MANNEQUIN_DRIVER_GLENOHUMERAL_EXTERNAL_ROTATION_LEFT,
MANNEQUIN_DRIVER_ELBOW_FLEXION_LEFT = BM_MANNEQUIN_DRIVER_ELBOW_FLEXION_LEFT,
MANNEQUIN_DRIVER_ELBOW_PRONATION_LEFT = BM_MANNEQUIN_DRIVER_ELBOW_PRONATION_LEFT,
MANNEQUIN_DRIVER_WRIST_FLEXION_LEFT = BM_MANNEQUIN_DRIVER_WRIST_FLEXION_LEFT,
MANNEQUIN_DRIVER_WRIST_ABDUCTION_LEFT = BM_MANNEQUIN_DRIVER_WRIST_ABDUCTION_LEFT,
MANNEQUIN_DRIVER_HIP_FLEXION_LEFT = BM_MANNEQUIN_DRIVER_HIP_FLEXION_LEFT,
MANNEQUIN_DRIVER_HIP_ABDUCTION_LEFT = BM_MANNEQUIN_DRIVER_HIP_ABDUCTION_LEFT,
MANNEQUIN_DRIVER_HIP_EXTERNAL_ROTATION_LEFT = BM_MANNEQUIN_DRIVER_HIP_EXTERNAL_ROTATION_LEFT,
MANNEQUIN_DRIVER_KNEE_FLEXION_LEFT = BM_MANNEQUIN_DRIVER_KNEE_FLEXION_LEFT,
MANNEQUIN_DRIVER_ANKLE_FLEXION_LEFT = BM_MANNEQUIN_DRIVER_ANKLE_FLEXION_LEFT,
MANNEQUIN_DRIVER_ANKLE_EVERSION_LEFT = BM_MANNEQUIN_DRIVER_ANKLE_EVERSION_LEFT,
MANNEQUIN_DRIVER_ANKLE_SUBTALAR_EVERSION_LEFT = BM_MANNEQUIN_DRIVER_ANKLE_SUBTALAR_EVERSION_LEFT,
MANNEQUIN_DRIVER_HAND_RIGHT = BM_MANNEQUIN_DRIVER_HAND_RIGHT,
MANNEQUIN_DRIVER_HAND_LEFT = BM_MANNEQUIN_DRIVER_HAND_LEFT,
LEG_MODEL_Leg = _LEG_MODEL_LEG_,
LEG_MODEL_TLEM = _LEG_MODEL_TLEM_,
LEG_MODEL_TLEM2 = _LEG_MODEL_TLEM2_,
LEG_MODEL = BM_LEG_MODEL,
LEG_RIGHT = BM_LEG_RIGHT,
ARM_RIGHT = BM_ARM_RIGHT,
LEG_LEFT = BM_LEG_LEFT,
ARM_LEFT = BM_ARM_LEFT,
ARM_CLAVICULA_ROTATION_RHYTHM = BM_ARM_CLAVICULA_ROTATION_RHYTHM,
ARM_SHOULDER_RHYTHM = BM_ARM_SHOULDER_RHYTHM,
HAND_MODEL = BM_HAND_MODEL,
HAND_MODEL_RUHM = _HAND_MODEL_RUHM_,
HAND_FINGER_RHYTHM = BM_HAND_FINGER_RHYTHM,
TRUNK_LUMBAR_RHYTHM  = BM_TRUNK_LUMBAR_RHYTHM,
FOOT_MODEL = BM_FOOT_MODEL,
FOOT_MODEL_DEFAULT = _FOOT_MODEL_DEFAULT_
)= {};
