//#ifndef STANDARDPARAM_EXTERIOR
//#define STANDARDPARAM_EXTERIOR 0
//#endif

#ifndef STANDARDPARAM_EXTERIOR
  AnyFolder StandardParameters =
  {
    #include "..\Include\BodyParameters.any"
    #include "..\..\Trunk\StandardParameters.any"
    #include "..\..\Arm\StandardParameters.any"

    #if ((BM_LEG_RIGHT != _LEG_MODEL_TLEM_) & (BM_LEG_LEFT != _LEG_MODEL_TLEM_))
     AnyFolder Right = {#include "..\..\Leg\StandardParameters.any"};
     AnyFolder Left  = {#include "..\..\Leg\StandardParameters.any"};
    #else
     AnyFolder Right = {#include "..\..\LegTLEM\StandardParameters.any"};
     AnyFolder Left  = {#include "..\..\LegTLEM\StandardParameters.any"};
    #endif
  };

#else
  AnyFolder StandardParameters =
  {
    #include "..\Include\BodyParameters.any"
    #include "..\..\Trunk\StandardParametersExt.any"
    #include "..\..\Arm\StandardParametersExt.any"

    #if ((BM_LEG_RIGHT != _LEG_MODEL_TLEM_) & (BM_LEG_LEFT != _LEG_MODEL_TLEM_))
     AnyFolder Right = {#include "..\..\Leg\StandardParametersExt.any"};
     AnyFolder Left  = {#include "..\..\Leg\StandardParametersExt.any"};
    #else
     AnyFolder Right ={#include "..\..\LegTLEM\StandardParametersExt.any"};
     AnyFolder Left ={#include "..\..\LegTLEM\StandardParametersExt.any"};
    #endif
  };

#endif
