//This file controls which calibrations to be made on the model
AnyFolder EvalulateJointStrength={
AnyFolder &BodyModelRef = .BodyModel;

  #if RIGHT_LEG_TD | RIGHT_LEG | RIGHT_ARM
  AnyFolder Right = {};
  #endif
  #if LEFT_LEG_TD | LEFT_LEG | LEFT_ARM
  AnyFolder Left = {};
  #endif

  AnyFolder Trunk = {};

  #if RIGHT_LEG_TD
  #include "../../LegTLEM/EvaluateJointStrengthSequenceRight.any"
  #define RIGHT_LEG_TD_JOINTSTRENGTH 1
  #else
  #define RIGHT_LEG_TD_JOINTSTRENGTH 0
  #endif

  #if LEFT_LEG_TD
  #include "../../LegTLEM/EvaluateJointStrengthSequenceLeft.any"
  #define LEFT_LEG_TD_JOINTSTRENGTH 1
  #else
  #define LEFT_LEG_TD_JOINTSTRENGTH 0
  #endif

  #if RIGHT_LEG
  #include "../../Leg/EvaluateJointStrengthSequenceRight.any"
  #define RIGHT_LEG_JOINTSTRENGTH 1
  #else
  #define RIGHT_LEG_JOINTSTRENGTH 0
  #endif

  #if LEFT_LEG
  #include "../../Leg/EvaluateJointStrengthSequenceLeft.any"
  #define LEFT_LEG_JOINTSTRENGTH 1
  #else
  #define LEFT_LEG_JOINTSTRENGTH 0
  #endif


  #if RIGHT_ARM
  #include "../../Arm/JointStrengthSequenceRight.any"
  #define RIGHT_ARM_JOINTSTRENGTH 1
  #else
  #define RIGHT_ARM_JOINTSTRENGTH 0
  #endif

  #if LEFT_ARM
  #include "../../Arm/JointStrengthSequenceLeft.any"
  #define LEFT_ARM_JOINTSTRENGTH 1
  #else
  #define LEFT_ARM_JOINTSTRENGTH 0
  #endif
//
  #define TRUNK_JOINTSTRENGTH 0

  #define TRUNK_NECK_JOINTSTRENGTH 0

  #if !(RIGHT_LEG_TD_JOINTSTRENGTH | LEFT_LEG_TD_JOINTSTRENGTH | RIGHT_LEG_JOINTSTRENGTH | LEFT_LEG_JOINTSTRENGTH | RIGHT_ARM_JOINTSTRENGTH | LEFT_ARM_JOINTSTRENGTH | TRUNK_JOINTSTRENGTH | TRUNK_NECK_JOINTSTRENGTH)
  AnyOperationDummy Run_all_studies ={};
  #else
  AnyOperationSequence Run_all_studies ={
   AnyOperation &calibration= ..Calibration.CalibrationSequence;
   AnyOperationDummy NOP = {};
  };
  #endif

  #undef RIGHT_LEG_TD_JOINTSTRENGTH
  #undef LEFT_LEG_TD_JOINTSTRENGTH
  #undef RIGHT_LEG_JOINTSTRENGTH
  #undef LEFT_LEG_JOINTSTRENGTH
  #undef RIGHT_ARM_JOINTSTRENGTH
  #undef LEFT_ARM_JOINTSTRENGTH
  #undef TRUNK_JOINTSTRENGTH
  #undef TRUNK_NECK_JOINTSTRENGTH


};
