Left = {

AnyFolder Leg = {

  #include "..\..\LegTD\LegMus3E.root.any"

      #include "../Include/SettingsLeg.any"
      AnyFolder &InterfaceFolder =..Interface.Left;
      //Reference to folder
      AnyFolder &MannequinValuesFolder = ..MannequinValuesFromModel.AnyFolder_Posture.AnyFolder_Left;

      //-------------------------------------------------------
      // Interface references that specifies what the leg "Leg/Leg.any" should connect to
      //-------------------------------------------------------
          AnyFolder &Scaling =...Scaling;
    AnyFolder &StandardParameters =...Scaling.StandardParameters.Left;
      AnyFolder &GeoScaling =...Scaling.GeometricalScaling.Left;
      AnyFolder &MassScaling =...Scaling.MassScaling.Left;
      AnyFolder &FiberLengthScaling =...Scaling.FiberLengthScaling.Left;
      AnyFolder &StrengthScaling =...Scaling.StrengthScaling.Left;

      AnyRefFrame &HipNodeRef= ..Trunk.SegmentsLumbar.PelvisSeg.HipJointLeftTD;
      //This is a sign variable which indicates that this is the right side
      AnyVar Sign =-1;

      AnyFolder BonesTransparency = {
        AnyVar Foot = Main.DrawSettings.BonesTransparency.LeftFoot;
        AnyVar Shank = Main.DrawSettings.BonesTransparency.LeftShank;
        AnyVar Thigh = Main.DrawSettings.BonesTransparency.LeftThigh;
        AnyVar Talus = Main.DrawSettings.BonesTransparency.LeftTalus;
        AnyVar Patella = Main.DrawSettings.BonesTransparency.LeftPatella;
      };


      AnyFolder MomentMeasure={
        AnyFolder &TrunkMuscles = ...Trunk.MusclesSpineLeft;
        #include "..\..\LegTD\LegMoments.any"
      };


    }; //End Leg

  };


    Trunk = {
    AnyRefFrame &PsoasMajorLeftReference=.Left.Leg.Seg.Thigh;
    };


    #include "../../LegTD/LeftLegMuscles3ESelectedOutput.any"
