 AnyGUIPlugin TestPlugin = {
   //PluginFile = "C:\Users\ms\Desktop\Version 1\ammr_bm_configplugin\bm_config\test.py";

   PluginFile = "C:\Users\ms\Documents\ammr\BM_Plugin-1.0.0-py3.6.egg";
   DisplayName = "Hello World";
   #ifdef BM_PLUGIN_CONFIG
   ScriptFile = BM_PLUGIN_CONFIG;
   #else
   ScriptFile = "";
   #endif
 };
