Right = {

  AnyFolder ShoulderArm = {

      AnyFolder &Scaling = ...Scaling.GeometricalScaling.Right;
      AnyFolder &MassScaling = ...Scaling.MassScaling.Right;
      AnyFolder &StrengthScaling = ...Scaling.StrengthScaling.Right;

      #define _LEFT_RIGHT_ "Right"
      #define _SIDE_ Right

      #include "..\..\Arm\ShoulderArmModel.root.any"

      #undef _SIDE_
      #undef _LEFT_RIGHT_

      //Reference to folder which contains the interface of the right side
      AnyFolder &InterfaceFolder =..Interface.Right;

      //Reference to folder
      AnyFolder &MannequinValuesFolder = ..MannequinValuesFromModel.AnyFolder_Posture.AnyFolder_Right;

      #include "../Include/SettingsShoulderArm.any"

      //-------------------------------------------------------
      // Interface references that specifies what the arm "Arm/ShoulderArm.any" should connect to
      //-------------------------------------------------------
      //This point is used for attachement of the arm to the shoulder
      AnyRefNode &ShoulderRef = ..Trunk.Segments.SternumSeg.ij;

      //This is a sign variable which indicates that this is the right side
      AnyVar Sign = 1;

      AnyFolder BonesOpacity = {
        AnyVar Clavicula = Main.DrawSettings.BonesOpacity.RightClavicula;
        AnyVar Scapula = Main.DrawSettings.BonesOpacity.RightScapula;
        AnyVar Humerus = Main.DrawSettings.BonesOpacity.RightHumerus;
        AnyVar Ulna = Main.DrawSettings.BonesOpacity.RightUlna;
        AnyVar Radius = Main.DrawSettings.BonesOpacity.RightRadius;
        AnyVar Hand = Main.DrawSettings.BonesOpacity.RightHand;
      };

      AnyFolder MomentMeasure = {
           #include "..\..\Arm\ArmMoments.any"
      };


    }; //End ShoulderArm

  };


  #include "../../Arm/RightArmMusclesSelectedOutput.any"
