Trunk = {
  //Including all muscle parameters here, in this case we only needed the Psoas muscles,
  //but here all are included to avoid splitting files
  #include "../../Trunk/MuscleParametersSpineSimpleRight.any"

  AnyFolder MusclesSpineRight = {
    #include "../../Trunk/PsoasMajorRight.any"
  }; // End of MuscleSpineRight

};
