  #ifdef BM_SCALING_MY_FILE
     #if BM_SCALING != _SCALING_CUSTOM_
     AnyInt ScalingNotice1 = notice(1, "Using a custom scaling law is specified, using `BM_SCALING_MY_FILE`. This overrides the selection by the BM_SCALING parameter")
     #endif
     #undef BM_SCALING
     #define BM_SCALING _SCALING_CUSTOM_
   #endif


   //Base scaling laws according to the configuration file
   #if BM_SCALING == _SCALING_STANDARD_
     #path BM_SCALING_MY_FILE "<ANYBODY_PATH_BODY>\Scaling\ScalingStandard.any"
   #endif

   #if (BM_SCALING == _SCALING_UNIFORM_) | (BM_SCALING == _SCALING_UNIFORM_EXTMEASUREMENTS_)
     #path BM_SCALING_MY_FILE  "<ANYBODY_PATH_BODY>\Scaling\ScalingUniform.any"
   #endif

   #if (BM_SCALING == _SCALING_LENGTHMASS_) | (BM_SCALING == _SCALING_LENGTHMASS_EXTMEASUREMENTS_)
     #path BM_SCALING_MY_FILE  "<ANYBODY_PATH_BODY>\Scaling\ScalingLengthMass.any"
   #endif

   #if (BM_SCALING == _SCALING_LENGTHMASSFAT_) | (BM_SCALING == _SCALING_LENGTHMASSFAT_EXTMEASUREMENTS_)
     #path BM_SCALING_MY_FILE  "<ANYBODY_PATH_BODY>\Scaling\ScalingLengthMassFat.any"
   #endif

   #if BM_SCALING == _SCALING_XYZ_
     #path BM_SCALING_MY_FILE "<ANYBODY_PATH_BODY>\Scaling\ScalingXYZMassFat.any"
   #endif

   #include "<BM_SCALING_MY_FILE>"


//  // By default there is an option to define a custom scaling law
//
  Scaling={
   //Base scaling laws according to the configuration file

   StandardParameters = {
     AnyFolder& Trunk_ModelParameters = Main.HumanModel.BodyModel.Trunk.ModelParameters;
     #if BM_LEG_MODEL != OFF
       AnyFolder& Leg_ModelParameters = Main.HumanModel.BodyModel.Trunk.SegmentsLumbar.PelvisSeg.Leg_ModelParameters;
     #endif
   };

 };
