AnyDoc _AMMR_BETA_INFO_ =
{
   Hidden = On;
   AnyString GitInfo ??= {"unknown","unknown", ""};

#if AMMR_IS_GIT_REPOSITORY & ANYBODY_PYTHON_AVAILABLE & BM_INCLUDE_GIT_INFO
   AnyFunEx ReadGitInfo = {
     AnyString Return = {"","",""};
     AnyFunExMonoPy git_info = { ModuleFile = "git_info.py"; ArgList = { AnyString gitfolder = "";};};
   };
   GitInfo= ReadGitInfo(ANYBODY_PATH_AMMR + "/.git");
#endif

};
