// This include file contains all the muscle parameter
// data of the lower extremity. Please note that it is
// necessary to calibrate the model. This data is not
// calibrated!

// A lot of information in this file is obtained from:
// http: // isb.ri.ccf.org/data/delp/Muscle_parameter_table.txt

//All additional muscles from the Klein Horsman dataset that were not decribed in the former model, have been inserted.
//Some muscles of the former model are divided into more seperate parts.
//For each muscle(part), PCSA, Lfbar, Lt0 and pennation angle are defined, based on the Klein Horsman dataset. The muscles
//that were defined already in the former model will keep their definitions of the parameters: Epsilonbar, K1, K2, Fcfast,
//Jt, Jpe and PEFactor. This will also be the case for the muscles that were divided into more seperate parts, for example
//the SoleusLateralis and SoleusMedialis will have the same definition of the parameters Epsilonbar up till PEFactor as the
//Soleus in the former model.
//An extra parameter, PCSA, became available from the dataset. Therefore, a new F0 will be calculated for each muscle
//using F0 = PCSAfactor * PCSA. This factor will be defined first and will be referred to later, so it can be changed easily.
//
//
//Oktober 2007, Karin Gorter


//AnyVar StrengthScaleShank = ...Scaling.StrengthScaling.Shank.StrengthScale;
//AnyVar StrengthScaleThigh = ...Scaling.StrengthScaling.Thigh.StrengthScale;
//AnyVar StrengthScalePelvis = ...Scaling.StrengthScaling.Pelvis.StrengthScale;
//AnyVar FiberLengthScaleShank = ...Scaling.FiberLengthScaling.Shank.FiberLengthScale;
//AnyVar FiberLengthScaleThigh = ...Scaling.FiberLengthScaling.Thigh.FiberLengthScale;


AnyVar PCSAfactor = 27*.....HumanModel.StrengthParameters.StrengthIndexLeg; // = PCSAfactor in N/cm^2 , the PCSA itself is given in cm^2 so F0 is in Newton`s.
//Klein Horsman used a PCSAfactor of 27 N/cm^2

AnyMuscleModel3E SoleusLateralis4Par = {
  F0 = .PCSAfactor*85.9/3; // Maximum force output at optimum fiber length
  Lfbar = (2.6/100*2); // Optimum fiber length
  Lt0 = (8.5/100); // Tendon slack length
  Gammabar = 58.7*(3.14/180); // Pennation angle in radian: similar to Delp's soleus
  Epsilonbar = 0.053; // Tendon strain at F0
  K1 = 10; // Factor for determining shortening speed at optimum length
  K2 = 0; // Factor for determining shortening speed at optimum length
  Fcfast = 0.4; // Factor for determining shortening speed at optimum length
  Jt = 3.0; // Shape parameter for the tendon stiffness
  Jpe = 3.0; // Shape parameter for the parallel stiffness
  PEFactor = 5; // Parameter for influence of parallel stiffness
};

AnyMuscleModel3E SoleusLateralis5Par = {
  F0 = .PCSAfactor*85.9/3; // Maximum force output at optimum fiber length
  Lfbar = (2.6/100*2); // Optimum fiber length
  Lt0 = (8.5/100); // Tendon slack length
  Gammabar = 58.7*(3.14/180); // Pennation angle in radian: similar to Delp's soleus
  Epsilonbar = 0.053; // Tendon strain at F0
  K1 = 10; // Factor for determining shortening speed at optimum length
  K2 = 0; // Factor for determining shortening speed at optimum length
  Fcfast = 0.4; // Factor for determining shortening speed at optimum length
  Jt = 3.0; // Shape parameter for the tendon stiffness
  Jpe = 3.0; // Shape parameter for the parallel stiffness
  PEFactor = 5; // Parameter for influence of parallel stiffness
};

AnyMuscleModel3E SoleusLateralis6Par = {
  F0 = .PCSAfactor*85.9/3; // Maximum force output at optimum fiber length
 Lfbar = (2.6/100*2); // Optimum fiber length
  Lt0 = (8.5/100); // Tendon slack length
  Gammabar = 58.7*(3.14/180); // Pennation angle in radian: similar to Delp's soleus
  Epsilonbar = 0.053; // Tendon strain at F0
  K1 = 10; // Factor for determining shortening speed at optimum length
  K2 = 0; // Factor for determining shortening speed at optimum length
  Fcfast = 0.4; // Factor for determining shortening speed at optimum length
  Jt = 3.0; // Shape parameter for the tendon stiffness
  Jpe = 3.0; // Shape parameter for the parallel stiffness
  PEFactor = 5; // Parameter for influence of parallel stiffness
};

AnyMuscleModel3E SoleusMedialis1Par = {
  F0 = .PCSAfactor*94.3/3; // Maximum force output at optimum fiber length
  Lfbar = (2.4/100*2); // Optimum fiber length
  Lt0 = (8.5/100); // Tendon slack length
  Gammabar = 58.7*(3.14/180); // Pennation angle in radian: similar to Delp's soleus
  Epsilonbar = 0.053; // Tendon strain at F0
  K1 = 10; // Factor for determining shortening speed at optimum length
  K2 = 0; // Factor for determining shortening speed at optimum length
  Fcfast = 0.4; // Factor for determining shortening speed at optimum length
  Jt = 3.0; // Shape parameter for the tendon stiffness
  Jpe = 3.0; // Shape parameter for the parallel stiffness
  PEFactor = 5; // Parameter for influence of parallel stiffness
};

AnyMuscleModel3E SoleusMedialis2Par = {
  F0 = .PCSAfactor*94.3/3; // Maximum force output at optimum fiber length
  Lfbar = (2.4/100*2); // Optimum fiber length
  Lt0 = (8.5/100); // Tendon slack length
  Gammabar = 58.7*(3.14/180); // Pennation angle in radian: similar to Delp's soleus
  Epsilonbar = 0.053; // Tendon strain at F0
  K1 = 10; // Factor for determining shortening speed at optimum length
  K2 = 0; // Factor for determining shortening speed at optimum length
  Fcfast = 0.4; // Factor for determining shortening speed at optimum length
  Jt = 3.0; // Shape parameter for the tendon stiffness
  Jpe = 3.0; // Shape parameter for the parallel stiffness
  PEFactor = 5; // Parameter for influence of parallel stiffness
};

AnyMuscleModel3E SoleusMedialis3Par = {
  F0 = .PCSAfactor*94.3/3; // Maximum force output at optimum fiber length
  Lfbar = (2.4/100*2); // Optimum fiber length
  Lt0 = (8.5/100); // Tendon slack length
  Gammabar = 58.7*(3.14/180); // Pennation angle in radian: similar to Delp's soleus
  Epsilonbar = 0.053; // Tendon strain at F0
  K1 = 10; // Factor for determining shortening speed at optimum length
  K2 = 0; // Factor for determining shortening speed at optimum length
  Fcfast = 0.4; // Factor for determining shortening speed at optimum length
  Jt = 3.0; // Shape parameter for the tendon stiffness
  Jpe = 3.0; // Shape parameter for the parallel stiffness
  PEFactor = 5; // Parameter for influence of parallel stiffness
};

AnyMuscleModel3E GastrocnemiusLateralis1Par = {
  F0 = .PCSAfactor*24; // Maximum force output at optimum fiber length
  Lfbar = (5.7/100); // Optimum fiber length
  Lt0 = (23.4/100); // Tendon slack length
  Gammabar = 25.4*(3.14/180); // Pennation angle in radian
  Epsilonbar = 0.053; // Tendon strain at F0
  K1 = 10; // Factor for determining shortening speed at optimum length
  K2 = 0; // Factor for determining shortening speed at optimum length
  Fcfast = 0.4; // Factor for determining shortening speed at optimum length
  Jt = 3.0; // Shape parameter for the tendon stiffness
  Jpe = 3.0; // Shape parameter for the parallel stiffness
  PEFactor = 5; // Parameter for influence of parallel stiffness
};

AnyMuscleModel3E GastrocnemiusMedialis1Par = {
  F0 = .PCSAfactor*43.8; // Maximum force output at optimum fiber length
  Lfbar = (6/100); // Optimum fiber length
  Lt0 = (21.2/100); // Tendon slack length
  Gammabar = 10.8*(3.14/180); // Pennation angle in radian
  Epsilonbar = 0.053; // Tendon strain at F0
  K1 = 10; // Factor for determining shortening speed at optimum length
  K2 = 0; // Factor for determining shortening speed at optimum length
  Fcfast = 0.4; // Factor for determining shortening speed at optimum length
  Jt = 3.0; // Shape parameter for the tendon stiffness
  Jpe = 3.0; // Shape parameter for the parallel stiffness
  PEFactor = 5; // Parameter for influence of parallel stiffness
};


AnyMuscleModel3E FlexorDigitorumLongus1Par = {
  F0 = .PCSAfactor*6.6/3; // Maximum force output at optimum fiber length
  Lfbar = (3.8/100); // Optimum fiber length
  Lt0 = (16.6/100); // Tendon slack length
  Gammabar = 28.5*(3.14/180); // Pennation angle in radian
  Epsilonbar = 0.053; // Tendon strain at F0
  K1 = 10; // Factor for determining shortening speed at optimum length
  K2 = 0; // Factor for determining shortening speed at optimum length
  Fcfast = 0.4; // Factor for determining shortening speed at optimum length
  Jt = 3.0; // Shape parameter for the tendon stiffness
  Jpe = 3.0; // Shape parameter for the parallel stiffness
  PEFactor = 5.0; // Parameter for influence of parallel stiffness
};

AnyMuscleModel3E FlexorDigitorumLongus2Par = {
  F0 = .PCSAfactor*6.6/3; // Maximum force output at optimum fiber length
  Lfbar = (3.8/100); // Optimum fiber length
  Lt0 = (16.6/100); // Tendon slack length
  Gammabar = 28.5*(3.14/180); // Pennation angle in radian
  Epsilonbar = 0.053; // Tendon strain at F0
  K1 = 10; // Factor for determining shortening speed at optimum length
  K2 = 0; // Factor for determining shortening speed at optimum length
  Fcfast = 0.4; // Factor for determining shortening speed at optimum length
  Jt = 3.0; // Shape parameter for the tendon stiffness
  Jpe = 3.0; // Shape parameter for the parallel stiffness
  PEFactor = 5.0; // Parameter for influence of parallel stiffness
};

AnyMuscleModel3E FlexorDigitorumLongus3Par = {
  F0 = .PCSAfactor*6.6/3; // Maximum force output at optimum fiber length
  Lfbar = (3.8/100); // Optimum fiber length
  Lt0 = (16.6/100); // Tendon slack length
  Gammabar = 28.5*(3.14/180); // Pennation angle in radian
  Epsilonbar = 0.053; // Tendon strain at F0
  K1 = 10; // Factor for determining shortening speed at optimum length
  K2 = 0; // Factor for determining shortening speed at optimum length
  Fcfast = 0.4; // Factor for determining shortening speed at optimum length
  Jt = 3.0; // Shape parameter for the tendon stiffness
  Jpe = 3.0; // Shape parameter for the parallel stiffness
  PEFactor = 5.0; // Parameter for influence of parallel stiffness
};

AnyMuscleModel3E FlexorHallucisLongus1Par = {
  F0 = .PCSAfactor*31.1/3; // Maximum force output at optimum fiber length
  Lfbar = (2.6/100) ; // Optimum fiber length
  Lt0 = 0.38; // Tendon slack length
  Gammabar = 10*(3.14/180); // Pennation angle in radian
  Epsilonbar = 0.053; // Tendon strain at F0
  K1 = 10; // Factor for determining shortening speed at optimum length
  K2 = 0; // Factor for determining shortening speed at optimum length
  Fcfast = 0.4; // Factor for determining shortening speed at optimum length
  Jt = 3.0; // Shape parameter for the tendon stiffness
  Jpe = 3.0; // Shape parameter for the parallel stiffness
  PEFactor = 5.0; // Parameter for influence of parallel stiffness
};

AnyMuscleModel3E FlexorHallucisLongus2Par = {
  F0 = .PCSAfactor*31.1/3; // Maximum force output at optimum fiber length
  Lfbar = (2.6/100) ; // Optimum fiber length
  Lt0 = 0.38; // Tendon slack length
  Gammabar = 10*(3.14/180); // Pennation angle in radian
  Epsilonbar = 0.053; // Tendon strain at F0
  K1 = 10; // Factor for determining shortening speed at optimum length
  K2 = 0; // Factor for determining shortening speed at optimum length
  Fcfast = 0.4; // Factor for determining shortening speed at optimum length
  Jt = 3.0; // Shape parameter for the tendon stiffness
  Jpe = 3.0; // Shape parameter for the parallel stiffness
  PEFactor = 5.0; // Parameter for influence of parallel stiffness
};
AnyMuscleModel3E FlexorHallucisLongus3Par = {
  F0 = .PCSAfactor*31.1/3; // Maximum force output at optimum fiber length
  Lfbar = (2.6/100) ; // Optimum fiber length
  Lt0 = 0.38; // Tendon slack length
  Gammabar = 10*(3.14/180); // Pennation angle in radian
  Epsilonbar = 0.053; // Tendon strain at F0
  K1 = 10; // Factor for determining shortening speed at optimum length
  K2 = 0; // Factor for determining shortening speed at optimum length
  Fcfast = 0.4; // Factor for determining shortening speed at optimum length
  Jt = 3.0; // Shape parameter for the tendon stiffness
  Jpe = 3.0; // Shape parameter for the parallel stiffness
  PEFactor = 5.0; // Parameter for influence of parallel stiffness
};

AnyMuscleModel3E TibialisPosteriorMedialis1Par = {
  F0 = .PCSAfactor*21.6/3; // Maximum force output at optimum fiber length
  Lfbar = (2.4/100); // Optimum fiber length
  Lt0 = (11/100); // Tendon slack length
  Gammabar = 25.2*(3.14/180); // Pennation angle in radian
  Epsilonbar = 0.053; // Tendon strain at F0
  K1 = 10; // Factor for determining shortening speed at optimum length
  K2 = 0; // Factor for determining shortening speed at optimum length
  Fcfast = 0.4; // Factor for determining shortening speed at optimum length
  Jt = 3.0; // Shape parameter for the tendon stiffness
  Jpe = 3.0; // Shape parameter for the parallel stiffness
  // PEFactor = 5.0; // Parameter for influence of parallel stiffness
  PEFactor = 5; // Parameter for influence of parallel stiffness
};

AnyMuscleModel3E TibialisPosteriorMedialis2Par = {
  F0 = .PCSAfactor*21.6/3; // Maximum force output at optimum fiber length
  Lfbar = (2.4/100); // Optimum fiber length
  Lt0 = (11/100); // Tendon slack length
  Gammabar = 25.2*(3.14/180); // Pennation angle in radian
  Epsilonbar = 0.053; // Tendon strain at F0
  K1 = 10; // Factor for determining shortening speed at optimum length
  K2 = 0; // Factor for determining shortening speed at optimum length
  Fcfast = 0.4; // Factor for determining shortening speed at optimum length
  Jt = 3.0; // Shape parameter for the tendon stiffness
  Jpe = 3.0; // Shape parameter for the parallel stiffness
  // PEFactor = 5.0; // Parameter for influence of parallel stiffness
  PEFactor = 5; // Parameter for influence of parallel stiffness
};

AnyMuscleModel3E TibialisPosteriorMedialis3Par = {
  F0 = .PCSAfactor*21.6/3; // Maximum force output at optimum fiber length
  Lfbar = (2.4/100); // Optimum fiber length
  Lt0 = (11/100); // Tendon slack length
  Gammabar = 25.2*(3.14/180); // Pennation angle in radian
  Epsilonbar = 0.053; // Tendon strain at F0
  K1 = 10; // Factor for determining shortening speed at optimum length
  K2 = 0; // Factor for determining shortening speed at optimum length
  Fcfast = 0.4; // Factor for determining shortening speed at optimum length
  Jt = 3.0; // Shape parameter for the tendon stiffness
  Jpe = 3.0; // Shape parameter for the parallel stiffness
  // PEFactor = 5.0; // Parameter for influence of parallel stiffness
  PEFactor = 5; // Parameter for influence of parallel stiffness
};

AnyMuscleModel3E TibialisPosteriorLateralis1Par = {
  F0 = .PCSAfactor*21.6/3; // Maximum force output at optimum fiber length
  Lfbar = (2.4/100); // Optimum fiber length
  Lt0 = (11/100); // Tendon slack length
  Gammabar = 43.1*(3.14/180); // Pennation angle in radian
  Epsilonbar = 0.053; // Tendon strain at F0
  K1 = 10; // Factor for determining shortening speed at optimum length
  K2 = 0; // Factor for determining shortening speed at optimum length
  Fcfast = 0.4; // Factor for determining shortening speed at optimum length
  Jt = 3.0; // Shape parameter for the tendon stiffness
  Jpe = 3.0; // Shape parameter for the parallel stiffness
  // PEFactor = 5.0; // Parameter for influence of parallel stiffness
  PEFactor = 5; // Parameter for influence of parallel stiffness
};
AnyMuscleModel3E TibialisPosteriorLateralis2Par = {
  F0 = .PCSAfactor*21.6/3; // Maximum force output at optimum fiber length
  Lfbar = (2.4/100); // Optimum fiber length
  Lt0 = (11/100); // Tendon slack length
  Gammabar = 43.1*(3.14/180); // Pennation angle in radian
  Epsilonbar = 0.053; // Tendon strain at F0
  K1 = 10; // Factor for determining shortening speed at optimum length
  K2 = 0; // Factor for determining shortening speed at optimum length
  Fcfast = 0.4; // Factor for determining shortening speed at optimum length
  Jt = 3.0; // Shape parameter for the tendon stiffness
  Jpe = 3.0; // Shape parameter for the parallel stiffness
  // PEFactor = 5.0; // Parameter for influence of parallel stiffness
  PEFactor = 5; // Parameter for influence of parallel stiffness
};
AnyMuscleModel3E TibialisPosteriorLateralis3Par = {
  F0 = .PCSAfactor*21.6/3; // Maximum force output at optimum fiber length
  Lfbar = (2.4/100); // Optimum fiber length
  Lt0 = (11/100); // Tendon slack length
  Gammabar = 43.1*(3.14/180); // Pennation angle in radian
  Epsilonbar = 0.053; // Tendon strain at F0
  K1 = 10; // Factor for determining shortening speed at optimum length
  K2 = 0; // Factor for determining shortening speed at optimum length
  Fcfast = 0.4; // Factor for determining shortening speed at optimum length
  Jt = 3.0; // Shape parameter for the tendon stiffness
  Jpe = 3.0; // Shape parameter for the parallel stiffness
  // PEFactor = 5.0; // Parameter for influence of parallel stiffness
  PEFactor = 5; // Parameter for influence of parallel stiffness
};


AnyMuscleModel3E PeroneusBrevis1Par = {
  F0 = .PCSAfactor*19/3; // Maximum force output at optimum fiber length
  Lfbar = (2.7/100); // Optimum fiber length
  Lt0 = (6.4/100); // Tendon slack length
  Gammabar = 23.1*(3.14/180); // Pennation angle in radian
  Epsilonbar = 0.053; // Tendon strain at F0
  K1 = 10; // Factor for determining shortening speed at optimum length
  K2 = 0; // Factor for determining shortening speed at optimum length
  Fcfast = 0.4; // Factor for determining shortening speed at optimum length
  Jt = 3.0; // Shape parameter for the tendon stiffness
  Jpe = 3.0; // Shape parameter for the parallel stiffness
  PEFactor = 5.0; // Parameter for influence of parallel stiffness
};

AnyMuscleModel3E PeroneusBrevis2Par = {
  F0 = .PCSAfactor*19/3; // Maximum force output at optimum fiber length
  Lfbar = (2.7/100); // Optimum fiber length
  Lt0 = (6.4/100); // Tendon slack length
  Gammabar = 23.1*(3.14/180); // Pennation angle in radian
  Epsilonbar = 0.053; // Tendon strain at F0
  K1 = 10; // Factor for determining shortening speed at optimum length
  K2 = 0; // Factor for determining shortening speed at optimum length
  Fcfast = 0.4; // Factor for determining shortening speed at optimum length
  Jt = 3.0; // Shape parameter for the tendon stiffness
  Jpe = 3.0; // Shape parameter for the parallel stiffness
  PEFactor = 5.0; // Parameter for influence of parallel stiffness
};
AnyMuscleModel3E PeroneusBrevis3Par = {
  F0 = .PCSAfactor*19/3; // Maximum force output at optimum fiber length
  Lfbar = (2.7/100); // Optimum fiber length
  Lt0 = (6.4/100); // Tendon slack length
  Gammabar = 23.1*(3.14/180); // Pennation angle in radian
  Epsilonbar = 0.053; // Tendon strain at F0
  K1 = 10; // Factor for determining shortening speed at optimum length
  K2 = 0; // Factor for determining shortening speed at optimum length
  Fcfast = 0.4; // Factor for determining shortening speed at optimum length
  Jt = 3.0; // Shape parameter for the tendon stiffness
  Jpe = 3.0; // Shape parameter for the parallel stiffness
  PEFactor = 5.0; // Parameter for influence of parallel stiffness
};
AnyMuscleModel3E PeroneusLongus1Par = {
  F0 = .PCSAfactor*23.9/3; // Maximum force output at optimum fiber length
  Lfbar = (3.4/100); // Optimum fiber length
  Lt0 = (15.9/100); // Tendon slack length
  Gammabar = 15.8*(3.14/180); // Pennation angle in radian
  Epsilonbar = 0.053; // Tendon strain at F0
  Fcfast = 0.4; // Factor for determining shortening speed at optimum length Value from Peroneus Brevis
};

AnyMuscleModel3E PeroneusLongus2Par = {
  F0 = .PCSAfactor*23.9/3; // Maximum force output at optimum fiber length
  Lfbar = (3.4/100); // Optimum fiber length
  Lt0 = (15.9/100); // Tendon slack length
  Gammabar = 15.8*(3.14/180); // Pennation angle in radian
  Epsilonbar = 0.053; // Tendon strain at F0
  Fcfast = 0.4; // Factor for determining shortening speed at optimum length Value from Peroneus Brevis
};

AnyMuscleModel3E PeroneusLongus3Par = {
  F0 = .PCSAfactor*23.9/3; // Maximum force output at optimum fiber length
  Lfbar = (3.4/100); // Optimum fiber length
  Lt0 = (15.9/100); // Tendon slack length
  Gammabar = 15.8*(3.14/180); // Pennation angle in radian
  Epsilonbar = 0.053; // Tendon strain at F0
  Fcfast = 0.4; // Factor for determining shortening speed at optimum length Value from Peroneus Brevis
};

AnyMuscleModel3E PeroneusTertius1Par = {
  F0 = .PCSAfactor*6.2/3; // Maximum force output at optimum fiber length
  Lfbar = (4.3/100); // Optimum fiber length
  Lt0 = (10/100); // Tendon slack length
  Gammabar = 19.1*(3.14/180); // Pennation angle in radian
  Epsilonbar = 0.053; // Tendon strain at F0
  Fcfast = 0.4; // Factor for determining shortening speed at optimum length Value from Peroneus Brevis
};

AnyMuscleModel3E PeroneusTertius2Par = {
  F0 = .PCSAfactor*6.2/3; // Maximum force output at optimum fiber length
  Lfbar = (4.3/100); // Optimum fiber length
  Lt0 = (10/100); // Tendon slack length
  Gammabar = 19.1*(3.14/180); // Pennation angle in radian
  Epsilonbar = 0.053; // Tendon strain at F0
  Fcfast = 0.4; // Factor for determining shortening speed at optimum length Value from Peroneus Brevis
};

AnyMuscleModel3E PeroneusTertius3Par = {
  F0 = .PCSAfactor*6.2/3; // Maximum force output at optimum fiber length
  Lfbar = (4.3/100); // Optimum fiber length
  Lt0 = (10/100); // Tendon slack length
  Gammabar = 19.1*(3.14/180); // Pennation angle in radian
  Epsilonbar = 0.053; // Tendon strain at F0
  Fcfast = 0.4; // Factor for determining shortening speed at optimum length Value from Peroneus Brevis
};

AnyMuscleModel3E TibialisAnterior1Par = {
  F0 = .PCSAfactor*26.6/3; // Maximum force output at optimum fiber length
  Lfbar = (4.6/100); // Optimum fiber length
  Lt0 = (23.5/100); // Tendon slack length
  Gammabar = 9.6*(3.14/180); // Pennation angle in radian
  Epsilonbar = 0.053; // Tendon strain at F0
  K1 = 10; // Factor for determining shortening speed at optimum length
  K2 = 0; // Factor for determining shortening speed at optimum length
  Fcfast = 0.4; // Factor for determining shortening speed at optimum length
  Jt = 3.0; // Shape parameter for the tendon stiffness
  Jpe = 3.0; // Shape parameter for the parallel stiffness
  PEFactor = 5; // Parameter for influence of parallel stiffness
};
AnyMuscleModel3E TibialisAnterior2Par = {
  F0 = .PCSAfactor*26.6/3; // Maximum force output at optimum fiber length
  Lfbar = (4.6/100); // Optimum fiber length
  Lt0 = (23.5/100); // Tendon slack length
  Gammabar = 9.6*(3.14/180); // Pennation angle in radian
  Epsilonbar = 0.053; // Tendon strain at F0
  K1 = 10; // Factor for determining shortening speed at optimum length
  K2 = 0; // Factor for determining shortening speed at optimum length
  Fcfast = 0.4; // Factor for determining shortening speed at optimum length
  Jt = 3.0; // Shape parameter for the tendon stiffness
  Jpe = 3.0; // Shape parameter for the parallel stiffness
  PEFactor = 5; // Parameter for influence of parallel stiffness
};
AnyMuscleModel3E TibialisAnterior3Par = {
  F0 = .PCSAfactor*26.6/3; // Maximum force output at optimum fiber length
  Lfbar = (4.6/100); // Optimum fiber length
  Lt0 = (23.5/100); // Tendon slack length
  Gammabar = 9.6*(3.14/180); // Pennation angle in radian
  Epsilonbar = 0.053; // Tendon strain at F0
  K1 = 10; // Factor for determining shortening speed at optimum length
  K2 = 0; // Factor for determining shortening speed at optimum length
  Fcfast = 0.4; // Factor for determining shortening speed at optimum length
  Jt = 3.0; // Shape parameter for the tendon stiffness
  Jpe = 3.0; // Shape parameter for the parallel stiffness
  PEFactor = 5; // Parameter for influence of parallel stiffness
};


AnyMuscleModel3E ExtensorDigitorumLongus1Par = {
  F0 = .PCSAfactor*5.4/3; // Maximum force output at optimum fiber length
  Lfbar = (6/100); // Optimum fiber length
  Lt0 = (30.1/100); // Tendon slack length
  Gammabar = 8.3*(3.14/180); // Pennation angle in radian
  Epsilonbar = 0.053; // Tendon strain at F0
  K1 = 10; // Factor for determining shortening speed at optimum length
  K2 = 0; // Factor for determining shortening speed at optimum length
  Fcfast = 0.4; // Factor for determining shortening speed at optimum length
  Jt = 3.0; // Shape parameter for the tendon stiffness
  Jpe = 3.0; // Shape parameter for the parallel stiffness
  PEFactor = 5; // Parameter for influence of parallel stiffness
};
AnyMuscleModel3E ExtensorDigitorumLongus2Par = {
  F0 = .PCSAfactor*5.4/3; // Maximum force output at optimum fiber length
  Lfbar = (6/100); // Optimum fiber length
  Lt0 = (30.1/100); // Tendon slack length
  Gammabar = 8.3*(3.14/180); // Pennation angle in radian
  Epsilonbar = 0.053; // Tendon strain at F0
  K1 = 10; // Factor for determining shortening speed at optimum length
  K2 = 0; // Factor for determining shortening speed at optimum length
  Fcfast = 0.4; // Factor for determining shortening speed at optimum length
  Jt = 3.0; // Shape parameter for the tendon stiffness
  Jpe = 3.0; // Shape parameter for the parallel stiffness
  PEFactor = 5; // Parameter for influence of parallel stiffness
};
AnyMuscleModel3E ExtensorDigitorumLongus3Par = {
  F0 = .PCSAfactor*5.4/3; // Maximum force output at optimum fiber length
  Lfbar = (6/100); // Optimum fiber length
  Lt0 = (30.1/100); // Tendon slack length
  Gammabar = 8.3*(3.14/180); // Pennation angle in radian
  Epsilonbar = 0.053; // Tendon strain at F0
  K1 = 10; // Factor for determining shortening speed at optimum length
  K2 = 0; // Factor for determining shortening speed at optimum length
  Fcfast = 0.4; // Factor for determining shortening speed at optimum length
  Jt = 3.0; // Shape parameter for the tendon stiffness
  Jpe = 3.0; // Shape parameter for the parallel stiffness
  PEFactor = 5; // Parameter for influence of parallel stiffness
};

AnyMuscleModel3E ExtensorHallucisLongus1Par = {
  F0 = .PCSAfactor*6.1/3; // Maximum force output at optimum fiber length
  Lfbar = (6/100); // Optimum fiber length
  Lt0 = (17.8/100); // Tendon slack length
  Gammabar = 14.4*(3.14/180); // Pennation angle in radian
  Epsilonbar = 0.053; // Tendon strain at F0
  K1 = 10; // Factor for determining shortening speed at optimum length
  K2 = 0; // Factor for determining shortening speed at optimum length
  Fcfast = 0.4; // Factor for determining shortening speed at optimum length
  Jt = 3.0; // Shape parameter for the tendon stiffness
  Jpe = 3.0; // Shape parameter for the parallel stiffness
  PEFactor =5; // Parameter for influence of parallel stiffness
};
AnyMuscleModel3E ExtensorHallucisLongus2Par = {
  F0 = .PCSAfactor*6.1/3; // Maximum force output at optimum fiber length
  Lfbar = (6/100); // Optimum fiber length
  Lt0 = (17.8/100); // Tendon slack length
  Gammabar = 14.4*(3.14/180); // Pennation angle in radian
  Epsilonbar = 0.053; // Tendon strain at F0
  K1 = 10; // Factor for determining shortening speed at optimum length
  K2 = 0; // Factor for determining shortening speed at optimum length
  Fcfast = 0.4; // Factor for determining shortening speed at optimum length
  Jt = 3.0; // Shape parameter for the tendon stiffness
  Jpe = 3.0; // Shape parameter for the parallel stiffness
  PEFactor =5; // Parameter for influence of parallel stiffness
};
AnyMuscleModel3E ExtensorHallucisLongus3Par = {
  F0 = .PCSAfactor*6.1/3; // Maximum force output at optimum fiber length
  Lfbar = (6/100); // Optimum fiber length
  Lt0 = (17.8/100); // Tendon slack length
  Gammabar = 14.4*(3.14/180); // Pennation angle in radian
  Epsilonbar = 0.053; // Tendon strain at F0
  K1 = 10; // Factor for determining shortening speed at optimum length
  K2 = 0; // Factor for determining shortening speed at optimum length
  Fcfast = 0.4; // Factor for determining shortening speed at optimum length
  Jt = 3.0; // Shape parameter for the tendon stiffness
  Jpe = 3.0; // Shape parameter for the parallel stiffness
  PEFactor =5; // Parameter for influence of parallel stiffness
};

AnyMuscleModel3E VastusLateralisInferior1Par = {
  F0 = .PCSAfactor*10.7/6; // Maximum force output at optimum fiber length
  Lfbar = (4.2/100); // Optimum fiber length
  Lt0 = (9.6/100); // Tendon slack length
  Gammabar = 0*(3.14/180); // Pennation angle in radian
  Epsilonbar = 0.053; // Tendon strain at F0
  K1 = 10; // Factor for determining shortening speed at optimum length
  K2 = 0; // Factor for determining shortening speed at optimum length
  Fcfast = 0.4; // Factor for determining shortening speed at optimum length
  Jt = 3.0; // Shape parameter for the tendon stiffness
  Jpe = 3.0; // Shape parameter for the parallel stiffness
  PEFactor = 5.0; // Parameter for influence of parallel stiffness
};
AnyMuscleModel3E VastusLateralisInferior2Par = {
  F0 = .PCSAfactor*10.7/6; // Maximum force output at optimum fiber length
  Lfbar = (4.2/100); // Optimum fiber length
  Lt0 = (9.6/100); // Tendon slack length
  Gammabar = 0*(3.14/180); // Pennation angle in radian
  Epsilonbar = 0.053; // Tendon strain at F0
  K1 = 10; // Factor for determining shortening speed at optimum length
  K2 = 0; // Factor for determining shortening speed at optimum length
  Fcfast = 0.4; // Factor for determining shortening speed at optimum length
  Jt = 3.0; // Shape parameter for the tendon stiffness
  Jpe = 3.0; // Shape parameter for the parallel stiffness
  PEFactor = 5.0; // Parameter for influence of parallel stiffness
};
AnyMuscleModel3E VastusLateralisInferior3Par = {
  F0 = .PCSAfactor*10.7/6; // Maximum force output at optimum fiber length
  Lfbar = (4.2/100); // Optimum fiber length
  Lt0 = (9.6/100); // Tendon slack length
  Gammabar = 0*(3.14/180); // Pennation angle in radian
  Epsilonbar = 0.053; // Tendon strain at F0
  K1 = 10; // Factor for determining shortening speed at optimum length
  K2 = 0; // Factor for determining shortening speed at optimum length
  Fcfast = 0.4; // Factor for determining shortening speed at optimum length
  Jt = 3.0; // Shape parameter for the tendon stiffness
  Jpe = 3.0; // Shape parameter for the parallel stiffness
  PEFactor = 5.0; // Parameter for influence of parallel stiffness
};
AnyMuscleModel3E VastusLateralisInferior4Par = {
  F0 = .PCSAfactor*10.7/6; // Maximum force output at optimum fiber length
  Lfbar = (4.2/100); // Optimum fiber length
  Lt0 = (9.6/100); // Tendon slack length
  Gammabar = 0*(3.14/180); // Pennation angle in radian
  Epsilonbar = 0.053; // Tendon strain at F0
  K1 = 10; // Factor for determining shortening speed at optimum length
  K2 = 0; // Factor for determining shortening speed at optimum length
  Fcfast = 0.4; // Factor for determining shortening speed at optimum length
  Jt = 3.0; // Shape parameter for the tendon stiffness
  Jpe = 3.0; // Shape parameter for the parallel stiffness
  PEFactor = 5.0; // Parameter for influence of parallel stiffness
};
AnyMuscleModel3E VastusLateralisInferior5Par = {
  F0 = .PCSAfactor*10.7/6; // Maximum force output at optimum fiber length
  Lfbar = (4.2/100); // Optimum fiber length
  Lt0 = (9.6/100); // Tendon slack length
  Gammabar = 0*(3.14/180); // Pennation angle in radian
  Epsilonbar = 0.053; // Tendon strain at F0
  K1 = 10; // Factor for determining shortening speed at optimum length
  K2 = 0; // Factor for determining shortening speed at optimum length
  Fcfast = 0.4; // Factor for determining shortening speed at optimum length
  Jt = 3.0; // Shape parameter for the tendon stiffness
  Jpe = 3.0; // Shape parameter for the parallel stiffness
  PEFactor = 5.0; // Parameter for influence of parallel stiffness
};
AnyMuscleModel3E VastusLateralisInferior6Par = {
  F0 = .PCSAfactor*10.7/6; // Maximum force output at optimum fiber length
  Lfbar = (4.2/100); // Optimum fiber length
  Lt0 = (9.6/100); // Tendon slack length
  Gammabar = 0*(3.14/180); // Pennation angle in radian
  Epsilonbar = 0.053; // Tendon strain at F0
  K1 = 10; // Factor for determining shortening speed at optimum length
  K2 = 0; // Factor for determining shortening speed at optimum length
  Fcfast = 0.4; // Factor for determining shortening speed at optimum length
  Jt = 3.0; // Shape parameter for the tendon stiffness
  Jpe = 3.0; // Shape parameter for the parallel stiffness
  PEFactor = 5.0; // Parameter for influence of parallel stiffness
};

AnyMuscleModel3E VastusLateralisSuperior7Par = {
  F0 = .PCSAfactor*59/2; // Maximum force output at optimum fiber length
  Lfbar = (9.1/100); // Optimum fiber length
  Lt0 = (9.6/100); // Tendon slack length
  Gammabar = 0*(3.14/180); // Pennation angle in radian
  Epsilonbar = 0.053; // Tendon strain at F0
  K1 = 10; // Factor for determining shortening speed at optimum length
  K2 = 0; // Factor for determining shortening speed at optimum length
  Fcfast = 0.4; // Factor for determining shortening speed at optimum length
  Jt = 3.0; // Shape parameter for the tendon stiffness
  Jpe = 3.0; // Shape parameter for the parallel stiffness
  PEFactor = 5.0; // Parameter for influence of parallel stiffness
};
AnyMuscleModel3E VastusLateralisSuperior8Par = {
  F0 = .PCSAfactor*59/2; // Maximum force output at optimum fiber length
  Lfbar = (9.1/100); // Optimum fiber length
  Lt0 = (9.6/100); // Tendon slack length
  Gammabar = 0*(3.14/180); // Pennation angle in radian
  Epsilonbar = 0.053; // Tendon strain at F0
  K1 = 10; // Factor for determining shortening speed at optimum length
  K2 = 0; // Factor for determining shortening speed at optimum length
  Fcfast = 0.4; // Factor for determining shortening speed at optimum length
  Jt = 3.0; // Shape parameter for the tendon stiffness
  Jpe = 3.0; // Shape parameter for the parallel stiffness
  PEFactor = 5.0; // Parameter for influence of parallel stiffness
};
AnyMuscleModel3E VastusMedialisInferior1Par = {
  F0 = .PCSAfactor*9.8/2; // Maximum force output at optimum fiber length
  Lfbar = (7.6/100); // Optimum fiber length
  Lt0 = (9.6/100); // Tendon slack length
  Gammabar = 0*(3.14/180); // Pennation angle in radian
  Epsilonbar = 0.053; // Tendon strain at F0
  K1 = 10; // Factor for determining shortening speed at optimum length
  K2 = 0; // Factor for determining shortening speed at optimum length
  Fcfast = 0.4; // Factor for determining shortening speed at optimum length
  Jt = 3.0; // Shape parameter for the tendon stiffness
  Jpe = 3.0; // Shape parameter for the parallel stiffness
  PEFactor = 5.0; // Parameter for influence of parallel stiffness
};
AnyMuscleModel3E VastusMedialisInferior2Par = {
  F0 = .PCSAfactor*9.8/2; // Maximum force output at optimum fiber length
  Lfbar = (7.6/100); // Optimum fiber length
  Lt0 = (9.6/100); // Tendon slack length
  Gammabar = 0*(3.14/180); // Pennation angle in radian
  Epsilonbar = 0.053; // Tendon strain at F0
  K1 = 10; // Factor for determining shortening speed at optimum length
  K2 = 0; // Factor for determining shortening speed at optimum length
  Fcfast = 0.4; // Factor for determining shortening speed at optimum length
  Jt = 3.0; // Shape parameter for the tendon stiffness
  Jpe = 3.0; // Shape parameter for the parallel stiffness
  PEFactor = 5.0; // Parameter for influence of parallel stiffness
};

AnyMuscleModel3E VastusMedialisMid3Par = {
  F0 = .PCSAfactor*23.2/2; // Maximum force output at optimum fiber length
  Lfbar = (7.6/100); // Optimum fiber length
  Lt0 = (9.6/100); // Tendon slack length
  Gammabar = 0*(3.14/180); // Pennation angle in radian
  Epsilonbar = 0.053; // Tendon strain at F0
  K1 = 10; // Factor for determining shortening speed at optimum length
  K2 = 0; // Factor for determining shortening speed at optimum length
  Fcfast = 0.4; // Factor for determining shortening speed at optimum length
  Jt = 3.0; // Shape parameter for the tendon stiffness
  Jpe = 3.0; // Shape parameter for the parallel stiffness
  PEFactor = 5.0; // Parameter for influence of parallel stiffness
};
AnyMuscleModel3E VastusMedialisMid4Par = {
  F0 = .PCSAfactor*23.2/2; // Maximum force output at optimum fiber length
  Lfbar = (7.6/100); // Optimum fiber length
  Lt0 = (9.6/100); // Tendon slack length
  Gammabar = 0*(3.14/180); // Pennation angle in radian
  Epsilonbar = 0.053; // Tendon strain at F0
  K1 = 10; // Factor for determining shortening speed at optimum length
  K2 = 0; // Factor for determining shortening speed at optimum length
  Fcfast = 0.4; // Factor for determining shortening speed at optimum length
  Jt = 3.0; // Shape parameter for the tendon stiffness
  Jpe = 3.0; // Shape parameter for the parallel stiffness
  PEFactor = 5.0; // Parameter for influence of parallel stiffness
};

AnyMuscleModel3E VastusMedialisSuperior5Par = {
  F0 = .PCSAfactor*26.9/6; // Maximum force output at optimum fiber length
  Lfbar = (8.3/100); // Optimum fiber length
  Lt0 = (9.6/100); // Tendon slack length
  Gammabar = 0*(3.14/180); // Pennation angle in radian
  Epsilonbar = 0.053; // Tendon strain at F0
  K1 = 10; // Factor for determining shortening speed at optimum length
  K2 = 0; // Factor for determining shortening speed at optimum length
  Fcfast = 0.4; // Factor for determining shortening speed at optimum length
  Jt = 3.0; // Shape parameter for the tendon stiffness
  Jpe = 3.0; // Shape parameter for the parallel stiffness
  PEFactor = 5.0; // Parameter for influence of parallel stiffness
};
AnyMuscleModel3E VastusMedialisSuperior6Par = {
  F0 = .PCSAfactor*26.9/6; // Maximum force output at optimum fiber length
  Lfbar = (8.3/100); // Optimum fiber length
  Lt0 = (9.6/100); // Tendon slack length
  Gammabar = 0*(3.14/180); // Pennation angle in radian
  Epsilonbar = 0.053; // Tendon strain at F0
  K1 = 10; // Factor for determining shortening speed at optimum length
  K2 = 0; // Factor for determining shortening speed at optimum length
  Fcfast = 0.4; // Factor for determining shortening speed at optimum length
  Jt = 3.0; // Shape parameter for the tendon stiffness
  Jpe = 3.0; // Shape parameter for the parallel stiffness
  PEFactor = 5.0; // Parameter for influence of parallel stiffness
};
AnyMuscleModel3E VastusMedialisSuperior7Par = {
  F0 = .PCSAfactor*26.9/6; // Maximum force output at optimum fiber length
  Lfbar = (8.3/100); // Optimum fiber length
  Lt0 = (9.6/100); // Tendon slack length
  Gammabar = 0*(3.14/180); // Pennation angle in radian
  Epsilonbar = 0.053; // Tendon strain at F0
  K1 = 10; // Factor for determining shortening speed at optimum length
  K2 = 0; // Factor for determining shortening speed at optimum length
  Fcfast = 0.4; // Factor for determining shortening speed at optimum length
  Jt = 3.0; // Shape parameter for the tendon stiffness
  Jpe = 3.0; // Shape parameter for the parallel stiffness
  PEFactor = 5.0; // Parameter for influence of parallel stiffness
};
AnyMuscleModel3E VastusMedialisSuperior8Par = {
  F0 = .PCSAfactor*26.9/6; // Maximum force output at optimum fiber length
  Lfbar = (8.3/100); // Optimum fiber length
  Lt0 = (9.6/100); // Tendon slack length
  Gammabar = 0*(3.14/180); // Pennation angle in radian
  Epsilonbar = 0.053; // Tendon strain at F0
  K1 = 10; // Factor for determining shortening speed at optimum length
  K2 = 0; // Factor for determining shortening speed at optimum length
  Fcfast = 0.4; // Factor for determining shortening speed at optimum length
  Jt = 3.0; // Shape parameter for the tendon stiffness
  Jpe = 3.0; // Shape parameter for the parallel stiffness
  PEFactor = 5.0; // Parameter for influence of parallel stiffness
};
AnyMuscleModel3E VastusMedialisSuperior9Par = {
  F0 = .PCSAfactor*26.9/6; // Maximum force output at optimum fiber length
  Lfbar = (8.3/100); // Optimum fiber length
  Lt0 = (9.6/100); // Tendon slack length
  Gammabar = 0*(3.14/180); // Pennation angle in radian
  Epsilonbar = 0.053; // Tendon strain at F0
  K1 = 10; // Factor for determining shortening speed at optimum length
  K2 = 0; // Factor for determining shortening speed at optimum length
  Fcfast = 0.4; // Factor for determining shortening speed at optimum length
  Jt = 3.0; // Shape parameter for the tendon stiffness
  Jpe = 3.0; // Shape parameter for the parallel stiffness
  PEFactor = 5.0; // Parameter for influence of parallel stiffness
};
AnyMuscleModel3E VastusMedialisSuperior10Par = {
  F0 = .PCSAfactor*26.9/6; // Maximum force output at optimum fiber length
  Lfbar = (8.3/100); // Optimum fiber length
  Lt0 = (9.6/100); // Tendon slack length
  Gammabar = 0*(3.14/180); // Pennation angle in radian
  Epsilonbar = 0.053; // Tendon strain at F0
  K1 = 10; // Factor for determining shortening speed at optimum length
  K2 = 0; // Factor for determining shortening speed at optimum length
  Fcfast = 0.4; // Factor for determining shortening speed at optimum length
  Jt = 3.0; // Shape parameter for the tendon stiffness
  Jpe = 3.0; // Shape parameter for the parallel stiffness
  PEFactor = 5.0; // Parameter for influence of parallel stiffness
};


AnyMuscleModel3E VastusIntermedius1Par = {
  F0 = .PCSAfactor*38.1/6; // Maximum force output at optimum fiber length
  Lfbar = (7.7/100); // Optimum fiber length
  Lt0 = (12.6/100); // Tendon slack length
  Gammabar = 11.8*(3.14/180); // Pennation angle in radian
  Epsilonbar = 0.053; // Tendon strain at F0
  K1 = 10; // Factor for determining shortening speed at optimum length
  K2 = 0; // Factor for determining shortening speed at optimum length
  Fcfast = 0.4; // Factor for determining shortening speed at optimum length
  Jt = 3.0; // Shape parameter for the tendon stiffness
  Jpe = 3.0; // Shape parameter for the parallel stiffness
  PEFactor = 5.0; // Parameter for influence of parallel stiffness
};
AnyMuscleModel3E VastusIntermedius2Par = {
  F0 = .PCSAfactor*38.1/6; // Maximum force output at optimum fiber length
  Lfbar = (7.7/100); // Optimum fiber length
  Lt0 = (12.6/100); // Tendon slack length
  Gammabar = 11.8*(3.14/180); // Pennation angle in radian
  Epsilonbar = 0.053; // Tendon strain at F0
  K1 = 10; // Factor for determining shortening speed at optimum length
  K2 = 0; // Factor for determining shortening speed at optimum length
  Fcfast = 0.4; // Factor for determining shortening speed at optimum length
  Jt = 3.0; // Shape parameter for the tendon stiffness
  Jpe = 3.0; // Shape parameter for the parallel stiffness
  PEFactor = 5.0; // Parameter for influence of parallel stiffness
};
AnyMuscleModel3E VastusIntermedius3Par = {
  F0 = .PCSAfactor*38.1/6; // Maximum force output at optimum fiber length
  Lfbar = (7.7/100); // Optimum fiber length
  Lt0 = (12.6/100); // Tendon slack length
  Gammabar = 11.8*(3.14/180); // Pennation angle in radian
  Epsilonbar = 0.053; // Tendon strain at F0
  K1 = 10; // Factor for determining shortening speed at optimum length
  K2 = 0; // Factor for determining shortening speed at optimum length
  Fcfast = 0.4; // Factor for determining shortening speed at optimum length
  Jt = 3.0; // Shape parameter for the tendon stiffness
  Jpe = 3.0; // Shape parameter for the parallel stiffness
  PEFactor = 5.0; // Parameter for influence of parallel stiffness
};
AnyMuscleModel3E VastusIntermedius4Par = {
  F0 = .PCSAfactor*38.1/6; // Maximum force output at optimum fiber length
  Lfbar = (7.7/100); // Optimum fiber length
  Lt0 = (12.6/100); // Tendon slack length
  Gammabar = 11.8*(3.14/180); // Pennation angle in radian
  Epsilonbar = 0.053; // Tendon strain at F0
  K1 = 10; // Factor for determining shortening speed at optimum length
  K2 = 0; // Factor for determining shortening speed at optimum length
  Fcfast = 0.4; // Factor for determining shortening speed at optimum length
  Jt = 3.0; // Shape parameter for the tendon stiffness
  Jpe = 3.0; // Shape parameter for the parallel stiffness
  PEFactor = 5.0; // Parameter for influence of parallel stiffness
};
AnyMuscleModel3E VastusIntermedius5Par = {
  F0 = .PCSAfactor*38.1/6; // Maximum force output at optimum fiber length
  Lfbar = (7.7/100); // Optimum fiber length
  Lt0 = (12.6/100); // Tendon slack length
  Gammabar = 11.8*(3.14/180); // Pennation angle in radian
  Epsilonbar = 0.053; // Tendon strain at F0
  K1 = 10; // Factor for determining shortening speed at optimum length
  K2 = 0; // Factor for determining shortening speed at optimum length
  Fcfast = 0.4; // Factor for determining shortening speed at optimum length
  Jt = 3.0; // Shape parameter for the tendon stiffness
  Jpe = 3.0; // Shape parameter for the parallel stiffness
  PEFactor = 5.0; // Parameter for influence of parallel stiffness
};
AnyMuscleModel3E VastusIntermedius6Par = {
  F0 = .PCSAfactor*38.1/6; // Maximum force output at optimum fiber length
  Lfbar = (7.7/100); // Optimum fiber length
  Lt0 = (12.6/100); // Tendon slack length
  Gammabar = 11.8*(3.14/180); // Pennation angle in radian
  Epsilonbar = 0.053; // Tendon strain at F0
  K1 = 10; // Factor for determining shortening speed at optimum length
  K2 = 0; // Factor for determining shortening speed at optimum length
  Fcfast = 0.4; // Factor for determining shortening speed at optimum length
  Jt = 3.0; // Shape parameter for the tendon stiffness
  Jpe = 3.0; // Shape parameter for the parallel stiffness
  PEFactor = 5.0; // Parameter for influence of parallel stiffness
};


AnyMuscleModel3E RectusFemoris1Par = {
  F0 = .PCSAfactor*28.9/2; // Maximum force output at optimum fiber length
  Lfbar = (7.8/100); // Optimum fiber length
  Lt0 = (9.6/100); // Tendon slack length
  Gammabar = 22.0*(3.14/180); // Pennation angle in radian
  Epsilonbar = 0.053; // Tendon strain at F0
  K1 = 10; // Factor for determining shortening speed at optimum length
  K2 = 0; // Factor for determining shortening speed at optimum length
  Fcfast = 0.4; // Factor for determining shortening speed at optimum length
  Jt = 3.0; // Shape parameter for the tendon stiffness
  Jpe = 3.0; // Shape parameter for the parallel stiffness
  PEFactor = 5.0; // Parameter for influence of parallel stiffness
};
AnyMuscleModel3E RectusFemoris2Par = {
  F0 = .PCSAfactor*28.9/2; // Maximum force output at optimum fiber length
  Lfbar = (7.8/100); // Optimum fiber length
  Lt0 = (9.6/100); // Tendon slack length
  Gammabar = 22.0*(3.14/180); // Pennation angle in radian
  Epsilonbar = 0.053; // Tendon strain at F0
  K1 = 10; // Factor for determining shortening speed at optimum length
  K2 = 0; // Factor for determining shortening speed at optimum length
  Fcfast = 0.4; // Factor for determining shortening speed at optimum length
  Jt = 3.0; // Shape parameter for the tendon stiffness
  Jpe = 3.0; // Shape parameter for the parallel stiffness
  PEFactor = 5.0; // Parameter for influence of parallel stiffness
};


AnyMuscleModel3E Semitendinosus1Par = {
  F0 = .PCSAfactor*14.7; // Maximum force output at optimum fiber length
  Lfbar = (14.2/100); // Optimum fiber length
  Lt0 = (23.7/100); // Tendon slack length
  Gammabar = 0*(3.14/180); // Pennation angle in radian
  Epsilonbar = 0.053; // Tendon strain at F0
  K1 = 10; // Factor for determining shortening speed at optimum length
  K2 = 0; // Factor for determining shortening speed at optimum length
  Fcfast = 0.4; // Factor for determining shortening speed at optimum length
  Jt = 3.0; // Shape parameter for the tendon stiffness
  Jpe = 3.0; // Shape parameter for the parallel stiffness
  PEFactor = 5.0; // Parameter for influence of parallel stiffness
};

AnyMuscleModel3E Semimembranosus1Par = {
  F0 = .PCSAfactor*17.1; // Maximum force output at optimum fiber length
  Lfbar = (8.1/100); // Optimum fiber length
  Lt0 = (15.7/100); // Tendon slack length
  Gammabar = 25.0*(3.14/180); // Pennation angle in radian
  Epsilonbar = 0.053; // Tendon strain at F0
  K1 = 10; // Factor for determining shortening speed at optimum length
  K2 = 0; // Factor for determining shortening speed at optimum length
  Fcfast = 0.4; // Factor for determining shortening speed at optimum length
  Jt = 3.0; // Shape parameter for the tendon stiffness
  Jpe = 3.0; // Shape parameter for the parallel stiffness
  PEFactor = 5.0; // Parameter for influence of parallel stiffness
};


AnyMuscleModel3E BicepsFemorisCaputLongum1Par = {
  F0 = .PCSAfactor*27.2; // Maximum force output at optimum fiber length
  Lfbar = (8.5/100); // Optimum fiber length
  Lt0 = (13/100); // Tendon slack length
  Gammabar = 29.9*(3.14/180); // Pennation angle in radian
  Epsilonbar = 0.053; // Tendon strain at F0
  K1 = 10; // Factor for determining shortening speed at optimum length
  K2 = 0; // Factor for determining shortening speed at optimum length
  Fcfast = 0.4; // Factor for determining shortening speed at optimum length
  Jt = 3.0; // Shape parameter for the tendon stiffness
  Jpe = 3.0; // Shape parameter for the parallel stiffness
  PEFactor = 5.0; // Parameter for influence of parallel stiffness
};

AnyMuscleModel3E BicepsFemorisCaputBreve1Par = {
  F0 = .PCSAfactor*11.8/2; // Maximum force output at optimum fiber length
  Lfbar = (9.1/100); // Optimum fiber length
  Lt0 = (3.1/100); // Tendon slack length
  Gammabar = 0*(3.14/180); // Pennation angle in radian
  Epsilonbar = 0.053; // Tendon strain at F0
  K1 = 10; // Factor for determining shortening speed at optimum length
  K2 = 0; // Factor for determining shortening speed at optimum length
  Fcfast = 0.4; // Factor for determining shortening speed at optimum length
  Jt = 3.0; // Shape parameter for the tendon stiffness
  Jpe = 3.0; // Shape parameter for the parallel stiffness
  PEFactor = 5.0; // Parameter for influence of parallel stiffness
};
AnyMuscleModel3E BicepsFemorisCaputBreve2Par = {
  F0 = .PCSAfactor*11.8/2; // Maximum force output at optimum fiber length
  Lfbar = (9.1/100); // Optimum fiber length
  Lt0 = (3.1/100); // Tendon slack length
  Gammabar = 0*(3.14/180); // Pennation angle in radian
  Epsilonbar = 0.053; // Tendon strain at F0
  K1 = 10; // Factor for determining shortening speed at optimum length
  K2 = 0; // Factor for determining shortening speed at optimum length
  Fcfast = 0.4; // Factor for determining shortening speed at optimum length
  Jt = 3.0; // Shape parameter for the tendon stiffness
  Jpe = 3.0; // Shape parameter for the parallel stiffness
  PEFactor = 5.0; // Parameter for influence of parallel stiffness
};

AnyMuscleModel3E SartoriusProximal1Par = {
  F0 = .PCSAfactor*5.9; // Maximum force output at optimum fiber length
  Lfbar = (34.7/100); // Optimum fiber length
  Lt0 = (7.9/100); // Tendon slack length
  Gammabar = 0*(3.14/180); // Pennation angle in radian
  Epsilonbar = 0.053; // Tendon strain at F0
  K1 = 10; // slow twitch Factor for determining shortening speed at optimum length
  K2 = 0; // fast twitch (zero when no info available) determines shortening speed at optimum length
  Fcfast = 0.4; // percentage fast to slow Factor for determining shortening speed at optimum length
  Jt = 3.0; // Shape parameter for the tendon stiffness
  Jpe = 3.0; // Shape parameter for the parallel stiffness
  PEFactor = 5.0; // Parameter for influence of parallel stiffness
};

AnyMuscleModel3E SartoriusDistal1Par = {
  F0 = .PCSAfactor*5.9; // Maximum force output at optimum fiber length
  Lfbar = (34.7/100); // Optimum fiber length
  Lt0 = (7.9/100); // Tendon slack length
  Gammabar = 0*(3.14/180); // Pennation angle in radian
  Epsilonbar = 0.053; // Tendon strain at F0
  K1 = 10; // slow twitch Factor for determining shortening speed at optimum length
  K2 = 0; // fast twitch (zero when no info available) determines shortening speed at optimum length
  Fcfast = 0.4; // percentage fast to slow Factor for determining shortening speed at optimum length
  Jt = 3.0; // Shape parameter for the tendon stiffness
  Jpe = 3.0; // Shape parameter for the parallel stiffness
  PEFactor = 5.0; // Parameter for influence of parallel stiffness
};


AnyMuscleModel3E Gracilis1Par = {
  F0 = .PCSAfactor*4.9/2; // Maximum force output at optimum fiber length
  Lfbar = (18.1/100); // Optimum fiber length
  Lt0 = (14/100); // Tendon slack length
  Gammabar = 0*(3.14/180); // Pennation angle in radian
  Epsilonbar = 0.053; // Tendon strain at F0
  K1 = 10; // slow twitch Factor for determining shortening speed at optimum length
  K2 = 0; // fast twitch (zero when no info available) determines shortening speed at optimum length
  Fcfast = 0.4; // percentage fast to slow Factor for determining shortening speed at optimum length
  Jt = 3.0; // Shape parameter for the tendon stiffness
  Jpe = 3.0; // Shape parameter for the parallel stiffness
  PEFactor = 5.0; // Parameter for influence of parallel stiffness
};
AnyMuscleModel3E Gracilis2Par = {
  F0 = .PCSAfactor*4.9/2; // Maximum force output at optimum fiber length
  Lfbar = (18.1/100); // Optimum fiber length
  Lt0 = (14/100); // Tendon slack length
  Gammabar = 0*(3.14/180); // Pennation angle in radian
  Epsilonbar = 0.053; // Tendon strain at F0
  K1 = 10; // slow twitch Factor for determining shortening speed at optimum length
  K2 = 0; // fast twitch (zero when no info available) determines shortening speed at optimum length
  Fcfast = 0.4; // percentage fast to slow Factor for determining shortening speed at optimum length
  Jt = 3.0; // Shape parameter for the tendon stiffness
  Jpe = 3.0; // Shape parameter for the parallel stiffness
  PEFactor = 5.0; // Parameter for influence of parallel stiffness
};

AnyMuscleModel3E IliacusLateralis1Par = {
  F0 = .PCSAfactor*6.6/3; // Maximum force output at optimum fiber length
  Lfbar = (10.3/100); // Optimum fiber length
  Lt0 = (11.3/100); // Tendon slack length
  Gammabar = 26.5*(3.14/180); // Pennation angle in radian
  Epsilonbar = 0.053; // Tendon strain at F0
  K1 = 10; // Factor for determining shortening speed at optimum length
  K2 = 0; // Factor for determining shortening speed at optimum length
  Fcfast = 0.4; // Factor for determining shortening speed at optimum length
  Jt = 3.0; // Shape parameter for the tendon stiffness
  Jpe = 3.0; // Shape parameter for the parallel stiffness
  PEFactor = 5.0; // Parameter for influence of parallel stiffness
};
AnyMuscleModel3E IliacusLateralis2Par = {
  F0 = .PCSAfactor*6.6/3; // Maximum force output at optimum fiber length
  Lfbar = (10.3/100); // Optimum fiber length
  Lt0 = (11.3/100); // Tendon slack length
  Gammabar = 26.5*(3.14/180); // Pennation angle in radian
  Epsilonbar = 0.053; // Tendon strain at F0
  K1 = 10; // Factor for determining shortening speed at optimum length
  K2 = 0; // Factor for determining shortening speed at optimum length
  Fcfast = 0.4; // Factor for determining shortening speed at optimum length
  Jt = 3.0; // Shape parameter for the tendon stiffness
  Jpe = 3.0; // Shape parameter for the parallel stiffness
  PEFactor = 5.0; // Parameter for influence of parallel stiffness
};
AnyMuscleModel3E IliacusLateralis3Par = {
  F0 = .PCSAfactor*6.6/3; // Maximum force output at optimum fiber length
  Lfbar = (10.3/100); // Optimum fiber length
  Lt0 = (11.3/100); // Tendon slack length
  Gammabar = 26.5*(3.14/180); // Pennation angle in radian
  Epsilonbar = 0.053; // Tendon strain at F0
  K1 = 10; // Factor for determining shortening speed at optimum length
  K2 = 0; // Factor for determining shortening speed at optimum length
  Fcfast = 0.4; // Factor for determining shortening speed at optimum length
  Jt = 3.0; // Shape parameter for the tendon stiffness
  Jpe = 3.0; // Shape parameter for the parallel stiffness
  PEFactor = 5.0; // Parameter for influence of parallel stiffness
};

AnyMuscleModel3E IliacusMid1Par = {
  F0 = .PCSAfactor*13/3; // Maximum force output at optimum fiber length
  Lfbar = (5.2/100); // Optimum fiber length
  Lt0 = (11.3/100); // Tendon slack length
  Gammabar = 0*(3.14/180); // Pennation angle in radian
  Epsilonbar = 0.053; // Tendon strain at F0
  K1 = 10; // Factor for determining shortening speed at optimum length
  K2 = 0; // Factor for determining shortening speed at optimum length
  Fcfast = 0.4; // Factor for determining shortening speed at optimum length
  Jt = 3.0; // Shape parameter for the tendon stiffness
  Jpe = 3.0; // Shape parameter for the parallel stiffness
  PEFactor = 5.0; // Parameter for influence of parallel stiffness
};
AnyMuscleModel3E IliacusMid2Par = {
  F0 = .PCSAfactor*13/3; // Maximum force output at optimum fiber length
  Lfbar = (5.2/100); // Optimum fiber length
  Lt0 = (11.3/100); // Tendon slack length
  Gammabar = 0*(3.14/180); // Pennation angle in radian
  Epsilonbar = 0.053; // Tendon strain at F0
  K1 = 10; // Factor for determining shortening speed at optimum length
  K2 = 0; // Factor for determining shortening speed at optimum length
  Fcfast = 0.4; // Factor for determining shortening speed at optimum length
  Jt = 3.0; // Shape parameter for the tendon stiffness
  Jpe = 3.0; // Shape parameter for the parallel stiffness
  PEFactor = 5.0; // Parameter for influence of parallel stiffness
};
AnyMuscleModel3E IliacusMid3Par = {
  F0 = .PCSAfactor*13/3; // Maximum force output at optimum fiber length
  Lfbar = (5.2/100); // Optimum fiber length
  Lt0 = (11.3/100); // Tendon slack length
  Gammabar = 0*(3.14/180); // Pennation angle in radian
  Epsilonbar = 0.053; // Tendon strain at F0
  K1 = 10; // Factor for determining shortening speed at optimum length
  K2 = 0; // Factor for determining shortening speed at optimum length
  Fcfast = 0.4; // Factor for determining shortening speed at optimum length
  Jt = 3.0; // Shape parameter for the tendon stiffness
  Jpe = 3.0; // Shape parameter for the parallel stiffness
  PEFactor = 5.0; // Parameter for influence of parallel stiffness
};

AnyMuscleModel3E IliacusMedialis1Par = {
  F0 = .PCSAfactor*7.6/3; // Maximum force output at optimum fiber length
  Lfbar = (8.9/100); // Optimum fiber length
  Lt0 = (15.5/100); // Tendon slack length
  Gammabar = 0*(3.14/180); // Pennation angle in radian
  Epsilonbar = 0.053; // Tendon strain at F0
  K1 = 10; // Factor for determining shortening speed at optimum length
  K2 = 0; // Factor for determining shortening speed at optimum length
  Fcfast = 0.4; // Factor for determining shortening speed at optimum length
  Jt = 3.0; // Shape parameter for the tendon stiffness
  Jpe = 3.0; // Shape parameter for the parallel stiffness
  PEFactor = 5.0; // Parameter for influence of parallel stiffness
};
AnyMuscleModel3E IliacusMedialis2Par = {
  F0 = .PCSAfactor*7.6/3; // Maximum force output at optimum fiber length
  Lfbar = (8.9/100); // Optimum fiber length
  Lt0 = (15.5/100); // Tendon slack length
  Gammabar = 0*(3.14/180); // Pennation angle in radian
  Epsilonbar = 0.053; // Tendon strain at F0
  K1 = 10; // Factor for determining shortening speed at optimum length
  K2 = 0; // Factor for determining shortening speed at optimum length
  Fcfast = 0.4; // Factor for determining shortening speed at optimum length
  Jt = 3.0; // Shape parameter for the tendon stiffness
  Jpe = 3.0; // Shape parameter for the parallel stiffness
  PEFactor = 5.0; // Parameter for influence of parallel stiffness
};
AnyMuscleModel3E IliacusMedialis3Par = {
  F0 = .PCSAfactor*7.6/3; // Maximum force output at optimum fiber length
  Lfbar = (8.9/100); // Optimum fiber length
  Lt0 = (15.5/100); // Tendon slack length
  Gammabar = 0*(3.14/180); // Pennation angle in radian
  Epsilonbar = 0.053; // Tendon strain at F0
  K1 = 10; // Factor for determining shortening speed at optimum length
  K2 = 0; // Factor for determining shortening speed at optimum length
  Fcfast = 0.4; // Factor for determining shortening speed at optimum length
  Jt = 3.0; // Shape parameter for the tendon stiffness
  Jpe = 3.0; // Shape parameter for the parallel stiffness
  PEFactor = 5.0; // Parameter for influence of parallel stiffness
};

AnyMuscleModel3E GluteusMinimusAnterior1Par = {
  F0 = .PCSAfactor*10; // Maximum force output at optimum fiber length
  Lfbar = (2.8/100); // Optimum fiber length
  Lt0 = (7.3/100); // Tendon slack length
  Gammabar = 0*(3.14/180); // Pennation angle in radian
  Epsilonbar = 0.053; // Tendon strain at F0
  K1 = 10; // Factor for determining shortening speed at optimum length
  K2 = 0; // Factor for determining shortening speed at optimum length
  Fcfast = 0.4; // Factor for determining shortening speed at optimum length
  Jt = 3.0; // Shape parameter for the tendon stiffness
  Jpe = 3.0; // Shape parameter for the parallel stiffness
  PEFactor = 2.0; // Parameter for influence of parallel stiffness
};

AnyMuscleModel3E GluteusMinimusMid1Par = {
  F0 = .PCSAfactor*8.1; // Maximum force output at optimum fiber length
  Lfbar = (3.4/100); // Optimum fiber length
  Lt0 = (7.3/100); // Tendon slack length
  Gammabar = 0*(3.14/180); // Pennation angle in radian
  Epsilonbar = 0.053; // Tendon strain at F0
  K1 = 10; // Factor for determining shortening speed at optimum length
  K2 = 0; // Factor for determining shortening speed at optimum length
  Fcfast = 0.4; // Factor for determining shortening speed at optimum length
  Jt = 3.0; // Shape parameter for the tendon stiffness
  Jpe = 3.0; // Shape parameter for the parallel stiffness
  PEFactor = 2.0; // Parameter for influence of parallel stiffness
};

AnyMuscleModel3E GluteusMinimusPosterior1Par = {
  F0 = .PCSAfactor*7.4; // Maximum force output at optimum fiber length
  Lfbar = (3.7/100); // Optimum fiber length
  Lt0 = (7.3/100); // Tendon slack length
  Gammabar = 0*(3.14/180); // Pennation angle in radian
  Epsilonbar = 0.053; // Tendon strain at F0
  K1 = 10; // Factor for determining shortening speed at optimum length
  K2 = 0; // Factor for determining shortening speed at optimum length
  Fcfast = 0.4; // Factor for determining shortening speed at optimum length
  Jt = 3.0; // Shape parameter for the tendon stiffness
  Jpe = 3.0; // Shape parameter for the parallel stiffness
  PEFactor = 2.0; // Parameter for influence of parallel stiffness
};

AnyMuscleModel3E GluteusMediusAnterior1Par = {
  F0 = .PCSAfactor*37.9/6; // Maximum force output at optimum fiber length
  Lfbar = (3.8/100); // Optimum fiber length
  Lt0 = (0.001); // Tendon slack length
  Gammabar = 0*(3.14/180); // Pennation angle in radian
  Epsilonbar = 0.053; // Tendon strain at F0
  K1 = 10; // Factor for determining shortening speed at optimum length
  K2 = 0; // Factor for determining shortening speed at optimum length
  Fcfast = 0.4; // Factor for determining shortening speed at optimum length
  Jt = 3.0; // Shape parameter for the tendon stiffness
  Jpe = 3.0; // Shape parameter for the parallel stiffness
  PEFactor = 2.0; // Parameter for influence of parallel stiffness
};
AnyMuscleModel3E GluteusMediusAnterior2Par = {
  F0 = .PCSAfactor*37.9/6; // Maximum force output at optimum fiber length
  Lfbar = (3.8/100); // Optimum fiber length
  Lt0 = (0.001); // Tendon slack length
  Gammabar = 0*(3.14/180); // Pennation angle in radian
  Epsilonbar = 0.053; // Tendon strain at F0
  K1 = 10; // Factor for determining shortening speed at optimum length
  K2 = 0; // Factor for determining shortening speed at optimum length
  Fcfast = 0.4; // Factor for determining shortening speed at optimum length
  Jt = 3.0; // Shape parameter for the tendon stiffness
  Jpe = 3.0; // Shape parameter for the parallel stiffness
  PEFactor = 2.0; // Parameter for influence of parallel stiffness
};
AnyMuscleModel3E GluteusMediusAnterior3Par = {
  F0 = .PCSAfactor*37.9/6; // Maximum force output at optimum fiber length
  Lfbar = (3.8/100); // Optimum fiber length
  Lt0 = (0.001); // Tendon slack length
  Gammabar = 0*(3.14/180); // Pennation angle in radian
  Epsilonbar = 0.053; // Tendon strain at F0
  K1 = 10; // Factor for determining shortening speed at optimum length
  K2 = 0; // Factor for determining shortening speed at optimum length
  Fcfast = 0.4; // Factor for determining shortening speed at optimum length
  Jt = 3.0; // Shape parameter for the tendon stiffness
  Jpe = 3.0; // Shape parameter for the parallel stiffness
  PEFactor = 2.0; // Parameter for influence of parallel stiffness
};
AnyMuscleModel3E GluteusMediusAnterior4Par = {
  F0 = .PCSAfactor*37.9/6; // Maximum force output at optimum fiber length
  Lfbar = (3.8/100); // Optimum fiber length
  Lt0 = (0.001); // Tendon slack length
  Gammabar = 0*(3.14/180); // Pennation angle in radian
  Epsilonbar = 0.053; // Tendon strain at F0
  K1 = 10; // Factor for determining shortening speed at optimum length
  K2 = 0; // Factor for determining shortening speed at optimum length
  Fcfast = 0.4; // Factor for determining shortening speed at optimum length
  Jt = 3.0; // Shape parameter for the tendon stiffness
  Jpe = 3.0; // Shape parameter for the parallel stiffness
  PEFactor = 2.0; // Parameter for influence of parallel stiffness
};
AnyMuscleModel3E GluteusMediusAnterior5Par = {
  F0 = .PCSAfactor*37.9/6; // Maximum force output at optimum fiber length
  Lfbar = (3.8/100); // Optimum fiber length
  Lt0 = (0.001); // Tendon slack length
  Gammabar = 0*(3.14/180); // Pennation angle in radian
  Epsilonbar = 0.053; // Tendon strain at F0
  K1 = 10; // Factor for determining shortening speed at optimum length
  K2 = 0; // Factor for determining shortening speed at optimum length
  Fcfast = 0.4; // Factor for determining shortening speed at optimum length
  Jt = 3.0; // Shape parameter for the tendon stiffness
  Jpe = 3.0; // Shape parameter for the parallel stiffness
  PEFactor = 2.0; // Parameter for influence of parallel stiffness
};
AnyMuscleModel3E GluteusMediusAnterior6Par = {
  F0 = .PCSAfactor*37.9/6; // Maximum force output at optimum fiber length
  Lfbar = (3.8/100); // Optimum fiber length
  Lt0 = (0.001); // Tendon slack length
  Gammabar = 0*(3.14/180); // Pennation angle in radian
  Epsilonbar = 0.053; // Tendon strain at F0
  K1 = 10; // Factor for determining shortening speed at optimum length
  K2 = 0; // Factor for determining shortening speed at optimum length
  Fcfast = 0.4; // Factor for determining shortening speed at optimum length
  Jt = 3.0; // Shape parameter for the tendon stiffness
  Jpe = 3.0; // Shape parameter for the parallel stiffness
  PEFactor = 2.0; // Parameter for influence of parallel stiffness
};

AnyMuscleModel3E GluteusMediusPosterior1Par = {
  F0 = .PCSAfactor*60.8/6; // Maximum force output at optimum fiber length
  Lfbar = (4.5/100); // Optimum fiber length
  Lt0 = (3/100); // Tendon slack length
  Gammabar = 15.9*(3.14/180); // Pennation angle in radian
  Epsilonbar = 0.053; // Tendon strain at F0
  K1 = 10; // Factor for determining shortening speed at optimum length
  K2 = 0; // Factor for determining shortening speed at optimum length
  Fcfast = 0.4; // Factor for determining shortening speed at optimum length
  Jt = 3.0; // Shape parameter for the tendon stiffness
  Jpe = 3.0; // Shape parameter for the parallel stiffness
  PEFactor = 2.0; // Parameter for influence of parallel stiffness
};
AnyMuscleModel3E GluteusMediusPosterior2Par = {
  F0 = .PCSAfactor*60.8/6; // Maximum force output at optimum fiber length
  Lfbar = (4.5/100); // Optimum fiber length
  Lt0 = (3/100); // Tendon slack length
  Gammabar = 15.9*(3.14/180); // Pennation angle in radian
  Epsilonbar = 0.053; // Tendon strain at F0
  K1 = 10; // Factor for determining shortening speed at optimum length
  K2 = 0; // Factor for determining shortening speed at optimum length
  Fcfast = 0.4; // Factor for determining shortening speed at optimum length
  Jt = 3.0; // Shape parameter for the tendon stiffness
  Jpe = 3.0; // Shape parameter for the parallel stiffness
  PEFactor = 2.0; // Parameter for influence of parallel stiffness
};
AnyMuscleModel3E GluteusMediusPosterior3Par = {
  F0 = .PCSAfactor*60.8/6; // Maximum force output at optimum fiber length
  Lfbar = (4.5/100); // Optimum fiber length
  Lt0 = (3/100); // Tendon slack length
  Gammabar = 15.9*(3.14/180); // Pennation angle in radian
  Epsilonbar = 0.053; // Tendon strain at F0
  K1 = 10; // Factor for determining shortening speed at optimum length
  K2 = 0; // Factor for determining shortening speed at optimum length
  Fcfast = 0.4; // Factor for determining shortening speed at optimum length
  Jt = 3.0; // Shape parameter for the tendon stiffness
  Jpe = 3.0; // Shape parameter for the parallel stiffness
  PEFactor = 2.0; // Parameter for influence of parallel stiffness
};
AnyMuscleModel3E GluteusMediusPosterior4Par = {
  F0 = .PCSAfactor*60.8/6; // Maximum force output at optimum fiber length
  Lfbar = (4.5/100); // Optimum fiber length
  Lt0 = (3/100); // Tendon slack length
  Gammabar = 15.9*(3.14/180); // Pennation angle in radian
  Epsilonbar = 0.053; // Tendon strain at F0
  K1 = 10; // Factor for determining shortening speed at optimum length
  K2 = 0; // Factor for determining shortening speed at optimum length
  Fcfast = 0.4; // Factor for determining shortening speed at optimum length
  Jt = 3.0; // Shape parameter for the tendon stiffness
  Jpe = 3.0; // Shape parameter for the parallel stiffness
  PEFactor = 2.0; // Parameter for influence of parallel stiffness
};
AnyMuscleModel3E GluteusMediusPosterior5Par = {
  F0 = .PCSAfactor*60.8/6; // Maximum force output at optimum fiber length
  Lfbar = (4.5/100); // Optimum fiber length
  Lt0 = (3/100); // Tendon slack length
  Gammabar = 15.9*(3.14/180); // Pennation angle in radian
  Epsilonbar = 0.053; // Tendon strain at F0
  K1 = 10; // Factor for determining shortening speed at optimum length
  K2 = 0; // Factor for determining shortening speed at optimum length
  Fcfast = 0.4; // Factor for determining shortening speed at optimum length
  Jt = 3.0; // Shape parameter for the tendon stiffness
  Jpe = 3.0; // Shape parameter for the parallel stiffness
  PEFactor = 2.0; // Parameter for influence of parallel stiffness
};
AnyMuscleModel3E GluteusMediusPosterior6Par = {
  F0 = .PCSAfactor*60.8/6; // Maximum force output at optimum fiber length
  Lfbar = (4.5/100); // Optimum fiber length
  Lt0 = (3/100); // Tendon slack length
  Gammabar = 15.9*(3.14/180); // Pennation angle in radian
  Epsilonbar = 0.053; // Tendon strain at F0
  K1 = 10; // Factor for determining shortening speed at optimum length
  K2 = 0; // Factor for determining shortening speed at optimum length
  Fcfast = 0.4; // Factor for determining shortening speed at optimum length
  Jt = 3.0; // Shape parameter for the tendon stiffness
  Jpe = 3.0; // Shape parameter for the parallel stiffness
  PEFactor = 2.0; // Parameter for influence of parallel stiffness
};

AnyMuscleModel3E GluteusMaximusInferior1Par = {
  F0 = .PCSAfactor*22.5/6; // Maximum force output at optimum fiber length
  Lfbar = (15.1/100); // Optimum fiber length
  Lt0 = (0.001); // Tendon slack length
  Gammabar = 0*(3.14/180); // Pennation angle in radian
  Epsilonbar = 0.053; // Tendon strain at F0
  K1 = 10; // Factor for determining shortening speed at optimum length
  K2 = 0; // Factor for determining shortening speed at optimum length
  Fcfast = 0.4; // Factor for determining shortening speed at optimum length
  Jt = 3.0; // Shape parameter for the tendon stiffness
  Jpe = 3.0; // Shape parameter for the parallel stiffness
  PEFactor = 5.0; // Parameter for influence of parallel stiffness
};
AnyMuscleModel3E GluteusMaximusInferior2Par = {
  F0 = .PCSAfactor*22.5/6; // Maximum force output at optimum fiber length
  Lfbar = (15.1/100); // Optimum fiber length
  Lt0 = (0.001); // Tendon slack length
  Gammabar = 0*(3.14/180); // Pennation angle in radian
  Epsilonbar = 0.053; // Tendon strain at F0
  K1 = 10; // Factor for determining shortening speed at optimum length
  K2 = 0; // Factor for determining shortening speed at optimum length
  Fcfast = 0.4; // Factor for determining shortening speed at optimum length
  Jt = 3.0; // Shape parameter for the tendon stiffness
  Jpe = 3.0; // Shape parameter for the parallel stiffness
  PEFactor = 5.0; // Parameter for influence of parallel stiffness
};
AnyMuscleModel3E GluteusMaximusInferior3Par = {
  F0 = .PCSAfactor*22.5/6; // Maximum force output at optimum fiber length
  Lfbar = (15.1/100); // Optimum fiber length
  Lt0 = (0.001); // Tendon slack length
  Gammabar = 0*(3.14/180); // Pennation angle in radian
  Epsilonbar = 0.053; // Tendon strain at F0
  K1 = 10; // Factor for determining shortening speed at optimum length
  K2 = 0; // Factor for determining shortening speed at optimum length
  Fcfast = 0.4; // Factor for determining shortening speed at optimum length
  Jt = 3.0; // Shape parameter for the tendon stiffness
  Jpe = 3.0; // Shape parameter for the parallel stiffness
  PEFactor = 5.0; // Parameter for influence of parallel stiffness
};
AnyMuscleModel3E GluteusMaximusInferior4Par = {
  F0 = .PCSAfactor*22.5/6; // Maximum force output at optimum fiber length
  Lfbar = (15.1/100); // Optimum fiber length
  Lt0 = (0.001); // Tendon slack length
  Gammabar = 0*(3.14/180); // Pennation angle in radian
  Epsilonbar = 0.053; // Tendon strain at F0
  K1 = 10; // Factor for determining shortening speed at optimum length
  K2 = 0; // Factor for determining shortening speed at optimum length
  Fcfast = 0.4; // Factor for determining shortening speed at optimum length
  Jt = 3.0; // Shape parameter for the tendon stiffness
  Jpe = 3.0; // Shape parameter for the parallel stiffness
  PEFactor = 5.0; // Parameter for influence of parallel stiffness
};
AnyMuscleModel3E GluteusMaximusInferior5Par = {
  F0 = .PCSAfactor*22.5/6; // Maximum force output at optimum fiber length
  Lfbar = (15.1/100); // Optimum fiber length
  Lt0 = (0.001); // Tendon slack length
  Gammabar = 0*(3.14/180); // Pennation angle in radian
  Epsilonbar = 0.053; // Tendon strain at F0
  K1 = 10; // Factor for determining shortening speed at optimum length
  K2 = 0; // Factor for determining shortening speed at optimum length
  Fcfast = 0.4; // Factor for determining shortening speed at optimum length
  Jt = 3.0; // Shape parameter for the tendon stiffness
  Jpe = 3.0; // Shape parameter for the parallel stiffness
  PEFactor = 5.0; // Parameter for influence of parallel stiffness
};
AnyMuscleModel3E GluteusMaximusInferior6Par = {
  F0 = .PCSAfactor*22.5/6; // Maximum force output at optimum fiber length
  Lfbar = (15.1/100); // Optimum fiber length
  Lt0 = (0.001); // Tendon slack length
  Gammabar = 0*(3.14/180); // Pennation angle in radian
  Epsilonbar = 0.053; // Tendon strain at F0
  K1 = 10; // Factor for determining shortening speed at optimum length
  K2 = 0; // Factor for determining shortening speed at optimum length
  Fcfast = 0.4; // Factor for determining shortening speed at optimum length
  Jt = 3.0; // Shape parameter for the tendon stiffness
  Jpe = 3.0; // Shape parameter for the parallel stiffness
  PEFactor = 5.0; // Parameter for influence of parallel stiffness
};

AnyMuscleModel3E GluteusMaximusSuperior1Par = {
  F0 = .PCSAfactor*49.7/6; // Maximum force output at optimum fiber length
  Lfbar = (12/100); // Optimum fiber length
  Lt0 = (0.001); // Tendon slack length
  Gammabar = 0*(3.14/180); // Pennation angle in radian
  Epsilonbar = 0.053; // Tendon strain at F0
  K1 = 10; // Factor for determining shortening speed at optimum length
  K2 = 0; // Factor for determining shortening speed at optimum length
  Fcfast = 0.4; // Factor for determining shortening speed at optimum length
  Jt = 3.0; // Shape parameter for the tendon stiffness
  Jpe = 3.0; // Shape parameter for the parallel stiffness
  PEFactor = 5.0; // Parameter for influence of parallel stiffness
};
AnyMuscleModel3E GluteusMaximusSuperior2Par = {
  F0 = .PCSAfactor*49.7/6; // Maximum force output at optimum fiber length
  Lfbar = (12/100); // Optimum fiber length
  Lt0 = (0.001); // Tendon slack length
  Gammabar = 0*(3.14/180); // Pennation angle in radian
  Epsilonbar = 0.053; // Tendon strain at F0
  K1 = 10; // Factor for determining shortening speed at optimum length
  K2 = 0; // Factor for determining shortening speed at optimum length
  Fcfast = 0.4; // Factor for determining shortening speed at optimum length
  Jt = 3.0; // Shape parameter for the tendon stiffness
  Jpe = 3.0; // Shape parameter for the parallel stiffness
  PEFactor = 5.0; // Parameter for influence of parallel stiffness
};
AnyMuscleModel3E GluteusMaximusSuperior3Par = {
  F0 = .PCSAfactor*49.7/6; // Maximum force output at optimum fiber length
  Lfbar = (12/100); // Optimum fiber length
  Lt0 = (0.001); // Tendon slack length
  Gammabar = 0*(3.14/180); // Pennation angle in radian
  Epsilonbar = 0.053; // Tendon strain at F0
  K1 = 10; // Factor for determining shortening speed at optimum length
  K2 = 0; // Factor for determining shortening speed at optimum length
  Fcfast = 0.4; // Factor for determining shortening speed at optimum length
  Jt = 3.0; // Shape parameter for the tendon stiffness
  Jpe = 3.0; // Shape parameter for the parallel stiffness
  PEFactor = 5.0; // Parameter for influence of parallel stiffness
};
AnyMuscleModel3E GluteusMaximusSuperior4Par = {
  F0 = .PCSAfactor*49.7/6; // Maximum force output at optimum fiber length
  Lfbar = (12/100); // Optimum fiber length
  Lt0 = (0.001); // Tendon slack length
  Gammabar = 0*(3.14/180); // Pennation angle in radian
  Epsilonbar = 0.053; // Tendon strain at F0
  K1 = 10; // Factor for determining shortening speed at optimum length
  K2 = 0; // Factor for determining shortening speed at optimum length
  Fcfast = 0.4; // Factor for determining shortening speed at optimum length
  Jt = 3.0; // Shape parameter for the tendon stiffness
  Jpe = 3.0; // Shape parameter for the parallel stiffness
  PEFactor = 5.0; // Parameter for influence of parallel stiffness
};
AnyMuscleModel3E GluteusMaximusSuperior5Par = {
  F0 = .PCSAfactor*49.7/6; // Maximum force output at optimum fiber length
  Lfbar = (12/100); // Optimum fiber length
  Lt0 = (0.001); // Tendon slack length
  Gammabar = 0*(3.14/180); // Pennation angle in radian
  Epsilonbar = 0.053; // Tendon strain at F0
  K1 = 10; // Factor for determining shortening speed at optimum length
  K2 = 0; // Factor for determining shortening speed at optimum length
  Fcfast = 0.4; // Factor for determining shortening speed at optimum length
  Jt = 3.0; // Shape parameter for the tendon stiffness
  Jpe = 3.0; // Shape parameter for the parallel stiffness
  PEFactor = 5.0; // Parameter for influence of parallel stiffness
};
AnyMuscleModel3E GluteusMaximusSuperior6Par = {
  F0 = .PCSAfactor*49.7/6; // Maximum force output at optimum fiber length
  Lfbar = (12/100); // Optimum fiber length
  Lt0 = (0.001); // Tendon slack length
  Gammabar = 0*(3.14/180); // Pennation angle in radian
  Epsilonbar = 0.053; // Tendon strain at F0
  K1 = 10; // Factor for determining shortening speed at optimum length
  K2 = 0; // Factor for determining shortening speed at optimum length
  Fcfast = 0.4; // Factor for determining shortening speed at optimum length
  Jt = 3.0; // Shape parameter for the tendon stiffness
  Jpe = 3.0; // Shape parameter for the parallel stiffness
  PEFactor = 5.0; // Parameter for influence of parallel stiffness
};

AnyMuscleModel3E TensorFasciaeLatae1Par = {
  F0 = .PCSAfactor*8.8/2; // Maximum force output at optimum fiber length
  Lfbar = (9.5/100); // Optimum fiber length
  Lt0 = (88/100); // Tendon slack length
  Gammabar = 0*(3.14/180); // Pennation angle in radian
  Epsilonbar = 0.053; // Tendon strain at F0
  K1 = 10; // Factor for determining shortening speed at optimum length
  K2 = 0; // Factor for determining shortening speed at optimum length
  Fcfast = 0.4; // Factor for determining shortening speed at optimum length
  Jt = 3.0; // Shape parameter for the tendon stiffness
  Jpe = 3.0; // Shape parameter for the parallel stiffness
  PEFactor = 5.0; // Parameter for influence of parallel stiffness
};
AnyMuscleModel3E TensorFasciaeLatae2Par = {
  F0 = .PCSAfactor*8.8/2; // Maximum force output at optimum fiber length
  Lfbar = (9.5/100); // Optimum fiber length
  Lt0 = (88/100); // Tendon slack length
  Gammabar = 0*(3.14/180); // Pennation angle in radian
  Epsilonbar = 0.053; // Tendon strain at F0
  K1 = 10; // Factor for determining shortening speed at optimum length
  K2 = 0; // Factor for determining shortening speed at optimum length
  Fcfast = 0.4; // Factor for determining shortening speed at optimum length
  Jt = 3.0; // Shape parameter for the tendon stiffness
  Jpe = 3.0; // Shape parameter for the parallel stiffness
  PEFactor = 5.0; // Parameter for influence of parallel stiffness
};

AnyMuscleModel3E Piriformis1Par = {
  F0 = .PCSAfactor*8.1; // Maximum force output at optimum fiber length
  Lfbar = (3.9/100); // Optimum fiber length
  Lt0 = (1.6/100); // Tendon slack length
  Gammabar = 0*(3.14/180); // Pennation angle in radian
  Epsilonbar = 0.053; // Tendon strain at F0
  K1 = 10; // Factor for determining shortening speed at optimum length
  K2 = 0; // Factor for determining shortening speed at optimum length
  Fcfast = 0.4; // Factor for determining shortening speed at optimum length
  Jt = 3.0; // Shape parameter for the tendon stiffness
  Jpe = 3.0; // Shape parameter for the parallel stiffness
  PEFactor = 5.0; // Parameter for influence of parallel stiffness
};


AnyMuscleModel3E AdductorLongus1Par = {
  F0 = .PCSAfactor*15.1/6; // Maximum force output at optimum fiber length
  Lfbar = (10.6/100); // Optimum fiber length
  Lt0 = (0.001); // Tendon slack length
  Gammabar = 0*(3.14/180); // Pennation angle in radian
  Epsilonbar = 0.053; // Tendon strain at F0
  K1 = 10; // Factor for determining shortening speed at optimum length
  K2 = 0; // Factor for determining shortening speed at optimum length
  Fcfast = 0.4; // Factor for determining shortening speed at optimum length
  Jt = 3.0; // Shape parameter for the tendon stiffness
  Jpe = 3.0; // Shape parameter for the parallel stiffness
  PEFactor = 5.0; // Parameter for influence of parallel stiffness
};
AnyMuscleModel3E AdductorLongus2Par = {
  F0 = .PCSAfactor*15.1/6; // Maximum force output at optimum fiber length
  Lfbar = (10.6/100); // Optimum fiber length
  Lt0 = (0.001); // Tendon slack length
  Gammabar = 0*(3.14/180); // Pennation angle in radian
  Epsilonbar = 0.053; // Tendon strain at F0
  K1 = 10; // Factor for determining shortening speed at optimum length
  K2 = 0; // Factor for determining shortening speed at optimum length
  Fcfast = 0.4; // Factor for determining shortening speed at optimum length
  Jt = 3.0; // Shape parameter for the tendon stiffness
  Jpe = 3.0; // Shape parameter for the parallel stiffness
  PEFactor = 5.0; // Parameter for influence of parallel stiffness
};
AnyMuscleModel3E AdductorLongus3Par = {
  F0 = .PCSAfactor*15.1/6; // Maximum force output at optimum fiber length
  Lfbar = (10.6/100); // Optimum fiber length
  Lt0 = (0.001); // Tendon slack length
  Gammabar = 0*(3.14/180); // Pennation angle in radian
  Epsilonbar = 0.053; // Tendon strain at F0
  K1 = 10; // Factor for determining shortening speed at optimum length
  K2 = 0; // Factor for determining shortening speed at optimum length
  Fcfast = 0.4; // Factor for determining shortening speed at optimum length
  Jt = 3.0; // Shape parameter for the tendon stiffness
  Jpe = 3.0; // Shape parameter for the parallel stiffness
  PEFactor = 5.0; // Parameter for influence of parallel stiffness
};
AnyMuscleModel3E AdductorLongus4Par = {
  F0 = .PCSAfactor*15.1/6; // Maximum force output at optimum fiber length
  Lfbar = (10.6/100); // Optimum fiber length
  Lt0 = (0.001); // Tendon slack length
  Gammabar = 0*(3.14/180); // Pennation angle in radian
  Epsilonbar = 0.053; // Tendon strain at F0
  K1 = 10; // Factor for determining shortening speed at optimum length
  K2 = 0; // Factor for determining shortening speed at optimum length
  Fcfast = 0.4; // Factor for determining shortening speed at optimum length
  Jt = 3.0; // Shape parameter for the tendon stiffness
  Jpe = 3.0; // Shape parameter for the parallel stiffness
  PEFactor = 5.0; // Parameter for influence of parallel stiffness
};
AnyMuscleModel3E AdductorLongus5Par = {
  F0 = .PCSAfactor*15.1/6; // Maximum force output at optimum fiber length
  Lfbar = (10.6/100); // Optimum fiber length
  Lt0 = (0.001); // Tendon slack length
  Gammabar = 0*(3.14/180); // Pennation angle in radian
  Epsilonbar = 0.053; // Tendon strain at F0
  K1 = 10; // Factor for determining shortening speed at optimum length
  K2 = 0; // Factor for determining shortening speed at optimum length
  Fcfast = 0.4; // Factor for determining shortening speed at optimum length
  Jt = 3.0; // Shape parameter for the tendon stiffness
  Jpe = 3.0; // Shape parameter for the parallel stiffness
  PEFactor = 5.0; // Parameter for influence of parallel stiffness
};
AnyMuscleModel3E AdductorLongus6Par = {
  F0 = .PCSAfactor*15.1/6; // Maximum force output at optimum fiber length
  Lfbar = (10.6/100); // Optimum fiber length
  Lt0 = (0.001); // Tendon slack length
  Gammabar = 0*(3.14/180); // Pennation angle in radian
  Epsilonbar = 0.053; // Tendon strain at F0
  K1 = 10; // Factor for determining shortening speed at optimum length
  K2 = 0; // Factor for determining shortening speed at optimum length
  Fcfast = 0.4; // Factor for determining shortening speed at optimum length
  Jt = 3.0; // Shape parameter for the tendon stiffness
  Jpe = 3.0; // Shape parameter for the parallel stiffness
  PEFactor = 5.0; // Parameter for influence of parallel stiffness
};

AnyMuscleModel3E AdductorMagnusDistal1Par = {
  F0 = .PCSAfactor*26.5/3; // Maximum force output at optimum fiber length
  Lfbar = (10.8/100); // Optimum fiber length
  Lt0 = (4.2/100); // Tendon slack length
  Gammabar = 0*(3.14/180); // Pennation angle in radian
  Epsilonbar = 0.053; // Tendon strain at F0
  K1 = 10; // Factor for determining shortening speed at optimum length
  K2 = 0; // Factor for determining shortening speed at optimum length
  Fcfast = 0.4; // Factor for determining shortening speed at optimum length
  Jt = 3.0; // Shape parameter for the tendon stiffness
  Jpe = 3.0; // Shape parameter for the parallel stiffness
  PEFactor = 5.0; // Parameter for influence of parallel stiffness
};
AnyMuscleModel3E AdductorMagnusDistal2Par = {
  F0 = .PCSAfactor*26.5/3; // Maximum force output at optimum fiber length
  Lfbar = (10.8/100); // Optimum fiber length
  Lt0 = (4.2/100); // Tendon slack length
  Gammabar = 0*(3.14/180); // Pennation angle in radian
  Epsilonbar = 0.053; // Tendon strain at F0
  K1 = 10; // Factor for determining shortening speed at optimum length
  K2 = 0; // Factor for determining shortening speed at optimum length
  Fcfast = 0.4; // Factor for determining shortening speed at optimum length
  Jt = 3.0; // Shape parameter for the tendon stiffness
  Jpe = 3.0; // Shape parameter for the parallel stiffness
  PEFactor = 5.0; // Parameter for influence of parallel stiffness
};
AnyMuscleModel3E AdductorMagnusDistal3Par = {
  F0 = .PCSAfactor*26.5/3; // Maximum force output at optimum fiber length
  Lfbar = (10.8/100); // Optimum fiber length
  Lt0 = (4.2/100); // Tendon slack length
  Gammabar = 0*(3.14/180); // Pennation angle in radian
  Epsilonbar = 0.053; // Tendon strain at F0
  K1 = 10; // Factor for determining shortening speed at optimum length
  K2 = 0; // Factor for determining shortening speed at optimum length
  Fcfast = 0.4; // Factor for determining shortening speed at optimum length
  Jt = 3.0; // Shape parameter for the tendon stiffness
  Jpe = 3.0; // Shape parameter for the parallel stiffness
  PEFactor = 5.0; // Parameter for influence of parallel stiffness
};

AnyMuscleModel3E AdductorMagnusMid1Par = {
  F0 = .PCSAfactor*22.1/6; // Maximum force output at optimum fiber length
  Lfbar = (10.4/100); // Optimum fiber length
  Lt0 = (0.001); // Tendon slack length
  Gammabar = 0*(3.14/180); // Pennation angle in radian
  Epsilonbar = 0.053; // Tendon strain at F0
  K1 = 10; // Factor for determining shortening speed at optimum length
  K2 = 0; // Factor for determining shortening speed at optimum length
  Fcfast = 0.4; // Factor for determining shortening speed at optimum length
  Jt = 3.0; // Shape parameter for the tendon stiffness
  Jpe = 3.0; // Shape parameter for the parallel stiffness
  PEFactor = 5.0; // Parameter for influence of parallel stiffness
};
AnyMuscleModel3E AdductorMagnusMid2Par = {
  F0 = .PCSAfactor*22.1/6; // Maximum force output at optimum fiber length
  Lfbar = (10.4/100); // Optimum fiber length
  Lt0 = (0.001); // Tendon slack length
  Gammabar = 0*(3.14/180); // Pennation angle in radian
  Epsilonbar = 0.053; // Tendon strain at F0
  K1 = 10; // Factor for determining shortening speed at optimum length
  K2 = 0; // Factor for determining shortening speed at optimum length
  Fcfast = 0.4; // Factor for determining shortening speed at optimum length
  Jt = 3.0; // Shape parameter for the tendon stiffness
  Jpe = 3.0; // Shape parameter for the parallel stiffness
  PEFactor = 5.0; // Parameter for influence of parallel stiffness
};
AnyMuscleModel3E AdductorMagnusMid3Par = {
  F0 = .PCSAfactor*22.1/6; // Maximum force output at optimum fiber length
  Lfbar = (10.4/100); // Optimum fiber length
  Lt0 = (0.001); // Tendon slack length
  Gammabar = 0*(3.14/180); // Pennation angle in radian
  Epsilonbar = 0.053; // Tendon strain at F0
  K1 = 10; // Factor for determining shortening speed at optimum length
  K2 = 0; // Factor for determining shortening speed at optimum length
  Fcfast = 0.4; // Factor for determining shortening speed at optimum length
  Jt = 3.0; // Shape parameter for the tendon stiffness
  Jpe = 3.0; // Shape parameter for the parallel stiffness
  PEFactor = 5.0; // Parameter for influence of parallel stiffness
};
AnyMuscleModel3E AdductorMagnusMid4Par = {
  F0 = .PCSAfactor*22.1/6; // Maximum force output at optimum fiber length
  Lfbar = (10.4/100); // Optimum fiber length
  Lt0 = (0.001); // Tendon slack length
  Gammabar = 0*(3.14/180); // Pennation angle in radian
  Epsilonbar = 0.053; // Tendon strain at F0
  K1 = 10; // Factor for determining shortening speed at optimum length
  K2 = 0; // Factor for determining shortening speed at optimum length
  Fcfast = 0.4; // Factor for determining shortening speed at optimum length
  Jt = 3.0; // Shape parameter for the tendon stiffness
  Jpe = 3.0; // Shape parameter for the parallel stiffness
  PEFactor = 5.0; // Parameter for influence of parallel stiffness
};
AnyMuscleModel3E AdductorMagnusMid5Par = {
  F0 = .PCSAfactor*22.1/6; // Maximum force output at optimum fiber length
  Lfbar = (10.4/100); // Optimum fiber length
  Lt0 = (0.001); // Tendon slack length
  Gammabar = 0*(3.14/180); // Pennation angle in radian
  Epsilonbar = 0.053; // Tendon strain at F0
  K1 = 10; // Factor for determining shortening speed at optimum length
  K2 = 0; // Factor for determining shortening speed at optimum length
  Fcfast = 0.4; // Factor for determining shortening speed at optimum length
  Jt = 3.0; // Shape parameter for the tendon stiffness
  Jpe = 3.0; // Shape parameter for the parallel stiffness
  PEFactor = 5.0; // Parameter for influence of parallel stiffness
};
AnyMuscleModel3E AdductorMagnusMid6Par = {
  F0 = .PCSAfactor*22.1/6; // Maximum force output at optimum fiber length
  Lfbar = (10.4/100); // Optimum fiber length
  Lt0 = (0.001); // Tendon slack length
  Gammabar = 0*(3.14/180); // Pennation angle in radian
  Epsilonbar = 0.053; // Tendon strain at F0
  K1 = 10; // Factor for determining shortening speed at optimum length
  K2 = 0; // Factor for determining shortening speed at optimum length
  Fcfast = 0.4; // Factor for determining shortening speed at optimum length
  Jt = 3.0; // Shape parameter for the tendon stiffness
  Jpe = 3.0; // Shape parameter for the parallel stiffness
  PEFactor = 5.0; // Parameter for influence of parallel stiffness
};

AnyMuscleModel3E AdductorMagnusProximal1Par = {
  F0 = .PCSAfactor*5/4; // Maximum force output at optimum fiber length
  Lfbar = (10.7/100); // Optimum fiber length
  Lt0 = (0.001); // Tendon slack length
  Gammabar = 0*(3.14/180); // Pennation angle in radian
  Epsilonbar = 0.053; // Tendon strain at F0
  K1 = 10; // Factor for determining shortening speed at optimum length
  K2 = 0; // Factor for determining shortening speed at optimum length
  Fcfast = 0.4; // Factor for determining shortening speed at optimum length
  Jt = 3.0; // Shape parameter for the tendon stiffness
  Jpe = 3.0; // Shape parameter for the parallel stiffness
  PEFactor = 5.0; // Parameter for influence of parallel stiffness
};
AnyMuscleModel3E AdductorMagnusProximal2Par = {
  F0 = .PCSAfactor*5/4; // Maximum force output at optimum fiber length
  Lfbar = (10.7/100); // Optimum fiber length
  Lt0 = (0.001); // Tendon slack length
  Gammabar = 0*(3.14/180); // Pennation angle in radian
  Epsilonbar = 0.053; // Tendon strain at F0
  K1 = 10; // Factor for determining shortening speed at optimum length
  K2 = 0; // Factor for determining shortening speed at optimum length
  Fcfast = 0.4; // Factor for determining shortening speed at optimum length
  Jt = 3.0; // Shape parameter for the tendon stiffness
  Jpe = 3.0; // Shape parameter for the parallel stiffness
  PEFactor = 5.0; // Parameter for influence of parallel stiffness
};
AnyMuscleModel3E AdductorMagnusProximal3Par = {
  F0 = .PCSAfactor*5/4; // Maximum force output at optimum fiber length
  Lfbar = (10.7/100); // Optimum fiber length
  Lt0 = (0.001); // Tendon slack length
  Gammabar = 0*(3.14/180); // Pennation angle in radian
  Epsilonbar = 0.053; // Tendon strain at F0
  K1 = 10; // Factor for determining shortening speed at optimum length
  K2 = 0; // Factor for determining shortening speed at optimum length
  Fcfast = 0.4; // Factor for determining shortening speed at optimum length
  Jt = 3.0; // Shape parameter for the tendon stiffness
  Jpe = 3.0; // Shape parameter for the parallel stiffness
  PEFactor = 5.0; // Parameter for influence of parallel stiffness
};
AnyMuscleModel3E AdductorMagnusProximal4Par = {
  F0 = .PCSAfactor*5/4; // Maximum force output at optimum fiber length
  Lfbar = (10.7/100); // Optimum fiber length
  Lt0 = (0.001); // Tendon slack length
  Gammabar = 0*(3.14/180); // Pennation angle in radian
  Epsilonbar = 0.053; // Tendon strain at F0
  K1 = 10; // Factor for determining shortening speed at optimum length
  K2 = 0; // Factor for determining shortening speed at optimum length
  Fcfast = 0.4; // Factor for determining shortening speed at optimum length
  Jt = 3.0; // Shape parameter for the tendon stiffness
  Jpe = 3.0; // Shape parameter for the parallel stiffness
  PEFactor = 5.0; // Parameter for influence of parallel stiffness
};


//Description of muscles that are new in the model:


AnyMuscleModel3E AdductorBrevisProximal1Par = {
  F0 = .PCSAfactor*3.8/2; // Maximum force output at optimum fiber length
  Lfbar = (9.5/100); // Optimum fiber length
  Lt0 = (0.001); // Tendon slack length
  Gammabar = 0*(3.14/180); // Pennation angle in radian
  Epsilonbar = 0.053; // Tendon strain at F0
  K1 = 10; // Factor for determining shortening speed at optimum length
  K2 = 0; // Factor for determining shortening speed at optimum length
  Fcfast = 0.4; // Factor for determining shortening speed at optimum length
  Jt = 3.0; // Shape parameter for the tendon stiffness
  Jpe = 3.0; // Shape parameter for the parallel stiffness
  PEFactor = 5.0; // Parameter for influence of parallel stiffness
};

AnyMuscleModel3E AdductorBrevisProximal2Par = {
  F0 = .PCSAfactor*3.8/2; // Maximum force output at optimum fiber length
  Lfbar = (9.5/100); // Optimum fiber length
  Lt0 = (0.001); // Tendon slack length
  Gammabar = 0*(3.14/180); // Pennation angle in radian
  Epsilonbar = 0.053; // Tendon strain at F0
  K1 = 10; // Factor for determining shortening speed at optimum length
  K2 = 0; // Factor for determining shortening speed at optimum length
  Fcfast = 0.4; // Factor for determining shortening speed at optimum length
  Jt = 3.0; // Shape parameter for the tendon stiffness
  Jpe = 3.0; // Shape parameter for the parallel stiffness
  PEFactor = 5.0; // Parameter for influence of parallel stiffness
};


AnyMuscleModel3E AdductorBrevisMid3Par = {
  F0 = .PCSAfactor*3.5/2; // Maximum force output at optimum fiber length
  Lfbar = (10.4/100); // Optimum fiber length
  Lt0 = (0.001); // Tendon slack length
  Gammabar = 0*(3.14/180); // Pennation angle in radian
  Epsilonbar = 0.053; // Tendon strain at F0
  K1 = 10; // Factor for determining shortening speed at optimum length
  K2 = 0; // Factor for determining shortening speed at optimum length
  Fcfast = 0.4; // Factor for determining shortening speed at optimum length
  Jt = 3.0; // Shape parameter for the tendon stiffness
  Jpe = 3.0; // Shape parameter for the parallel stiffness
  PEFactor = 5.0; // Parameter for influence of parallel stiffness
};

AnyMuscleModel3E AdductorBrevisMid4Par = {
  F0 = .PCSAfactor*3.5/2; // Maximum force output at optimum fiber length
  Lfbar = (10.4/100); // Optimum fiber length
  Lt0 = (0.001); // Tendon slack length
  Gammabar = 0*(3.14/180); // Pennation angle in radian
  Epsilonbar = 0.053; // Tendon strain at F0
  K1 = 10; // Factor for determining shortening speed at optimum length
  K2 = 0; // Factor for determining shortening speed at optimum length
  Fcfast = 0.4; // Factor for determining shortening speed at optimum length
  Jt = 3.0; // Shape parameter for the tendon stiffness
  Jpe = 3.0; // Shape parameter for the parallel stiffness
  PEFactor = 5.0; // Parameter for influence of parallel stiffness

};

AnyMuscleModel3E AdductorBrevisDistal5Par = {
  F0 = .PCSAfactor*3.2/2; // Maximum force output at optimum fiber length
  Lfbar = (11.2/100); // Optimum fiber length
  Lt0 = (0.001); // Tendon slack length
  Gammabar = 0*(3.14/180); // Pennation angle in radian
  Epsilonbar = 0.053; // Tendon strain at F0
  K1 = 10; // Factor for determining shortening speed at optimum length
  K2 = 0; // Factor for determining shortening speed at optimum length
  Fcfast = 0.4; // Factor for determining shortening speed at optimum length
  Jt = 3.0; // Shape parameter for the tendon stiffness
  Jpe = 3.0; // Shape parameter for the parallel stiffness
  PEFactor = 5.0; // Parameter for influence of parallel stiffness

};
AnyMuscleModel3E AdductorBrevisDistal6Par = {
  F0 = .PCSAfactor*3.2/2; // Maximum force output at optimum fiber length
  Lfbar = (11.2/100); // Optimum fiber length
  Lt0 = (0.001); // Tendon slack length
  Gammabar = 0*(3.14/180); // Pennation angle in radian
  Epsilonbar = 0.053; // Tendon strain at F0
  K1 = 10; // Factor for determining shortening speed at optimum length
  K2 = 0; // Factor for determining shortening speed at optimum length
  Fcfast = 0.4; // Factor for determining shortening speed at optimum length
  Jt = 3.0; // Shape parameter for the tendon stiffness
  Jpe = 3.0; // Shape parameter for the parallel stiffness
  PEFactor = 5.0; // Parameter for influence of parallel stiffness
};

AnyMuscleModel3E GemellusInferior1Par = {
  F0 = .PCSAfactor*4.1; // Maximum force output at optimum fiber length
  Lfbar = (3.4/100); // Optimum fiber length
  Lt0 = (0.001); // Tendon slack length
  Gammabar = 0*(3.14/180); // Pennation angle in radian
  Epsilonbar = 0.053; // Tendon strain at F0
  K1 = 10; // Factor for determining shortening speed at optimum length
  K2 = 0; // Factor for determining shortening speed at optimum length
  Fcfast = 0.4; // Factor for determining shortening speed at optimum length
  Jt = 3.0; // Shape parameter for the tendon stiffness
  Jpe = 3.0; // Shape parameter for the parallel stiffness
  PEFactor = 5.0; // Parameter for influence of parallel stiffness
};
AnyMuscleModel3E GemellusSuperior1Par = {
  F0 = .PCSAfactor*4.1; // Maximum force output at optimum fiber length
  Lfbar = (3.4/100); // Optimum fiber length
  Lt0 = (0.001); // Tendon slack length
  Gammabar = 0*(3.14/180); // Pennation angle in radian
  Epsilonbar = 0.053; // Tendon strain at F0
  K1 = 10; // Factor for determining shortening speed at optimum length
  K2 = 0; // Factor for determining shortening speed at optimum length
  Fcfast = 0.4; // Factor for determining shortening speed at optimum length
  Jt = 3.0; // Shape parameter for the tendon stiffness
  Jpe = 3.0; // Shape parameter for the parallel stiffness
  PEFactor = 5.0; // Parameter for influence of parallel stiffness

};

AnyMuscleModel3E ObturatorExternusInferior1Par = {
  F0 = .PCSAfactor*5.5/2; // Maximum force output at optimum fiber length
  Lfbar = (6.9/100); // Optimum fiber length
  Lt0 = (3.5/100); // Tendon slack length
  Gammabar = 0*(3.14/180); // Pennation angle in radian
  Epsilonbar = 0.053; // Tendon strain at F0
  K1 = 10; // Factor for determining shortening speed at optimum length
  K2 = 0; // Factor for determining shortening speed at optimum length
  Fcfast = 0.4; // Factor for determining shortening speed at optimum length
  Jt = 3.0; // Shape parameter for the tendon stiffness
  Jpe = 3.0; // Shape parameter for the parallel stiffness
  PEFactor = 5.0; // Parameter for influence of parallel stiffness
};
AnyMuscleModel3E ObturatorExternusInferior2Par = {
  F0 = .PCSAfactor*5.5/2; // Maximum force output at optimum fiber length
  Lfbar = (6.9/100); // Optimum fiber length
  Lt0 = (3.5/100); // Tendon slack length
  Gammabar = 0*(3.14/180); // Pennation angle in radian
  Epsilonbar = 0.053; // Tendon strain at F0
  K1 = 10; // Factor for determining shortening speed at optimum length
  K2 = 0; // Factor for determining shortening speed at optimum length
  Fcfast = 0.4; // Factor for determining shortening speed at optimum length
  Jt = 3.0; // Shape parameter for the tendon stiffness
  Jpe = 3.0; // Shape parameter for the parallel stiffness
  PEFactor = 5.0; // Parameter for influence of parallel stiffness
};

AnyMuscleModel3E ObturatorExternusSuperior1Par = {
  F0 = .PCSAfactor*24.6/3; // Maximum force output at optimum fiber length
  Lfbar = (2.8/100); // Optimum fiber length
  Lt0 = (3/100); // Tendon slack length
  Gammabar = 0*(3.14/180); // Pennation angle in radian
  Epsilonbar = 0.053; // Tendon strain at F0
  K1 = 10; // Factor for determining shortening speed at optimum length
  K2 = 0; // Factor for determining shortening speed at optimum length
  Fcfast = 0.4; // Factor for determining shortening speed at optimum length
  Jt = 3.0; // Shape parameter for the tendon stiffness
  Jpe = 3.0; // Shape parameter for the parallel stiffness
  PEFactor = 5.0; // Parameter for influence of parallel stiffness

};
AnyMuscleModel3E ObturatorExternusSuperior2Par = {
  F0 = .PCSAfactor*24.6/3; // Maximum force output at optimum fiber length
  Lfbar = (2.8/100); // Optimum fiber length
  Lt0 = (3/100); // Tendon slack length
  Gammabar = 0*(3.14/180); // Pennation angle in radian
  Epsilonbar = 0.053; // Tendon strain at F0
  K1 = 10; // Factor for determining shortening speed at optimum length
  K2 = 0; // Factor for determining shortening speed at optimum length
  Fcfast = 0.4; // Factor for determining shortening speed at optimum length
  Jt = 3.0; // Shape parameter for the tendon stiffness
  Jpe = 3.0; // Shape parameter for the parallel stiffness
  PEFactor = 5.0; // Parameter for influence of parallel stiffness
};
AnyMuscleModel3E ObturatorExternusSuperior3Par = {
  F0 = .PCSAfactor*24.6/3; // Maximum force output at optimum fiber length
  Lfbar = (2.8/100); // Optimum fiber length
  Lt0 = (3/100); // Tendon slack length
  Gammabar = 0*(3.14/180); // Pennation angle in radian
  Epsilonbar = 0.053; // Tendon strain at F0
  K1 = 10; // Factor for determining shortening speed at optimum length
  K2 = 0; // Factor for determining shortening speed at optimum length
  Fcfast = 0.4; // Factor for determining shortening speed at optimum length
  Jt = 3.0; // Shape parameter for the tendon stiffness
  Jpe = 3.0; // Shape parameter for the parallel stiffness
  PEFactor = 5.0; // Parameter for influence of parallel stiffness

};

AnyMuscleModel3E ObturatorInternus1Par = {
  F0 = .PCSAfactor*25.4/3; // Maximum force output at optimum fiber length
  Lfbar = (2.1/100); // Optimum fiber length
  Lt0 = (8.2/100); // Tendon slack length
  Gammabar = 0*(3.14/180); // Pennation angle in radian
  Epsilonbar = 0.053; // Tendon strain at F0
  K1 = 10; // Factor for determining shortening speed at optimum length
  K2 = 0; // Factor for determining shortening speed at optimum length
  Fcfast = 0.4; // Factor for determining shortening speed at optimum length
  Jt = 3.0; // Shape parameter for the tendon stiffness
  Jpe = 3.0; // Shape parameter for the parallel stiffness
  PEFactor = 5.0; // Parameter for influence of parallel stiffness

};
AnyMuscleModel3E ObturatorInternus2Par = {
  F0 = .PCSAfactor*25.4/3; // Maximum force output at optimum fiber length
  Lfbar = (2.1/100); // Optimum fiber length
  Lt0 = (8.2/100); // Tendon slack length
  Gammabar = 0*(3.14/180); // Pennation angle in radian
  Epsilonbar = 0.053; // Tendon strain at F0
  K1 = 10; // Factor for determining shortening speed at optimum length
  K2 = 0; // Factor for determining shortening speed at optimum length
  Fcfast = 0.4; // Factor for determining shortening speed at optimum length
  Jt = 3.0; // Shape parameter for the tendon stiffness
  Jpe = 3.0; // Shape parameter for the parallel stiffness
  PEFactor = 5.0; // Parameter for influence of parallel stiffness
};
  AnyMuscleModel3E ObturatorInternus3Par = {
  F0 = .PCSAfactor*25.4/3; // Maximum force output at optimum fiber length
  Lfbar = (2.1/100); // Optimum fiber length
  Lt0 = (8.2/100); // Tendon slack length
  Gammabar = 0*(3.14/180); // Pennation angle in radian
  Epsilonbar = 0.053; // Tendon strain at F0
  K1 = 10; // Factor for determining shortening speed at optimum length
  K2 = 0; // Factor for determining shortening speed at optimum length
  Fcfast = 0.4; // Factor for determining shortening speed at optimum length
  Jt = 3.0; // Shape parameter for the tendon stiffness
  Jpe = 3.0; // Shape parameter for the parallel stiffness
  PEFactor = 5.0; // Parameter for influence of parallel stiffness
};

AnyMuscleModel3E Pectineus1Par = {
  F0 = .PCSAfactor*6.8/4; // Maximum force output at optimum fiber length
  Lfbar = (11.5/100); // Optimum fiber length
  Lt0 = (0.001); // Tendon slack length
  Gammabar = 0*(3.14/180); // Pennation angle in radian
  Epsilonbar = 0.053; // Tendon strain at F0
  K1 = 10; // Factor for determining shortening speed at optimum length
  K2 = 0; // Factor for determining shortening speed at optimum length
  Fcfast = 0.4; // Factor for determining shortening speed at optimum length
  Jt = 3.0; // Shape parameter for the tendon stiffness
  Jpe = 3.0; // Shape parameter for the parallel stiffness
  PEFactor = 5.0; // Parameter for influence of parallel stiffness

};
AnyMuscleModel3E Pectineus2Par = {
  F0 = .PCSAfactor*6.8/4; // Maximum force output at optimum fiber length
  Lfbar = (11.5/100); // Optimum fiber length
  Lt0 = (0.001); // Tendon slack length
  Gammabar = 0*(3.14/180); // Pennation angle in radian
  Epsilonbar = 0.053; // Tendon strain at F0
  K1 = 10; // Factor for determining shortening speed at optimum length
  K2 = 0; // Factor for determining shortening speed at optimum length
  Fcfast = 0.4; // Factor for determining shortening speed at optimum length
  Jt = 3.0; // Shape parameter for the tendon stiffness
  Jpe = 3.0; // Shape parameter for the parallel stiffness
  PEFactor = 5.0; // Parameter for influence of parallel stiffness

};
AnyMuscleModel3E Pectineus3Par = {
  F0 = .PCSAfactor*6.8/4; // Maximum force output at optimum fiber length
  Lfbar = (11.5/100); // Optimum fiber length
  Lt0 = (0.001); // Tendon slack length
  Gammabar = 0*(3.14/180); // Pennation angle in radian
  Epsilonbar = 0.053; // Tendon strain at F0
  K1 = 10; // Factor for determining shortening speed at optimum length
  K2 = 0; // Factor for determining shortening speed at optimum length
  Fcfast = 0.4; // Factor for determining shortening speed at optimum length
  Jt = 3.0; // Shape parameter for the tendon stiffness
  Jpe = 3.0; // Shape parameter for the parallel stiffness
  PEFactor = 5.0; // Parameter for influence of parallel stiffness

};
AnyMuscleModel3E Pectineus4Par = {
  F0 = .PCSAfactor*6.8/4; // Maximum force output at optimum fiber length
  Lfbar = (11.5/100); // Optimum fiber length
  Lt0 = (0.001); // Tendon slack length
  Gammabar = 0*(3.14/180); // Pennation angle in radian
  Epsilonbar = 0.053; // Tendon strain at F0
  K1 = 10; // Factor for determining shortening speed at optimum length
  K2 = 0; // Factor for determining shortening speed at optimum length
  Fcfast = 0.4; // Factor for determining shortening speed at optimum length
  Jt = 3.0; // Shape parameter for the tendon stiffness
  Jpe = 3.0; // Shape parameter for the parallel stiffness
  PEFactor = 5.0; // Parameter for influence of parallel stiffness

};

AnyMuscleModel3E Plantaris1Par = {
  F0 = .PCSAfactor*2.4; // Maximum force output at optimum fiber length
  Lfbar = (4.8/100); // Optimum fiber length
  Lt0 = (12/100); // Tendon slack length
  Gammabar = 0*(3.14/180); // Pennation angle in radian
  Epsilonbar = 0.053; // Tendon strain at F0
  K1 = 10; // Factor for determining shortening speed at optimum length
  K2 = 0; // Factor for determining shortening speed at optimum length
  Fcfast = 0.4; // Factor for determining shortening speed at optimum length
  Jt = 3.0; // Shape parameter for the tendon stiffness
  Jpe = 3.0; // Shape parameter for the parallel stiffness
  PEFactor = 5.0; // Parameter for influence of parallel stiffness

};

AnyMuscleModel3E Popliteus1Par = {
  F0 = .PCSAfactor*10.7/2; // Maximum force output at optimum fiber length
  Lfbar = (2.4/100); // Optimum fiber length
  Lt0 = (27/100); // Tendon slack length
  Gammabar = 0*(3.14/180); // Pennation angle in radian
  Epsilonbar = 0.053; // Tendon strain at F0
  K1 = 10; // Factor for determining shortening speed at optimum length
  K2 = 0; // Factor for determining shortening speed at optimum length
  Fcfast = 0.4; // Factor for determining shortening speed at optimum length
  Jt = 3.0; // Shape parameter for the tendon stiffness
  Jpe = 3.0; // Shape parameter for the parallel stiffness
  PEFactor = 5.0; // Parameter for influence of parallel stiffness

};
AnyMuscleModel3E Popliteus2Par = {
  F0 = .PCSAfactor*10.7/2; // Maximum force output at optimum fiber length
  Lfbar = (2.4/100); // Optimum fiber length
  Lt0 = (27/100); // Tendon slack length
  Gammabar = 0*(3.14/180); // Pennation angle in radian
  Epsilonbar = 0.053; // Tendon strain at F0
  K1 = 10; // Factor for determining shortening speed at optimum length
  K2 = 0; // Factor for determining shortening speed at optimum length
  Fcfast = 0.4; // Factor for determining shortening speed at optimum length
  Jt = 3.0; // Shape parameter for the tendon stiffness
  Jpe = 3.0; // Shape parameter for the parallel stiffness
  PEFactor = 5.0; // Parameter for influence of parallel stiffness

};

AnyMuscleModel3E PsoasMinor1Par = {
  F0 = .PCSAfactor*1.1; // Maximum force output at optimum fiber length
  Lfbar = (5.9/100); // Optimum fiber length
  Lt0 = (15.2/100); // Tendon slack length
  Gammabar = 0*(3.14/180); // Pennation angle in radian
  Epsilonbar = 0.053; // Tendon strain at F0
  K1 = 10; // Factor for determining shortening speed at optimum length
  K2 = 0; // Factor for determining shortening speed at optimum length
  Fcfast = 0.4; // Factor for determining shortening speed at optimum length
  Jt = 3.0; // Shape parameter for the tendon stiffness
  Jpe = 3.0; // Shape parameter for the parallel stiffness
  PEFactor = 5.0; // Parameter for influence of parallel stiffness

};

AnyMuscleModel3E PsoasMajor1Par = {
  F0 = .PCSAfactor*19.5/3; // Maximum force output at optimum fiber length
  Lfbar = (9.9/100); // Optimum fiber length
  Lt0 = (11.3/100); // Tendon slack length
  Gammabar = 13.4*(3.14/180); // Pennation angle in radian
  Epsilonbar = 0.053; // Tendon strain at F0
  K1 = 10; // Factor for determining shortening speed at optimum length
  K2 = 0; // Factor for determining shortening speed at optimum length
  Fcfast = 0.4; // Factor for determining shortening speed at optimum length
  Jt = 3.0; // Shape parameter for the tendon stiffness
  Jpe = 3.0; // Shape parameter for the parallel stiffness
  PEFactor = 5.0; // Parameter for influence of parallel stiffness

};
AnyMuscleModel3E PsoasMajor2Par = {
  F0 = .PCSAfactor*19.5/3; // Maximum force output at optimum fiber length
  Lfbar = (9.9/100); // Optimum fiber length
  Lt0 = (11.3/100); // Tendon slack length
  Gammabar = 13.4*(3.14/180); // Pennation angle in radian
  Epsilonbar = 0.053; // Tendon strain at F0
  K1 = 10; // Factor for determining shortening speed at optimum length
  K2 = 0; // Factor for determining shortening speed at optimum length
  Fcfast = 0.4; // Factor for determining shortening speed at optimum length
  Jt = 3.0; // Shape parameter for the tendon stiffness
  Jpe = 3.0; // Shape parameter for the parallel stiffness
  PEFactor = 5.0; // Parameter for influence of parallel stiffness

};
AnyMuscleModel3E PsoasMajor3Par = {
  F0 = .PCSAfactor*19.5/3; // Maximum force output at optimum fiber length
  Lfbar = (9.9/100); // Optimum fiber length
  Lt0 = (11.3/100); // Tendon slack length
  Gammabar = 13.4*(3.14/180); // Pennation angle in radian
  Epsilonbar = 0.053; // Tendon strain at F0
  K1 = 10; // Factor for determining shortening speed at optimum length
  K2 = 0; // Factor for determining shortening speed at optimum length
  Fcfast = 0.4; // Factor for determining shortening speed at optimum length
  Jt = 3.0; // Shape parameter for the tendon stiffness
  Jpe = 3.0; // Shape parameter for the parallel stiffness
  PEFactor = 5.0; // Parameter for influence of parallel stiffness

};

AnyMuscleModel3E QuadratusFemoris1Par = {
  F0 = .PCSAfactor*14.6/4; // Maximum force output at optimum fiber length
  Lfbar = (3.4/100); // Optimum fiber length
  Lt0 = (0.001); // Tendon slack length
  Gammabar = 0*(3.14/180); // Pennation angle in radian
  Epsilonbar = 0.053; // Tendon strain at F0
  K1 = 10; // Factor for determining shortening speed at optimum length
  K2 = 0; // Factor for determining shortening speed at optimum length
  Fcfast = 0.4; // Factor for determining shortening speed at optimum length
  Jt = 3.0; // Shape parameter for the tendon stiffness
  Jpe = 3.0; // Shape parameter for the parallel stiffness
  PEFactor = 5.0; // Parameter for influence of parallel stiffness
};

AnyMuscleModel3E QuadratusFemoris2Par = {
  F0 = .PCSAfactor*14.6/4; // Maximum force output at optimum fiber length
  Lfbar = (3.4/100); // Optimum fiber length
  Lt0 = (0.001); // Tendon slack length
  Gammabar = 0*(3.14/180); // Pennation angle in radian
  Epsilonbar = 0.053; // Tendon strain at F0
  K1 = 10; // Factor for determining shortening speed at optimum length
  K2 = 0; // Factor for determining shortening speed at optimum length
  Fcfast = 0.4; // Factor for determining shortening speed at optimum length
  Jt = 3.0; // Shape parameter for the tendon stiffness
  Jpe = 3.0; // Shape parameter for the parallel stiffness
  PEFactor = 5.0; // Parameter for influence of parallel stiffness

};
AnyMuscleModel3E QuadratusFemoris3Par = {
  F0 = .PCSAfactor*14.6/4; // Maximum force output at optimum fiber length
  Lfbar = (3.4/100); // Optimum fiber length
  Lt0 = (0.001); // Tendon slack length
  Gammabar = 0*(3.14/180); // Pennation angle in radian
  Epsilonbar = 0.053; // Tendon strain at F0
  K1 = 10; // Factor for determining shortening speed at optimum length
  K2 = 0; // Factor for determining shortening speed at optimum length
  Fcfast = 0.4; // Factor for determining shortening speed at optimum length
  Jt = 3.0; // Shape parameter for the tendon stiffness
  Jpe = 3.0; // Shape parameter for the parallel stiffness
  PEFactor = 5.0; // Parameter for influence of parallel stiffness

};
AnyMuscleModel3E QuadratusFemoris4Par = {
  F0 = .PCSAfactor*14.6/4; // Maximum force output at optimum fiber length
  Lfbar = (3.4/100); // Optimum fiber length
  Lt0 = (0.001); // Tendon slack length
  Gammabar = 0*(3.14/180); // Pennation angle in radian
  Epsilonbar = 0.053; // Tendon strain at F0
  K1 = 10; // Factor for determining shortening speed at optimum length
  K2 = 0; // Factor for determining shortening speed at optimum length
  Fcfast = 0.4; // Factor for determining shortening speed at optimum length
  Jt = 3.0; // Shape parameter for the tendon stiffness
  Jpe = 3.0; // Shape parameter for the parallel stiffness
  PEFactor = 5.0; // Parameter for influence of parallel stiffness

};
