AnyFolder RightHipMuscleCal={
  AnyFolder &SideHumanFolderRef=..HumanFolderRef.Right;
  AnyFolder &SideInterfaceFolderRef=..HumanFolderRef.Interface.Right;
  AnyFolder &SidePsoasRef = ..HumanFolderRef.Trunk.MusclesSpineRight.PsoasMajor;
  #include "HipMuscleCal.any"
};

AnyFolder RightKneeMuscleCal={
  AnyFolder &SideHumanFolderRef=..HumanFolderRef.Right;
  AnyFolder &SideInterfaceFolderRef=..HumanFolderRef.Interface.Right;
  #include "KneeMuscleCal.any"
};

AnyFolder RightAnkleMuscleCal={
  AnyFolder &SideHumanFolderRef=..HumanFolderRef.Right;
  AnyFolder &SideInterfaceFolderRef=..HumanFolderRef.Interface.Right;
  #include "AnkleMuscleCal.any"
};


CalibrationSequence = {
  AnyOperation &CalHipLegRight2Par = .RightHipMuscleCal.LegCalibrationStudyHip.FiberAndTendonLengthAdjustment;
  AnyOperation &CalkneeLegRight2Par = .RightKneeMuscleCal.LegCalibrationStudyKnee.FiberAndTendonLengthAdjustment;
  AnyOperation &CalAnkleLegRight2Par = .RightAnkleMuscleCal.LegCalibrationStudyAnkle.FiberAndTendonLengthAdjustment;
};
