/**^This folder implements the muscle models for the TLEM model.
Anatomical muscles from the TLEM data set are in many cases split into
several branches (elements). Strength parameters are split between the branches,
typically by uniform split.

Different morphologies of TLEM model are implemented in this file,
please refer to the file for details.
*/


SubjectMusclePar_template SubjectMusPar = {
    //SpecificStrength = 90; // (N/cm^2)
    //Klein Horsman used a PCSAfactor of 27 N/cm^2 this is now changed to 90 N/cm^2
    AnyVar PCSAfactor = SpecificStrength * ......HumanModel.StrengthParameters.StrengthIndexLeg; // = PCSAfactor in N/cm^2 , the PCSA itself is given in cm^2 so F0 is in Newton`s.
    #include "SubjectMusPar_2.any"
};


/////////////////////////////////////////////////
//     AdductorBrevisProximal (2 elements)     //
/////////////////////////////////////////////////
AnyMuscleModel AdductorBrevisProximal1Par =
{
 AnyFolder &MuscleParameters = .SubjectMusPar.AdductorBrevisProximal;
 AnyIntVar MuscleElemNo = 1; ///< The number of this element of the muscle
 AnyIntVar MuscleElemAmount = MuscleParameters.MuscleElemAmount; ///< The total amount of elements for this muscle
 F0 = .SubjectMusPar.PCSAfactor*PCSA; //< Maximum force output at optimum fiber length
 Lf0 = MuscleParameters.OptimalFiberlength
       * cos(pi/180*MuscleParameters.Pennationangle);
 Vol0 = 1e-6*MuscleParameters.MuscleVolume/MuscleElemAmount; ///< Muscle volume in (m3)
 AnyVar PCSA = 1e4*Vol0/Lf0;///< PCSA (cm^2) is calculated as muscle volume divided between muscle branches, divided by fiber length and corrected for the pennation angle not used in the simple muscle model
};

AnyMuscleModel AdductorBrevisProximal2Par =
{
 AnyFolder &MuscleParameters = .SubjectMusPar.AdductorBrevisProximal;
 AnyIntVar MuscleElemNo = 2; ///< The number of this element of the muscle
 AnyIntVar MuscleElemAmount = MuscleParameters.MuscleElemAmount; ///< The total amount of elements for this muscle
 F0 = .SubjectMusPar.PCSAfactor*PCSA; //< Maximum force output at optimum fiber length
 Lf0 = MuscleParameters.OptimalFiberlength
       * cos(pi/180*MuscleParameters.Pennationangle);
 Vol0 = 1e-6*MuscleParameters.MuscleVolume/MuscleElemAmount; ///< Muscle volume in (m3)
 AnyVar PCSA = 1e4*Vol0/Lf0;///< PCSA (cm^2) is calculated as muscle volume divided between muscle branches, divided by fiber length and corrected for the pennation angle not used in the simple muscle model
};


////////////////////////////////////////////
//     AdductorBrevisMid (2 elements)     //
////////////////////////////////////////////
AnyMuscleModel AdductorBrevisMid1Par =
{
 AnyFolder &MuscleParameters = .SubjectMusPar.AdductorBrevisMid;
 AnyIntVar MuscleElemNo = 1; ///< The number of this element of the muscle
 AnyIntVar MuscleElemAmount = MuscleParameters.MuscleElemAmount; ///< The total amount of elements for this muscle
 F0 = .SubjectMusPar.PCSAfactor*PCSA; //< Maximum force output at optimum fiber length
 Lf0 = MuscleParameters.OptimalFiberlength
       * cos(pi/180*MuscleParameters.Pennationangle);
 Vol0 = 1e-6*MuscleParameters.MuscleVolume/MuscleElemAmount; ///< Muscle volume in (m3)
 AnyVar PCSA = 1e4*Vol0/Lf0;///< PCSA (cm^2) is calculated as muscle volume divided between muscle branches, divided by fiber length and corrected for the pennation angle not used in the simple muscle model
};

AnyMuscleModel AdductorBrevisMid2Par =
{
 AnyFolder &MuscleParameters = .SubjectMusPar.AdductorBrevisMid;
 AnyIntVar MuscleElemNo = 2; ///< The number of this element of the muscle
 AnyIntVar MuscleElemAmount = MuscleParameters.MuscleElemAmount; ///< The total amount of elements for this muscle
 F0 = .SubjectMusPar.PCSAfactor*PCSA; //< Maximum force output at optimum fiber length
 Lf0 = MuscleParameters.OptimalFiberlength
       * cos(pi/180*MuscleParameters.Pennationangle);
 Vol0 = 1e-6*MuscleParameters.MuscleVolume/MuscleElemAmount; ///< Muscle volume in (m3)
 AnyVar PCSA = 1e4*Vol0/Lf0;///< PCSA (cm^2) is calculated as muscle volume divided between muscle branches, divided by fiber length and corrected for the pennation angle not used in the simple muscle model
};


///////////////////////////////////////////////
//     AdductorBrevisDistal (2 elements)     //
///////////////////////////////////////////////
AnyMuscleModel AdductorBrevisDistal1Par =
{
 AnyFolder &MuscleParameters = .SubjectMusPar.AdductorBrevisDistal;
 AnyIntVar MuscleElemNo = 1; ///< The number of this element of the muscle
 AnyIntVar MuscleElemAmount = MuscleParameters.MuscleElemAmount; ///< The total amount of elements for this muscle
 F0 = .SubjectMusPar.PCSAfactor*PCSA; //< Maximum force output at optimum fiber length
 Lf0 = MuscleParameters.OptimalFiberlength
       * cos(pi/180*MuscleParameters.Pennationangle);
 Vol0 = 1e-6*MuscleParameters.MuscleVolume/MuscleElemAmount; ///< Muscle volume in (m3)
 AnyVar PCSA = 1e4*Vol0/Lf0;///< PCSA (cm^2) is calculated as muscle volume divided between muscle branches, divided by fiber length and corrected for the pennation angle not used in the simple muscle model
};

AnyMuscleModel AdductorBrevisDistal2Par =
{
 AnyFolder &MuscleParameters = .SubjectMusPar.AdductorBrevisDistal;
 AnyIntVar MuscleElemNo = 2; ///< The number of this element of the muscle
 AnyIntVar MuscleElemAmount = MuscleParameters.MuscleElemAmount; ///< The total amount of elements for this muscle
 F0 = .SubjectMusPar.PCSAfactor*PCSA; //< Maximum force output at optimum fiber length
 Lf0 = MuscleParameters.OptimalFiberlength
       * cos(pi/180*MuscleParameters.Pennationangle);
 Vol0 = 1e-6*MuscleParameters.MuscleVolume/MuscleElemAmount; ///< Muscle volume in (m3)
 AnyVar PCSA = 1e4*Vol0/Lf0;///< PCSA (cm^2) is calculated as muscle volume divided between muscle branches, divided by fiber length and corrected for the pennation angle not used in the simple muscle model
};


/////////////////////////////////////////
//     AdductorLongus (6 elements)     //
/////////////////////////////////////////
AnyMuscleModel AdductorLongus1Par =
{
 AnyFolder &MuscleParameters = .SubjectMusPar.AdductorLongus;
 AnyIntVar MuscleElemNo = 1; ///< The number of this element of the muscle
 AnyIntVar MuscleElemAmount = MuscleParameters.MuscleElemAmount; ///< The total amount of elements for this muscle
 F0 = .SubjectMusPar.PCSAfactor*PCSA; //< Maximum force output at optimum fiber length
 Lf0 = MuscleParameters.OptimalFiberlength
       * cos(pi/180*MuscleParameters.Pennationangle);
 Vol0 = 1e-6*MuscleParameters.MuscleVolume/MuscleElemAmount; ///< Muscle volume in (m3)
 AnyVar PCSA = 1e4*Vol0/Lf0;///< PCSA (cm^2) is calculated as muscle volume divided between muscle branches, divided by fiber length and corrected for the pennation angle not used in the simple muscle model
};

AnyMuscleModel AdductorLongus2Par =
{
 AnyFolder &MuscleParameters = .SubjectMusPar.AdductorLongus;
 AnyIntVar MuscleElemNo = 2; ///< The number of this element of the muscle
 AnyIntVar MuscleElemAmount = MuscleParameters.MuscleElemAmount; ///< The total amount of elements for this muscle
 F0 = .SubjectMusPar.PCSAfactor*PCSA; //< Maximum force output at optimum fiber length
 Lf0 = MuscleParameters.OptimalFiberlength
       * cos(pi/180*MuscleParameters.Pennationangle);
 Vol0 = 1e-6*MuscleParameters.MuscleVolume/MuscleElemAmount; ///< Muscle volume in (m3)
 AnyVar PCSA = 1e4*Vol0/Lf0;///< PCSA (cm^2) is calculated as muscle volume divided between muscle branches, divided by fiber length and corrected for the pennation angle not used in the simple muscle model
};

AnyMuscleModel AdductorLongus3Par =
{
 AnyFolder &MuscleParameters = .SubjectMusPar.AdductorLongus;
 AnyIntVar MuscleElemNo = 3; ///< The number of this element of the muscle
 AnyIntVar MuscleElemAmount = MuscleParameters.MuscleElemAmount; ///< The total amount of elements for this muscle
 F0 = .SubjectMusPar.PCSAfactor*PCSA; //< Maximum force output at optimum fiber length
 Lf0 = MuscleParameters.OptimalFiberlength
       * cos(pi/180*MuscleParameters.Pennationangle);
 Vol0 = 1e-6*MuscleParameters.MuscleVolume/MuscleElemAmount; ///< Muscle volume in (m3)
 AnyVar PCSA = 1e4*Vol0/Lf0;///< PCSA (cm^2) is calculated as muscle volume divided between muscle branches, divided by fiber length and corrected for the pennation angle not used in the simple muscle model
};

AnyMuscleModel AdductorLongus4Par =
{
 AnyFolder &MuscleParameters = .SubjectMusPar.AdductorLongus;
 AnyIntVar MuscleElemNo = 4; ///< The number of this element of the muscle
 AnyIntVar MuscleElemAmount = MuscleParameters.MuscleElemAmount; ///< The total amount of elements for this muscle
 F0 = .SubjectMusPar.PCSAfactor*PCSA; //< Maximum force output at optimum fiber length
 Lf0 = MuscleParameters.OptimalFiberlength
       * cos(pi/180*MuscleParameters.Pennationangle);
 Vol0 = 1e-6*MuscleParameters.MuscleVolume/MuscleElemAmount; ///< Muscle volume in (m3)
 AnyVar PCSA = 1e4*Vol0/Lf0;///< PCSA (cm^2) is calculated as muscle volume divided between muscle branches, divided by fiber length and corrected for the pennation angle not used in the simple muscle model
};

AnyMuscleModel AdductorLongus5Par =
{
 AnyFolder &MuscleParameters = .SubjectMusPar.AdductorLongus;
 AnyIntVar MuscleElemNo = 5; ///< The number of this element of the muscle
 AnyIntVar MuscleElemAmount = MuscleParameters.MuscleElemAmount; ///< The total amount of elements for this muscle
 F0 = .SubjectMusPar.PCSAfactor*PCSA; //< Maximum force output at optimum fiber length
 Lf0 = MuscleParameters.OptimalFiberlength
       * cos(pi/180*MuscleParameters.Pennationangle);
 Vol0 = 1e-6*MuscleParameters.MuscleVolume/MuscleElemAmount; ///< Muscle volume in (m3)
 AnyVar PCSA = 1e4*Vol0/Lf0;///< PCSA (cm^2) is calculated as muscle volume divided between muscle branches, divided by fiber length and corrected for the pennation angle not used in the simple muscle model
};

AnyMuscleModel AdductorLongus6Par =
{
 AnyFolder &MuscleParameters = .SubjectMusPar.AdductorLongus;
 AnyIntVar MuscleElemNo = 6; ///< The number of this element of the muscle
 AnyIntVar MuscleElemAmount = MuscleParameters.MuscleElemAmount; ///< The total amount of elements for this muscle
 F0 = .SubjectMusPar.PCSAfactor*PCSA; //< Maximum force output at optimum fiber length
 Lf0 = MuscleParameters.OptimalFiberlength
       * cos(pi/180*MuscleParameters.Pennationangle);
 Vol0 = 1e-6*MuscleParameters.MuscleVolume/MuscleElemAmount; ///< Muscle volume in (m3)
 AnyVar PCSA = 1e4*Vol0/Lf0;///< PCSA (cm^2) is calculated as muscle volume divided between muscle branches, divided by fiber length and corrected for the pennation angle not used in the simple muscle model
};


///////////////////////////////////////////////
//     AdductorMagnusDistal (3 elements)     //
///////////////////////////////////////////////
AnyMuscleModel AdductorMagnusDistal1Par =
{
 AnyFolder &MuscleParameters = .SubjectMusPar.AdductorMagnusDistal;
 AnyIntVar MuscleElemNo = 1; ///< The number of this element of the muscle
 AnyIntVar MuscleElemAmount = MuscleParameters.MuscleElemAmount; ///< The total amount of elements for this muscle
 F0 = .SubjectMusPar.PCSAfactor*PCSA; //< Maximum force output at optimum fiber length
 Lf0 = MuscleParameters.OptimalFiberlength
       * cos(pi/180*MuscleParameters.Pennationangle);
 Vol0 = 1e-6*MuscleParameters.MuscleVolume/MuscleElemAmount; ///< Muscle volume in (m3)
 AnyVar PCSA = 1e4*Vol0/Lf0;///< PCSA (cm^2) is calculated as muscle volume divided between muscle branches, divided by fiber length and corrected for the pennation angle not used in the simple muscle model
};

AnyMuscleModel AdductorMagnusDistal2Par =
{
 AnyFolder &MuscleParameters = .SubjectMusPar.AdductorMagnusDistal;
 AnyIntVar MuscleElemNo = 2; ///< The number of this element of the muscle
 AnyIntVar MuscleElemAmount = MuscleParameters.MuscleElemAmount; ///< The total amount of elements for this muscle
 F0 = .SubjectMusPar.PCSAfactor*PCSA; //< Maximum force output at optimum fiber length
 Lf0 = MuscleParameters.OptimalFiberlength
       * cos(pi/180*MuscleParameters.Pennationangle);
 Vol0 = 1e-6*MuscleParameters.MuscleVolume/MuscleElemAmount; ///< Muscle volume in (m3)
 AnyVar PCSA = 1e4*Vol0/Lf0;///< PCSA (cm^2) is calculated as muscle volume divided between muscle branches, divided by fiber length and corrected for the pennation angle not used in the simple muscle model
};

AnyMuscleModel AdductorMagnusDistal3Par =
{
 AnyFolder &MuscleParameters = .SubjectMusPar.AdductorMagnusDistal;
 AnyIntVar MuscleElemNo = 3; ///< The number of this element of the muscle
 AnyIntVar MuscleElemAmount = MuscleParameters.MuscleElemAmount; ///< The total amount of elements for this muscle
 F0 = .SubjectMusPar.PCSAfactor*PCSA; //< Maximum force output at optimum fiber length
 Lf0 = MuscleParameters.OptimalFiberlength
       * cos(pi/180*MuscleParameters.Pennationangle);
 Vol0 = 1e-6*MuscleParameters.MuscleVolume/MuscleElemAmount; ///< Muscle volume in (m3)
 AnyVar PCSA = 1e4*Vol0/Lf0;///< PCSA (cm^2) is calculated as muscle volume divided between muscle branches, divided by fiber length and corrected for the pennation angle not used in the simple muscle model
};


////////////////////////////////////////////
//     AdductorMagnusMid (6 elements)     //
////////////////////////////////////////////
AnyMuscleModel AdductorMagnusMid1Par =
{
 AnyFolder &MuscleParameters = .SubjectMusPar.AdductorMagnusMid;
 AnyIntVar MuscleElemNo = 1; ///< The number of this element of the muscle
 AnyIntVar MuscleElemAmount = MuscleParameters.MuscleElemAmount; ///< The total amount of elements for this muscle
 F0 = .SubjectMusPar.PCSAfactor*PCSA; //< Maximum force output at optimum fiber length
 Lf0 = MuscleParameters.OptimalFiberlength
       * cos(pi/180*MuscleParameters.Pennationangle);
 Vol0 = 1e-6*MuscleParameters.MuscleVolume/MuscleElemAmount; ///< Muscle volume in (m3)
 AnyVar PCSA = 1e4*Vol0/Lf0;///< PCSA (cm^2) is calculated as muscle volume divided between muscle branches, divided by fiber length and corrected for the pennation angle not used in the simple muscle model
};

AnyMuscleModel AdductorMagnusMid2Par =
{
 AnyFolder &MuscleParameters = .SubjectMusPar.AdductorMagnusMid;
 AnyIntVar MuscleElemNo = 2; ///< The number of this element of the muscle
 AnyIntVar MuscleElemAmount = MuscleParameters.MuscleElemAmount; ///< The total amount of elements for this muscle
 F0 = .SubjectMusPar.PCSAfactor*PCSA; //< Maximum force output at optimum fiber length
 Lf0 = MuscleParameters.OptimalFiberlength
       * cos(pi/180*MuscleParameters.Pennationangle);
 Vol0 = 1e-6*MuscleParameters.MuscleVolume/MuscleElemAmount; ///< Muscle volume in (m3)
 AnyVar PCSA = 1e4*Vol0/Lf0;///< PCSA (cm^2) is calculated as muscle volume divided between muscle branches, divided by fiber length and corrected for the pennation angle not used in the simple muscle model
};

AnyMuscleModel AdductorMagnusMid3Par =
{
 AnyFolder &MuscleParameters = .SubjectMusPar.AdductorMagnusMid;
 AnyIntVar MuscleElemNo = 3; ///< The number of this element of the muscle
 AnyIntVar MuscleElemAmount = MuscleParameters.MuscleElemAmount; ///< The total amount of elements for this muscle
 F0 = .SubjectMusPar.PCSAfactor*PCSA; //< Maximum force output at optimum fiber length
 Lf0 = MuscleParameters.OptimalFiberlength
       * cos(pi/180*MuscleParameters.Pennationangle);
 Vol0 = 1e-6*MuscleParameters.MuscleVolume/MuscleElemAmount; ///< Muscle volume in (m3)
 AnyVar PCSA = 1e4*Vol0/Lf0;///< PCSA (cm^2) is calculated as muscle volume divided between muscle branches, divided by fiber length and corrected for the pennation angle not used in the simple muscle model
};

AnyMuscleModel AdductorMagnusMid4Par =
{
 AnyFolder &MuscleParameters = .SubjectMusPar.AdductorMagnusMid;
 AnyIntVar MuscleElemNo = 4; ///< The number of this element of the muscle
 AnyIntVar MuscleElemAmount = MuscleParameters.MuscleElemAmount; ///< The total amount of elements for this muscle
 F0 = .SubjectMusPar.PCSAfactor*PCSA; //< Maximum force output at optimum fiber length
 Lf0 = MuscleParameters.OptimalFiberlength
       * cos(pi/180*MuscleParameters.Pennationangle);
 Vol0 = 1e-6*MuscleParameters.MuscleVolume/MuscleElemAmount; ///< Muscle volume in (m3)
 AnyVar PCSA = 1e4*Vol0/Lf0;///< PCSA (cm^2) is calculated as muscle volume divided between muscle branches, divided by fiber length and corrected for the pennation angle not used in the simple muscle model
};

AnyMuscleModel AdductorMagnusMid5Par =
{
 AnyFolder &MuscleParameters = .SubjectMusPar.AdductorMagnusMid;
 AnyIntVar MuscleElemNo = 5; ///< The number of this element of the muscle
 AnyIntVar MuscleElemAmount = MuscleParameters.MuscleElemAmount; ///< The total amount of elements for this muscle
 F0 = .SubjectMusPar.PCSAfactor*PCSA; //< Maximum force output at optimum fiber length
 Lf0 = MuscleParameters.OptimalFiberlength
       * cos(pi/180*MuscleParameters.Pennationangle);
 Vol0 = 1e-6*MuscleParameters.MuscleVolume/MuscleElemAmount; ///< Muscle volume in (m3)
 AnyVar PCSA = 1e4*Vol0/Lf0;///< PCSA (cm^2) is calculated as muscle volume divided between muscle branches, divided by fiber length and corrected for the pennation angle not used in the simple muscle model
};

AnyMuscleModel AdductorMagnusMid6Par =
{
 AnyFolder &MuscleParameters = .SubjectMusPar.AdductorMagnusMid;
 AnyIntVar MuscleElemNo = 6; ///< The number of this element of the muscle
 AnyIntVar MuscleElemAmount = MuscleParameters.MuscleElemAmount; ///< The total amount of elements for this muscle
 F0 = .SubjectMusPar.PCSAfactor*PCSA; //< Maximum force output at optimum fiber length
 Lf0 = MuscleParameters.OptimalFiberlength
       * cos(pi/180*MuscleParameters.Pennationangle);
 Vol0 = 1e-6*MuscleParameters.MuscleVolume/MuscleElemAmount; ///< Muscle volume in (m3)
 AnyVar PCSA = 1e4*Vol0/Lf0;///< PCSA (cm^2) is calculated as muscle volume divided between muscle branches, divided by fiber length and corrected for the pennation angle not used in the simple muscle model
};


/////////////////////////////////////////////////
//     AdductorMagnusProximal (4 elements)     //
/////////////////////////////////////////////////
AnyMuscleModel AdductorMagnusProximal1Par =
{
 AnyFolder &MuscleParameters = .SubjectMusPar.AdductorMagnusProximal;
 AnyIntVar MuscleElemNo = 1; ///< The number of this element of the muscle
 AnyIntVar MuscleElemAmount = MuscleParameters.MuscleElemAmount; ///< The total amount of elements for this muscle
 F0 = .SubjectMusPar.PCSAfactor*PCSA; //< Maximum force output at optimum fiber length
 Lf0 = MuscleParameters.OptimalFiberlength
       * cos(pi/180*MuscleParameters.Pennationangle);
 Vol0 = 1e-6*MuscleParameters.MuscleVolume/MuscleElemAmount; ///< Muscle volume in (m3)
 AnyVar PCSA = 1e4*Vol0/Lf0;///< PCSA (cm^2) is calculated as muscle volume divided between muscle branches, divided by fiber length and corrected for the pennation angle not used in the simple muscle model
};

AnyMuscleModel AdductorMagnusProximal2Par =
{
 AnyFolder &MuscleParameters = .SubjectMusPar.AdductorMagnusProximal;
 AnyIntVar MuscleElemNo = 2; ///< The number of this element of the muscle
 AnyIntVar MuscleElemAmount = MuscleParameters.MuscleElemAmount; ///< The total amount of elements for this muscle
 F0 = .SubjectMusPar.PCSAfactor*PCSA; //< Maximum force output at optimum fiber length
 Lf0 = MuscleParameters.OptimalFiberlength
       * cos(pi/180*MuscleParameters.Pennationangle);
 Vol0 = 1e-6*MuscleParameters.MuscleVolume/MuscleElemAmount; ///< Muscle volume in (m3)
 AnyVar PCSA = 1e4*Vol0/Lf0;///< PCSA (cm^2) is calculated as muscle volume divided between muscle branches, divided by fiber length and corrected for the pennation angle not used in the simple muscle model
};

AnyMuscleModel AdductorMagnusProximal3Par =
{
 AnyFolder &MuscleParameters = .SubjectMusPar.AdductorMagnusProximal;
 AnyIntVar MuscleElemNo = 3; ///< The number of this element of the muscle
 AnyIntVar MuscleElemAmount = MuscleParameters.MuscleElemAmount; ///< The total amount of elements for this muscle
 F0 = .SubjectMusPar.PCSAfactor*PCSA; //< Maximum force output at optimum fiber length
 Lf0 = MuscleParameters.OptimalFiberlength
       * cos(pi/180*MuscleParameters.Pennationangle);
 Vol0 = 1e-6*MuscleParameters.MuscleVolume/MuscleElemAmount; ///< Muscle volume in (m3)
 AnyVar PCSA = 1e4*Vol0/Lf0;///< PCSA (cm^2) is calculated as muscle volume divided between muscle branches, divided by fiber length and corrected for the pennation angle not used in the simple muscle model
};

AnyMuscleModel AdductorMagnusProximal4Par =
{
 AnyFolder &MuscleParameters = .SubjectMusPar.AdductorMagnusProximal;
 AnyIntVar MuscleElemNo = 4; ///< The number of this element of the muscle
 AnyIntVar MuscleElemAmount = MuscleParameters.MuscleElemAmount; ///< The total amount of elements for this muscle
 F0 = .SubjectMusPar.PCSAfactor*PCSA; //< Maximum force output at optimum fiber length
 Lf0 = MuscleParameters.OptimalFiberlength
       * cos(pi/180*MuscleParameters.Pennationangle);
 Vol0 = 1e-6*MuscleParameters.MuscleVolume/MuscleElemAmount; ///< Muscle volume in (m3)
 AnyVar PCSA = 1e4*Vol0/Lf0;///< PCSA (cm^2) is calculated as muscle volume divided between muscle branches, divided by fiber length and corrected for the pennation angle not used in the simple muscle model
};


///////////////////////////////////////////////////
//     BicepsFemorisCaputLongum (1 element )     //
///////////////////////////////////////////////////
AnyMuscleModel BicepsFemorisCaputLongum1Par =
{
 AnyFolder &MuscleParameters = .SubjectMusPar.BicepsFemorisCaputLongum;
 AnyIntVar MuscleElemNo = 1; ///< The number of this element of the muscle
 AnyIntVar MuscleElemAmount = MuscleParameters.MuscleElemAmount; ///< The total amount of elements for this muscle
 F0 = .SubjectMusPar.PCSAfactor*PCSA; //< Maximum force output at optimum fiber length
 Lf0 = MuscleParameters.OptimalFiberlength
       * cos(pi/180*MuscleParameters.Pennationangle);
 Vol0 = 1e-6*MuscleParameters.MuscleVolume/MuscleElemAmount; ///< Muscle volume in (m3)
 AnyVar PCSA = 1e4*Vol0/Lf0;///< PCSA (cm^2) is calculated as muscle volume divided between muscle branches, divided by fiber length and corrected for the pennation angle not used in the simple muscle model
};


//////////////////////////////////////////////////
//     BicepsFemorisCaputBreve (3 elements)     //
//////////////////////////////////////////////////
AnyMuscleModel BicepsFemorisCaputBreve1Par =
{
 AnyFolder &MuscleParameters = .SubjectMusPar.BicepsFemorisCaputBreve;
 AnyIntVar MuscleElemNo = 1; ///< The number of this element of the muscle
 AnyIntVar MuscleElemAmount = MuscleParameters.MuscleElemAmount; ///< The total amount of elements for this muscle
 F0 = .SubjectMusPar.PCSAfactor*PCSA; //< Maximum force output at optimum fiber length
 Lf0 = MuscleParameters.OptimalFiberlength
       * cos(pi/180*MuscleParameters.Pennationangle);
 Vol0 = 1e-6*MuscleParameters.MuscleVolume/MuscleElemAmount; ///< Muscle volume in (m3)
 AnyVar PCSA = 1e4*Vol0/Lf0;///< PCSA (cm^2) is calculated as muscle volume divided between muscle branches, divided by fiber length and corrected for the pennation angle not used in the simple muscle model
};

AnyMuscleModel BicepsFemorisCaputBreve2Par =
{
 AnyFolder &MuscleParameters = .SubjectMusPar.BicepsFemorisCaputBreve;
 AnyIntVar MuscleElemNo = 2; ///< The number of this element of the muscle
 AnyIntVar MuscleElemAmount = MuscleParameters.MuscleElemAmount; ///< The total amount of elements for this muscle
 F0 = .SubjectMusPar.PCSAfactor*PCSA; //< Maximum force output at optimum fiber length
 Lf0 = MuscleParameters.OptimalFiberlength
       * cos(pi/180*MuscleParameters.Pennationangle);
 Vol0 = 1e-6*MuscleParameters.MuscleVolume/MuscleElemAmount; ///< Muscle volume in (m3)
 AnyVar PCSA = 1e4*Vol0/Lf0;///< PCSA (cm^2) is calculated as muscle volume divided between muscle branches, divided by fiber length and corrected for the pennation angle not used in the simple muscle model
};

AnyMuscleModel BicepsFemorisCaputBreve3Par =
{
 AnyFolder &MuscleParameters = .SubjectMusPar.BicepsFemorisCaputBreve;
 AnyIntVar MuscleElemNo = 3; ///< The number of this element of the muscle
 AnyIntVar MuscleElemAmount = MuscleParameters.MuscleElemAmount; ///< The total amount of elements for this muscle
 F0 = .SubjectMusPar.PCSAfactor*PCSA; //< Maximum force output at optimum fiber length
 Lf0 = MuscleParameters.OptimalFiberlength
       * cos(pi/180*MuscleParameters.Pennationangle);
 Vol0 = 1e-6*MuscleParameters.MuscleVolume/MuscleElemAmount; ///< Muscle volume in (m3)
 AnyVar PCSA = 1e4*Vol0/Lf0;///< PCSA (cm^2) is calculated as muscle volume divided between muscle branches, divided by fiber length and corrected for the pennation angle not used in the simple muscle model
};


//////////////////////////////////////////////////
//     ExtensorDigitorumLongus (4 elements)     //
//////////////////////////////////////////////////
AnyMuscleModel ExtensorDigitorumLongus1Par =
{
 AnyFolder &MuscleParameters = .SubjectMusPar.ExtensorDigitorumLongus;
 AnyIntVar MuscleElemNo = 1; ///< The number of this element of the muscle
 AnyIntVar MuscleElemAmount = MuscleParameters.MuscleElemAmount; ///< The total amount of elements for this muscle
 F0 = .SubjectMusPar.PCSAfactor*PCSA; //< Maximum force output at optimum fiber length
 Lf0 = MuscleParameters.OptimalFiberlength
       * cos(pi/180*MuscleParameters.Pennationangle);
 Vol0 = 1e-6*MuscleParameters.MuscleVolume/MuscleElemAmount; ///< Muscle volume in (m3)
 AnyVar PCSA = 1e4*Vol0/Lf0;///< PCSA (cm^2) is calculated as muscle volume divided between muscle branches, divided by fiber length and corrected for the pennation angle not used in the simple muscle model
};

AnyMuscleModel ExtensorDigitorumLongus2Par =
{
 AnyFolder &MuscleParameters = .SubjectMusPar.ExtensorDigitorumLongus;
 AnyIntVar MuscleElemNo = 2; ///< The number of this element of the muscle
 AnyIntVar MuscleElemAmount = MuscleParameters.MuscleElemAmount; ///< The total amount of elements for this muscle
 F0 = .SubjectMusPar.PCSAfactor*PCSA; //< Maximum force output at optimum fiber length
 Lf0 = MuscleParameters.OptimalFiberlength
       * cos(pi/180*MuscleParameters.Pennationangle);
 Vol0 = 1e-6*MuscleParameters.MuscleVolume/MuscleElemAmount; ///< Muscle volume in (m3)
 AnyVar PCSA = 1e4*Vol0/Lf0;///< PCSA (cm^2) is calculated as muscle volume divided between muscle branches, divided by fiber length and corrected for the pennation angle not used in the simple muscle model
};

AnyMuscleModel ExtensorDigitorumLongus3Par =
{
 AnyFolder &MuscleParameters = .SubjectMusPar.ExtensorDigitorumLongus;
 AnyIntVar MuscleElemNo = 3; ///< The number of this element of the muscle
 AnyIntVar MuscleElemAmount = MuscleParameters.MuscleElemAmount; ///< The total amount of elements for this muscle
 F0 = .SubjectMusPar.PCSAfactor*PCSA; //< Maximum force output at optimum fiber length
 Lf0 = MuscleParameters.OptimalFiberlength
       * cos(pi/180*MuscleParameters.Pennationangle);
 Vol0 = 1e-6*MuscleParameters.MuscleVolume/MuscleElemAmount; ///< Muscle volume in (m3)
 AnyVar PCSA = 1e4*Vol0/Lf0;///< PCSA (cm^2) is calculated as muscle volume divided between muscle branches, divided by fiber length and corrected for the pennation angle not used in the simple muscle model
};

AnyMuscleModel ExtensorDigitorumLongus4Par =
{
 AnyFolder &MuscleParameters = .SubjectMusPar.ExtensorDigitorumLongus;
 AnyIntVar MuscleElemNo = 4; ///< The number of this element of the muscle
 AnyIntVar MuscleElemAmount = MuscleParameters.MuscleElemAmount; ///< The total amount of elements for this muscle
 F0 = .SubjectMusPar.PCSAfactor*PCSA; //< Maximum force output at optimum fiber length
 Lf0 = MuscleParameters.OptimalFiberlength
       * cos(pi/180*MuscleParameters.Pennationangle);
 Vol0 = 1e-6*MuscleParameters.MuscleVolume/MuscleElemAmount; ///< Muscle volume in (m3)
 AnyVar PCSA = 1e4*Vol0/Lf0;///< PCSA (cm^2) is calculated as muscle volume divided between muscle branches, divided by fiber length and corrected for the pennation angle not used in the simple muscle model
};


/////////////////////////////////////////////////
//     ExtensorHallucisLongus (3 elements)     //
/////////////////////////////////////////////////
AnyMuscleModel ExtensorHallucisLongus1Par =
{
 AnyFolder &MuscleParameters = .SubjectMusPar.ExtensorHallucisLongus;
 AnyIntVar MuscleElemNo = 1; ///< The number of this element of the muscle
 AnyIntVar MuscleElemAmount = MuscleParameters.MuscleElemAmount; ///< The total amount of elements for this muscle
 F0 = .SubjectMusPar.PCSAfactor*PCSA; //< Maximum force output at optimum fiber length
 Lf0 = MuscleParameters.OptimalFiberlength
       * cos(pi/180*MuscleParameters.Pennationangle);
 Vol0 = 1e-6*MuscleParameters.MuscleVolume/MuscleElemAmount; ///< Muscle volume in (m3)
 AnyVar PCSA = 1e4*Vol0/Lf0;///< PCSA (cm^2) is calculated as muscle volume divided between muscle branches, divided by fiber length and corrected for the pennation angle not used in the simple muscle model
};

AnyMuscleModel ExtensorHallucisLongus2Par =
{
 AnyFolder &MuscleParameters = .SubjectMusPar.ExtensorHallucisLongus;
 AnyIntVar MuscleElemNo = 2; ///< The number of this element of the muscle
 AnyIntVar MuscleElemAmount = MuscleParameters.MuscleElemAmount; ///< The total amount of elements for this muscle
 F0 = .SubjectMusPar.PCSAfactor*PCSA; //< Maximum force output at optimum fiber length
 Lf0 = MuscleParameters.OptimalFiberlength
       * cos(pi/180*MuscleParameters.Pennationangle);
 Vol0 = 1e-6*MuscleParameters.MuscleVolume/MuscleElemAmount; ///< Muscle volume in (m3)
 AnyVar PCSA = 1e4*Vol0/Lf0;///< PCSA (cm^2) is calculated as muscle volume divided between muscle branches, divided by fiber length and corrected for the pennation angle not used in the simple muscle model
};

AnyMuscleModel ExtensorHallucisLongus3Par =
{
 AnyFolder &MuscleParameters = .SubjectMusPar.ExtensorHallucisLongus;
 AnyIntVar MuscleElemNo = 3; ///< The number of this element of the muscle
 AnyIntVar MuscleElemAmount = MuscleParameters.MuscleElemAmount; ///< The total amount of elements for this muscle
 F0 = .SubjectMusPar.PCSAfactor*PCSA; //< Maximum force output at optimum fiber length
 Lf0 = MuscleParameters.OptimalFiberlength
       * cos(pi/180*MuscleParameters.Pennationangle);
 Vol0 = 1e-6*MuscleParameters.MuscleVolume/MuscleElemAmount; ///< Muscle volume in (m3)
 AnyVar PCSA = 1e4*Vol0/Lf0;///< PCSA (cm^2) is calculated as muscle volume divided between muscle branches, divided by fiber length and corrected for the pennation angle not used in the simple muscle model
};


////////////////////////////////////////////////
//     FlexorDigitorumLongus (4 elements)     //
////////////////////////////////////////////////
AnyMuscleModel FlexorDigitorumLongus1Par =
{
 AnyFolder &MuscleParameters = .SubjectMusPar.FlexorDigitorumLongus;
 AnyIntVar MuscleElemNo = 1; ///< The number of this element of the muscle
 AnyIntVar MuscleElemAmount = MuscleParameters.MuscleElemAmount; ///< The total amount of elements for this muscle
 F0 = .SubjectMusPar.PCSAfactor*PCSA; //< Maximum force output at optimum fiber length
 Lf0 = MuscleParameters.OptimalFiberlength
       * cos(pi/180*MuscleParameters.Pennationangle);
 Vol0 = 1e-6*MuscleParameters.MuscleVolume/MuscleElemAmount; ///< Muscle volume in (m3)
 AnyVar PCSA = 1e4*Vol0/Lf0;///< PCSA (cm^2) is calculated as muscle volume divided between muscle branches, divided by fiber length and corrected for the pennation angle not used in the simple muscle model
};

AnyMuscleModel FlexorDigitorumLongus2Par =
{
 AnyFolder &MuscleParameters = .SubjectMusPar.FlexorDigitorumLongus;
 AnyIntVar MuscleElemNo = 2; ///< The number of this element of the muscle
 AnyIntVar MuscleElemAmount = MuscleParameters.MuscleElemAmount; ///< The total amount of elements for this muscle
 F0 = .SubjectMusPar.PCSAfactor*PCSA; //< Maximum force output at optimum fiber length
 Lf0 = MuscleParameters.OptimalFiberlength
       * cos(pi/180*MuscleParameters.Pennationangle);
 Vol0 = 1e-6*MuscleParameters.MuscleVolume/MuscleElemAmount; ///< Muscle volume in (m3)
 AnyVar PCSA = 1e4*Vol0/Lf0;///< PCSA (cm^2) is calculated as muscle volume divided between muscle branches, divided by fiber length and corrected for the pennation angle not used in the simple muscle model
};

AnyMuscleModel FlexorDigitorumLongus3Par =
{
 AnyFolder &MuscleParameters = .SubjectMusPar.FlexorDigitorumLongus;
 AnyIntVar MuscleElemNo = 3; ///< The number of this element of the muscle
 AnyIntVar MuscleElemAmount = MuscleParameters.MuscleElemAmount; ///< The total amount of elements for this muscle
 F0 = .SubjectMusPar.PCSAfactor*PCSA; //< Maximum force output at optimum fiber length
 Lf0 = MuscleParameters.OptimalFiberlength
       * cos(pi/180*MuscleParameters.Pennationangle);
 Vol0 = 1e-6*MuscleParameters.MuscleVolume/MuscleElemAmount; ///< Muscle volume in (m3)
 AnyVar PCSA = 1e4*Vol0/Lf0;///< PCSA (cm^2) is calculated as muscle volume divided between muscle branches, divided by fiber length and corrected for the pennation angle not used in the simple muscle model
};

AnyMuscleModel FlexorDigitorumLongus4Par =
{
 AnyFolder &MuscleParameters = .SubjectMusPar.FlexorDigitorumLongus;
 AnyIntVar MuscleElemNo = 4; ///< The number of this element of the muscle
 AnyIntVar MuscleElemAmount = MuscleParameters.MuscleElemAmount; ///< The total amount of elements for this muscle
 F0 = .SubjectMusPar.PCSAfactor*PCSA; //< Maximum force output at optimum fiber length
 Lf0 = MuscleParameters.OptimalFiberlength
       * cos(pi/180*MuscleParameters.Pennationangle);
 Vol0 = 1e-6*MuscleParameters.MuscleVolume/MuscleElemAmount; ///< Muscle volume in (m3)
 AnyVar PCSA = 1e4*Vol0/Lf0;///< PCSA (cm^2) is calculated as muscle volume divided between muscle branches, divided by fiber length and corrected for the pennation angle not used in the simple muscle model
};


///////////////////////////////////////////////
//     FlexorHallucisLongus (3 elements)     //
///////////////////////////////////////////////
AnyMuscleModel FlexorHallucisLongus1Par =
{
 AnyFolder &MuscleParameters = .SubjectMusPar.FlexorHallucisLongus;
 AnyIntVar MuscleElemNo = 1; ///< The number of this element of the muscle
 AnyIntVar MuscleElemAmount = MuscleParameters.MuscleElemAmount; ///< The total amount of elements for this muscle
 F0 = .SubjectMusPar.PCSAfactor*PCSA; //< Maximum force output at optimum fiber length
 Lf0 = MuscleParameters.OptimalFiberlength
       * cos(pi/180*MuscleParameters.Pennationangle);
 Vol0 = 1e-6*MuscleParameters.MuscleVolume/MuscleElemAmount; ///< Muscle volume in (m3)
 AnyVar PCSA = 1e4*Vol0/Lf0;///< PCSA (cm^2) is calculated as muscle volume divided between muscle branches, divided by fiber length and corrected for the pennation angle not used in the simple muscle model
};

AnyMuscleModel FlexorHallucisLongus2Par =
{
 AnyFolder &MuscleParameters = .SubjectMusPar.FlexorHallucisLongus;
 AnyIntVar MuscleElemNo = 2; ///< The number of this element of the muscle
 AnyIntVar MuscleElemAmount = MuscleParameters.MuscleElemAmount; ///< The total amount of elements for this muscle
 F0 = .SubjectMusPar.PCSAfactor*PCSA; //< Maximum force output at optimum fiber length
 Lf0 = MuscleParameters.OptimalFiberlength
       * cos(pi/180*MuscleParameters.Pennationangle);
 Vol0 = 1e-6*MuscleParameters.MuscleVolume/MuscleElemAmount; ///< Muscle volume in (m3)
 AnyVar PCSA = 1e4*Vol0/Lf0;///< PCSA (cm^2) is calculated as muscle volume divided between muscle branches, divided by fiber length and corrected for the pennation angle not used in the simple muscle model
};

AnyMuscleModel FlexorHallucisLongus3Par =
{
 AnyFolder &MuscleParameters = .SubjectMusPar.FlexorHallucisLongus;
 AnyIntVar MuscleElemNo = 3; ///< The number of this element of the muscle
 AnyIntVar MuscleElemAmount = MuscleParameters.MuscleElemAmount; ///< The total amount of elements for this muscle
 F0 = .SubjectMusPar.PCSAfactor*PCSA; //< Maximum force output at optimum fiber length
 Lf0 = MuscleParameters.OptimalFiberlength
       * cos(pi/180*MuscleParameters.Pennationangle);
 Vol0 = 1e-6*MuscleParameters.MuscleVolume/MuscleElemAmount; ///< Muscle volume in (m3)
 AnyVar PCSA = 1e4*Vol0/Lf0;///< PCSA (cm^2) is calculated as muscle volume divided between muscle branches, divided by fiber length and corrected for the pennation angle not used in the simple muscle model
};


/////////////////////////////////////////////////
//     GastrocnemiusLateralis (1 element )     //
/////////////////////////////////////////////////
AnyMuscleModel GastrocnemiusLateralis1Par =
{
 AnyFolder &MuscleParameters = .SubjectMusPar.GastrocnemiusLateralis;
 AnyIntVar MuscleElemNo = 1; ///< The number of this element of the muscle
 AnyIntVar MuscleElemAmount = MuscleParameters.MuscleElemAmount; ///< The total amount of elements for this muscle
 F0 = .SubjectMusPar.PCSAfactor*PCSA; //< Maximum force output at optimum fiber length
 Lf0 = MuscleParameters.OptimalFiberlength
       * cos(pi/180*MuscleParameters.Pennationangle);
 Vol0 = 1e-6*MuscleParameters.MuscleVolume/MuscleElemAmount; ///< Muscle volume in (m3)
 AnyVar PCSA = 1e4*Vol0/Lf0;///< PCSA (cm^2) is calculated as muscle volume divided between muscle branches, divided by fiber length and corrected for the pennation angle not used in the simple muscle model
};


////////////////////////////////////////////////
//     GastrocnemiusMedialis (1 element )     //
////////////////////////////////////////////////
AnyMuscleModel GastrocnemiusMedialis1Par =
{
 AnyFolder &MuscleParameters = .SubjectMusPar.GastrocnemiusMedialis;
 AnyIntVar MuscleElemNo = 1; ///< The number of this element of the muscle
 AnyIntVar MuscleElemAmount = MuscleParameters.MuscleElemAmount; ///< The total amount of elements for this muscle
 F0 = .SubjectMusPar.PCSAfactor*PCSA; //< Maximum force output at optimum fiber length
 Lf0 = MuscleParameters.OptimalFiberlength
       * cos(pi/180*MuscleParameters.Pennationangle);
 Vol0 = 1e-6*MuscleParameters.MuscleVolume/MuscleElemAmount; ///< Muscle volume in (m3)
 AnyVar PCSA = 1e4*Vol0/Lf0;///< PCSA (cm^2) is calculated as muscle volume divided between muscle branches, divided by fiber length and corrected for the pennation angle not used in the simple muscle model
};


///////////////////////////////////////////
//     GemellusInferior (1 element )     //
///////////////////////////////////////////
AnyMuscleModel GemellusInferior1Par =
{
 AnyFolder &MuscleParameters = .SubjectMusPar.GemellusInferior;
 AnyIntVar MuscleElemNo = 1; ///< The number of this element of the muscle
 AnyIntVar MuscleElemAmount = MuscleParameters.MuscleElemAmount; ///< The total amount of elements for this muscle
 F0 = .SubjectMusPar.PCSAfactor*PCSA; //< Maximum force output at optimum fiber length
 Lf0 = MuscleParameters.OptimalFiberlength
       * cos(pi/180*MuscleParameters.Pennationangle);
 Vol0 = 1e-6*MuscleParameters.MuscleVolume/MuscleElemAmount; ///< Muscle volume in (m3)
 AnyVar PCSA = 1e4*Vol0/Lf0;///< PCSA (cm^2) is calculated as muscle volume divided between muscle branches, divided by fiber length and corrected for the pennation angle not used in the simple muscle model
};


///////////////////////////////////////////
//     GemellusSuperior (1 element )     //
///////////////////////////////////////////
AnyMuscleModel GemellusSuperior1Par =
{
 AnyFolder &MuscleParameters = .SubjectMusPar.GemellusSuperior;
 AnyIntVar MuscleElemNo = 1; ///< The number of this element of the muscle
 AnyIntVar MuscleElemAmount = MuscleParameters.MuscleElemAmount; ///< The total amount of elements for this muscle
 F0 = .SubjectMusPar.PCSAfactor*PCSA; //< Maximum force output at optimum fiber length
 Lf0 = MuscleParameters.OptimalFiberlength
       * cos(pi/180*MuscleParameters.Pennationangle);
 Vol0 = 1e-6*MuscleParameters.MuscleVolume/MuscleElemAmount; ///< Muscle volume in (m3)
 AnyVar PCSA = 1e4*Vol0/Lf0;///< PCSA (cm^2) is calculated as muscle volume divided between muscle branches, divided by fiber length and corrected for the pennation angle not used in the simple muscle model
};


/////////////////////////////////////////////////
//     GluteusMaximusSuperior (6 elements)     //
/////////////////////////////////////////////////
AnyMuscleModel GluteusMaximusSuperior1Par =
{
 AnyFolder &MuscleParameters = .SubjectMusPar.GluteusMaximusSuperior;
 AnyIntVar MuscleElemNo = 1; ///< The number of this element of the muscle
 AnyIntVar MuscleElemAmount = MuscleParameters.MuscleElemAmount; ///< The total amount of elements for this muscle
 F0 = .SubjectMusPar.PCSAfactor*PCSA; //< Maximum force output at optimum fiber length
 Lf0 = MuscleParameters.OptimalFiberlength
       * cos(pi/180*MuscleParameters.Pennationangle);
 Vol0 = 1e-6*MuscleParameters.MuscleVolume/MuscleElemAmount; ///< Muscle volume in (m3)
 AnyVar PCSA = 1e4*Vol0/Lf0;///< PCSA (cm^2) is calculated as muscle volume divided between muscle branches, divided by fiber length and corrected for the pennation angle not used in the simple muscle model
};

AnyMuscleModel GluteusMaximusSuperior2Par =
{
 AnyFolder &MuscleParameters = .SubjectMusPar.GluteusMaximusSuperior;
 AnyIntVar MuscleElemNo = 2; ///< The number of this element of the muscle
 AnyIntVar MuscleElemAmount = MuscleParameters.MuscleElemAmount; ///< The total amount of elements for this muscle
 F0 = .SubjectMusPar.PCSAfactor*PCSA; //< Maximum force output at optimum fiber length
 Lf0 = MuscleParameters.OptimalFiberlength
       * cos(pi/180*MuscleParameters.Pennationangle);
 Vol0 = 1e-6*MuscleParameters.MuscleVolume/MuscleElemAmount; ///< Muscle volume in (m3)
 AnyVar PCSA = 1e4*Vol0/Lf0;///< PCSA (cm^2) is calculated as muscle volume divided between muscle branches, divided by fiber length and corrected for the pennation angle not used in the simple muscle model
};

AnyMuscleModel GluteusMaximusSuperior3Par =
{
 AnyFolder &MuscleParameters = .SubjectMusPar.GluteusMaximusSuperior;
 AnyIntVar MuscleElemNo = 3; ///< The number of this element of the muscle
 AnyIntVar MuscleElemAmount = MuscleParameters.MuscleElemAmount; ///< The total amount of elements for this muscle
 F0 = .SubjectMusPar.PCSAfactor*PCSA; //< Maximum force output at optimum fiber length
 Lf0 = MuscleParameters.OptimalFiberlength
       * cos(pi/180*MuscleParameters.Pennationangle);
 Vol0 = 1e-6*MuscleParameters.MuscleVolume/MuscleElemAmount; ///< Muscle volume in (m3)
 AnyVar PCSA = 1e4*Vol0/Lf0;///< PCSA (cm^2) is calculated as muscle volume divided between muscle branches, divided by fiber length and corrected for the pennation angle not used in the simple muscle model
};

AnyMuscleModel GluteusMaximusSuperior4Par =
{
 AnyFolder &MuscleParameters = .SubjectMusPar.GluteusMaximusSuperior;
 AnyIntVar MuscleElemNo = 4; ///< The number of this element of the muscle
 AnyIntVar MuscleElemAmount = MuscleParameters.MuscleElemAmount; ///< The total amount of elements for this muscle
 F0 = .SubjectMusPar.PCSAfactor*PCSA; //< Maximum force output at optimum fiber length
 Lf0 = MuscleParameters.OptimalFiberlength
       * cos(pi/180*MuscleParameters.Pennationangle);
 Vol0 = 1e-6*MuscleParameters.MuscleVolume/MuscleElemAmount; ///< Muscle volume in (m3)
 AnyVar PCSA = 1e4*Vol0/Lf0;///< PCSA (cm^2) is calculated as muscle volume divided between muscle branches, divided by fiber length and corrected for the pennation angle not used in the simple muscle model
};

AnyMuscleModel GluteusMaximusSuperior5Par =
{
 AnyFolder &MuscleParameters = .SubjectMusPar.GluteusMaximusSuperior;
 AnyIntVar MuscleElemNo = 5; ///< The number of this element of the muscle
 AnyIntVar MuscleElemAmount = MuscleParameters.MuscleElemAmount; ///< The total amount of elements for this muscle
 F0 = .SubjectMusPar.PCSAfactor*PCSA; //< Maximum force output at optimum fiber length
 Lf0 = MuscleParameters.OptimalFiberlength
       * cos(pi/180*MuscleParameters.Pennationangle);
 Vol0 = 1e-6*MuscleParameters.MuscleVolume/MuscleElemAmount; ///< Muscle volume in (m3)
 AnyVar PCSA = 1e4*Vol0/Lf0;///< PCSA (cm^2) is calculated as muscle volume divided between muscle branches, divided by fiber length and corrected for the pennation angle not used in the simple muscle model
};

AnyMuscleModel GluteusMaximusSuperior6Par =
{
 AnyFolder &MuscleParameters = .SubjectMusPar.GluteusMaximusSuperior;
 AnyIntVar MuscleElemNo = 6; ///< The number of this element of the muscle
 AnyIntVar MuscleElemAmount = MuscleParameters.MuscleElemAmount; ///< The total amount of elements for this muscle
 F0 = .SubjectMusPar.PCSAfactor*PCSA; //< Maximum force output at optimum fiber length
 Lf0 = MuscleParameters.OptimalFiberlength
       * cos(pi/180*MuscleParameters.Pennationangle);
 Vol0 = 1e-6*MuscleParameters.MuscleVolume/MuscleElemAmount; ///< Muscle volume in (m3)
 AnyVar PCSA = 1e4*Vol0/Lf0;///< PCSA (cm^2) is calculated as muscle volume divided between muscle branches, divided by fiber length and corrected for the pennation angle not used in the simple muscle model
};


/////////////////////////////////////////////////
//     GluteusMaximusInferior (6 elements)     //
/////////////////////////////////////////////////
AnyMuscleModel GluteusMaximusInferior1Par =
{
 AnyFolder &MuscleParameters = .SubjectMusPar.GluteusMaximusInferior;
 AnyIntVar MuscleElemNo = 1; ///< The number of this element of the muscle
 AnyIntVar MuscleElemAmount = MuscleParameters.MuscleElemAmount; ///< The total amount of elements for this muscle
 F0 = .SubjectMusPar.PCSAfactor*PCSA; //< Maximum force output at optimum fiber length
 Lf0 = MuscleParameters.OptimalFiberlength
       * cos(pi/180*MuscleParameters.Pennationangle);
 Vol0 = 1e-6*MuscleParameters.MuscleVolume/MuscleElemAmount; ///< Muscle volume in (m3)
 AnyVar PCSA = 1e4*Vol0/Lf0;///< PCSA (cm^2) is calculated as muscle volume divided between muscle branches, divided by fiber length and corrected for the pennation angle not used in the simple muscle model
};

AnyMuscleModel GluteusMaximusInferior2Par =
{
 AnyFolder &MuscleParameters = .SubjectMusPar.GluteusMaximusInferior;
 AnyIntVar MuscleElemNo = 2; ///< The number of this element of the muscle
 AnyIntVar MuscleElemAmount = MuscleParameters.MuscleElemAmount; ///< The total amount of elements for this muscle
 F0 = .SubjectMusPar.PCSAfactor*PCSA; //< Maximum force output at optimum fiber length
 Lf0 = MuscleParameters.OptimalFiberlength
       * cos(pi/180*MuscleParameters.Pennationangle);
 Vol0 = 1e-6*MuscleParameters.MuscleVolume/MuscleElemAmount; ///< Muscle volume in (m3)
 AnyVar PCSA = 1e4*Vol0/Lf0;///< PCSA (cm^2) is calculated as muscle volume divided between muscle branches, divided by fiber length and corrected for the pennation angle not used in the simple muscle model
};

AnyMuscleModel GluteusMaximusInferior3Par =
{
 AnyFolder &MuscleParameters = .SubjectMusPar.GluteusMaximusInferior;
 AnyIntVar MuscleElemNo = 3; ///< The number of this element of the muscle
 AnyIntVar MuscleElemAmount = MuscleParameters.MuscleElemAmount; ///< The total amount of elements for this muscle
 F0 = .SubjectMusPar.PCSAfactor*PCSA; //< Maximum force output at optimum fiber length
 Lf0 = MuscleParameters.OptimalFiberlength
       * cos(pi/180*MuscleParameters.Pennationangle);
 Vol0 = 1e-6*MuscleParameters.MuscleVolume/MuscleElemAmount; ///< Muscle volume in (m3)
 AnyVar PCSA = 1e4*Vol0/Lf0;///< PCSA (cm^2) is calculated as muscle volume divided between muscle branches, divided by fiber length and corrected for the pennation angle not used in the simple muscle model
};

AnyMuscleModel GluteusMaximusInferior4Par =
{
 AnyFolder &MuscleParameters = .SubjectMusPar.GluteusMaximusInferior;
 AnyIntVar MuscleElemNo = 4; ///< The number of this element of the muscle
 AnyIntVar MuscleElemAmount = MuscleParameters.MuscleElemAmount; ///< The total amount of elements for this muscle
 F0 = .SubjectMusPar.PCSAfactor*PCSA; //< Maximum force output at optimum fiber length
 Lf0 = MuscleParameters.OptimalFiberlength
       * cos(pi/180*MuscleParameters.Pennationangle);
 Vol0 = 1e-6*MuscleParameters.MuscleVolume/MuscleElemAmount; ///< Muscle volume in (m3)
 AnyVar PCSA = 1e4*Vol0/Lf0;///< PCSA (cm^2) is calculated as muscle volume divided between muscle branches, divided by fiber length and corrected for the pennation angle not used in the simple muscle model
};

AnyMuscleModel GluteusMaximusInferior5Par =
{
 AnyFolder &MuscleParameters = .SubjectMusPar.GluteusMaximusInferior;
 AnyIntVar MuscleElemNo = 5; ///< The number of this element of the muscle
 AnyIntVar MuscleElemAmount = MuscleParameters.MuscleElemAmount; ///< The total amount of elements for this muscle
 F0 = .SubjectMusPar.PCSAfactor*PCSA; //< Maximum force output at optimum fiber length
 Lf0 = MuscleParameters.OptimalFiberlength
       * cos(pi/180*MuscleParameters.Pennationangle);
 Vol0 = 1e-6*MuscleParameters.MuscleVolume/MuscleElemAmount; ///< Muscle volume in (m3)
 AnyVar PCSA = 1e4*Vol0/Lf0;///< PCSA (cm^2) is calculated as muscle volume divided between muscle branches, divided by fiber length and corrected for the pennation angle not used in the simple muscle model
};

AnyMuscleModel GluteusMaximusInferior6Par =
{
 AnyFolder &MuscleParameters = .SubjectMusPar.GluteusMaximusInferior;
 AnyIntVar MuscleElemNo = 6; ///< The number of this element of the muscle
 AnyIntVar MuscleElemAmount = MuscleParameters.MuscleElemAmount; ///< The total amount of elements for this muscle
 F0 = .SubjectMusPar.PCSAfactor*PCSA; //< Maximum force output at optimum fiber length
 Lf0 = MuscleParameters.OptimalFiberlength
       * cos(pi/180*MuscleParameters.Pennationangle);
 Vol0 = 1e-6*MuscleParameters.MuscleVolume/MuscleElemAmount; ///< Muscle volume in (m3)
 AnyVar PCSA = 1e4*Vol0/Lf0;///< PCSA (cm^2) is calculated as muscle volume divided between muscle branches, divided by fiber length and corrected for the pennation angle not used in the simple muscle model
};


////////////////////////////////////////////////
//     GluteusMediusAnterior (6 elements)     //
////////////////////////////////////////////////
AnyMuscleModel GluteusMediusAnterior1Par =
{
 AnyFolder &MuscleParameters = .SubjectMusPar.GluteusMediusAnterior;
 AnyIntVar MuscleElemNo = 1; ///< The number of this element of the muscle
 AnyIntVar MuscleElemAmount = MuscleParameters.MuscleElemAmount; ///< The total amount of elements for this muscle
 F0 = .SubjectMusPar.PCSAfactor*PCSA; //< Maximum force output at optimum fiber length
 Lf0 = MuscleParameters.OptimalFiberlength
       * cos(pi/180*MuscleParameters.Pennationangle);
 Vol0 = 1e-6*MuscleParameters.MuscleVolume/MuscleElemAmount; ///< Muscle volume in (m3)
 AnyVar PCSA = 1e4*Vol0/Lf0;///< PCSA (cm^2) is calculated as muscle volume divided between muscle branches, divided by fiber length and corrected for the pennation angle not used in the simple muscle model
};

AnyMuscleModel GluteusMediusAnterior2Par =
{
 AnyFolder &MuscleParameters = .SubjectMusPar.GluteusMediusAnterior;
 AnyIntVar MuscleElemNo = 2; ///< The number of this element of the muscle
 AnyIntVar MuscleElemAmount = MuscleParameters.MuscleElemAmount; ///< The total amount of elements for this muscle
 F0 = .SubjectMusPar.PCSAfactor*PCSA; //< Maximum force output at optimum fiber length
 Lf0 = MuscleParameters.OptimalFiberlength
       * cos(pi/180*MuscleParameters.Pennationangle);
 Vol0 = 1e-6*MuscleParameters.MuscleVolume/MuscleElemAmount; ///< Muscle volume in (m3)
 AnyVar PCSA = 1e4*Vol0/Lf0;///< PCSA (cm^2) is calculated as muscle volume divided between muscle branches, divided by fiber length and corrected for the pennation angle not used in the simple muscle model
};

AnyMuscleModel GluteusMediusAnterior3Par =
{
 AnyFolder &MuscleParameters = .SubjectMusPar.GluteusMediusAnterior;
 AnyIntVar MuscleElemNo = 3; ///< The number of this element of the muscle
 AnyIntVar MuscleElemAmount = MuscleParameters.MuscleElemAmount; ///< The total amount of elements for this muscle
 F0 = .SubjectMusPar.PCSAfactor*PCSA; //< Maximum force output at optimum fiber length
 Lf0 = MuscleParameters.OptimalFiberlength
       * cos(pi/180*MuscleParameters.Pennationangle);
 Vol0 = 1e-6*MuscleParameters.MuscleVolume/MuscleElemAmount; ///< Muscle volume in (m3)
 AnyVar PCSA = 1e4*Vol0/Lf0;///< PCSA (cm^2) is calculated as muscle volume divided between muscle branches, divided by fiber length and corrected for the pennation angle not used in the simple muscle model
};

AnyMuscleModel GluteusMediusAnterior4Par =
{
 AnyFolder &MuscleParameters = .SubjectMusPar.GluteusMediusAnterior;
 AnyIntVar MuscleElemNo = 4; ///< The number of this element of the muscle
 AnyIntVar MuscleElemAmount = MuscleParameters.MuscleElemAmount; ///< The total amount of elements for this muscle
 F0 = .SubjectMusPar.PCSAfactor*PCSA; //< Maximum force output at optimum fiber length
 Lf0 = MuscleParameters.OptimalFiberlength
       * cos(pi/180*MuscleParameters.Pennationangle);
 Vol0 = 1e-6*MuscleParameters.MuscleVolume/MuscleElemAmount; ///< Muscle volume in (m3)
 AnyVar PCSA = 1e4*Vol0/Lf0;///< PCSA (cm^2) is calculated as muscle volume divided between muscle branches, divided by fiber length and corrected for the pennation angle not used in the simple muscle model
};

AnyMuscleModel GluteusMediusAnterior5Par =
{
 AnyFolder &MuscleParameters = .SubjectMusPar.GluteusMediusAnterior;
 AnyIntVar MuscleElemNo = 5; ///< The number of this element of the muscle
 AnyIntVar MuscleElemAmount = MuscleParameters.MuscleElemAmount; ///< The total amount of elements for this muscle
 F0 = .SubjectMusPar.PCSAfactor*PCSA; //< Maximum force output at optimum fiber length
 Lf0 = MuscleParameters.OptimalFiberlength
       * cos(pi/180*MuscleParameters.Pennationangle);
 Vol0 = 1e-6*MuscleParameters.MuscleVolume/MuscleElemAmount; ///< Muscle volume in (m3)
 AnyVar PCSA = 1e4*Vol0/Lf0;///< PCSA (cm^2) is calculated as muscle volume divided between muscle branches, divided by fiber length and corrected for the pennation angle not used in the simple muscle model
};

AnyMuscleModel GluteusMediusAnterior6Par =
{
 AnyFolder &MuscleParameters = .SubjectMusPar.GluteusMediusAnterior;
 AnyIntVar MuscleElemNo = 6; ///< The number of this element of the muscle
 AnyIntVar MuscleElemAmount = MuscleParameters.MuscleElemAmount; ///< The total amount of elements for this muscle
 F0 = .SubjectMusPar.PCSAfactor*PCSA; //< Maximum force output at optimum fiber length
 Lf0 = MuscleParameters.OptimalFiberlength
       * cos(pi/180*MuscleParameters.Pennationangle);
 Vol0 = 1e-6*MuscleParameters.MuscleVolume/MuscleElemAmount; ///< Muscle volume in (m3)
 AnyVar PCSA = 1e4*Vol0/Lf0;///< PCSA (cm^2) is calculated as muscle volume divided between muscle branches, divided by fiber length and corrected for the pennation angle not used in the simple muscle model
};


/////////////////////////////////////////////////
//     GluteusMediusPosterior (6 elements)     //
/////////////////////////////////////////////////
AnyMuscleModel GluteusMediusPosterior1Par =
{
 AnyFolder &MuscleParameters = .SubjectMusPar.GluteusMediusPosterior;
 AnyIntVar MuscleElemNo = 1; ///< The number of this element of the muscle
 AnyIntVar MuscleElemAmount = MuscleParameters.MuscleElemAmount; ///< The total amount of elements for this muscle
 F0 = .SubjectMusPar.PCSAfactor*PCSA; //< Maximum force output at optimum fiber length
 Lf0 = MuscleParameters.OptimalFiberlength
       * cos(pi/180*MuscleParameters.Pennationangle);
 Vol0 = 1e-6*MuscleParameters.MuscleVolume/MuscleElemAmount; ///< Muscle volume in (m3)
 AnyVar PCSA = 1e4*Vol0/Lf0;///< PCSA (cm^2) is calculated as muscle volume divided between muscle branches, divided by fiber length and corrected for the pennation angle not used in the simple muscle model
};

AnyMuscleModel GluteusMediusPosterior2Par =
{
 AnyFolder &MuscleParameters = .SubjectMusPar.GluteusMediusPosterior;
 AnyIntVar MuscleElemNo = 2; ///< The number of this element of the muscle
 AnyIntVar MuscleElemAmount = MuscleParameters.MuscleElemAmount; ///< The total amount of elements for this muscle
 F0 = .SubjectMusPar.PCSAfactor*PCSA; //< Maximum force output at optimum fiber length
 Lf0 = MuscleParameters.OptimalFiberlength
       * cos(pi/180*MuscleParameters.Pennationangle);
 Vol0 = 1e-6*MuscleParameters.MuscleVolume/MuscleElemAmount; ///< Muscle volume in (m3)
 AnyVar PCSA = 1e4*Vol0/Lf0;///< PCSA (cm^2) is calculated as muscle volume divided between muscle branches, divided by fiber length and corrected for the pennation angle not used in the simple muscle model
};

AnyMuscleModel GluteusMediusPosterior3Par =
{
 AnyFolder &MuscleParameters = .SubjectMusPar.GluteusMediusPosterior;
 AnyIntVar MuscleElemNo = 3; ///< The number of this element of the muscle
 AnyIntVar MuscleElemAmount = MuscleParameters.MuscleElemAmount; ///< The total amount of elements for this muscle
 F0 = .SubjectMusPar.PCSAfactor*PCSA; //< Maximum force output at optimum fiber length
 Lf0 = MuscleParameters.OptimalFiberlength
       * cos(pi/180*MuscleParameters.Pennationangle);
 Vol0 = 1e-6*MuscleParameters.MuscleVolume/MuscleElemAmount; ///< Muscle volume in (m3)
 AnyVar PCSA = 1e4*Vol0/Lf0;///< PCSA (cm^2) is calculated as muscle volume divided between muscle branches, divided by fiber length and corrected for the pennation angle not used in the simple muscle model
};

AnyMuscleModel GluteusMediusPosterior4Par =
{
 AnyFolder &MuscleParameters = .SubjectMusPar.GluteusMediusPosterior;
 AnyIntVar MuscleElemNo = 4; ///< The number of this element of the muscle
 AnyIntVar MuscleElemAmount = MuscleParameters.MuscleElemAmount; ///< The total amount of elements for this muscle
 F0 = .SubjectMusPar.PCSAfactor*PCSA; //< Maximum force output at optimum fiber length
 Lf0 = MuscleParameters.OptimalFiberlength
       * cos(pi/180*MuscleParameters.Pennationangle);
 Vol0 = 1e-6*MuscleParameters.MuscleVolume/MuscleElemAmount; ///< Muscle volume in (m3)
 AnyVar PCSA = 1e4*Vol0/Lf0;///< PCSA (cm^2) is calculated as muscle volume divided between muscle branches, divided by fiber length and corrected for the pennation angle not used in the simple muscle model
};

AnyMuscleModel GluteusMediusPosterior5Par =
{
 AnyFolder &MuscleParameters = .SubjectMusPar.GluteusMediusPosterior;
 AnyIntVar MuscleElemNo = 5; ///< The number of this element of the muscle
 AnyIntVar MuscleElemAmount = MuscleParameters.MuscleElemAmount; ///< The total amount of elements for this muscle
 F0 = .SubjectMusPar.PCSAfactor*PCSA; //< Maximum force output at optimum fiber length
 Lf0 = MuscleParameters.OptimalFiberlength
       * cos(pi/180*MuscleParameters.Pennationangle);
 Vol0 = 1e-6*MuscleParameters.MuscleVolume/MuscleElemAmount; ///< Muscle volume in (m3)
 AnyVar PCSA = 1e4*Vol0/Lf0;///< PCSA (cm^2) is calculated as muscle volume divided between muscle branches, divided by fiber length and corrected for the pennation angle not used in the simple muscle model
};

AnyMuscleModel GluteusMediusPosterior6Par =
{
 AnyFolder &MuscleParameters = .SubjectMusPar.GluteusMediusPosterior;
 AnyIntVar MuscleElemNo = 6; ///< The number of this element of the muscle
 AnyIntVar MuscleElemAmount = MuscleParameters.MuscleElemAmount; ///< The total amount of elements for this muscle
 F0 = .SubjectMusPar.PCSAfactor*PCSA; //< Maximum force output at optimum fiber length
 Lf0 = MuscleParameters.OptimalFiberlength
       * cos(pi/180*MuscleParameters.Pennationangle);
 Vol0 = 1e-6*MuscleParameters.MuscleVolume/MuscleElemAmount; ///< Muscle volume in (m3)
 AnyVar PCSA = 1e4*Vol0/Lf0;///< PCSA (cm^2) is calculated as muscle volume divided between muscle branches, divided by fiber length and corrected for the pennation angle not used in the simple muscle model
};


/////////////////////////////////////////////////
//     GluteusMinimusAnterior (1 element )     //
/////////////////////////////////////////////////
AnyMuscleModel GluteusMinimusAnterior1Par =
{
 AnyFolder &MuscleParameters = .SubjectMusPar.GluteusMinimusAnterior;
 AnyIntVar MuscleElemNo = 1; ///< The number of this element of the muscle
 AnyIntVar MuscleElemAmount = MuscleParameters.MuscleElemAmount; ///< The total amount of elements for this muscle
 F0 = .SubjectMusPar.PCSAfactor*PCSA; //< Maximum force output at optimum fiber length
 Lf0 = MuscleParameters.OptimalFiberlength
       * cos(pi/180*MuscleParameters.Pennationangle);
 Vol0 = 1e-6*MuscleParameters.MuscleVolume/MuscleElemAmount; ///< Muscle volume in (m3)
 AnyVar PCSA = 1e4*Vol0/Lf0;///< PCSA (cm^2) is calculated as muscle volume divided between muscle branches, divided by fiber length and corrected for the pennation angle not used in the simple muscle model
};


////////////////////////////////////////////
//     GluteusMinimusMid (1 element )     //
////////////////////////////////////////////
AnyMuscleModel GluteusMinimusMid1Par =
{
 AnyFolder &MuscleParameters = .SubjectMusPar.GluteusMinimusMid;
 AnyIntVar MuscleElemNo = 1; ///< The number of this element of the muscle
 AnyIntVar MuscleElemAmount = MuscleParameters.MuscleElemAmount; ///< The total amount of elements for this muscle
 F0 = .SubjectMusPar.PCSAfactor*PCSA; //< Maximum force output at optimum fiber length
 Lf0 = MuscleParameters.OptimalFiberlength
       * cos(pi/180*MuscleParameters.Pennationangle);
 Vol0 = 1e-6*MuscleParameters.MuscleVolume/MuscleElemAmount; ///< Muscle volume in (m3)
 AnyVar PCSA = 1e4*Vol0/Lf0;///< PCSA (cm^2) is calculated as muscle volume divided between muscle branches, divided by fiber length and corrected for the pennation angle not used in the simple muscle model
};


//////////////////////////////////////////////////
//     GluteusMinimusPosterior (1 element )     //
//////////////////////////////////////////////////
AnyMuscleModel GluteusMinimusPosterior1Par =
{
 AnyFolder &MuscleParameters = .SubjectMusPar.GluteusMinimusPosterior;
 AnyIntVar MuscleElemNo = 1; ///< The number of this element of the muscle
 AnyIntVar MuscleElemAmount = MuscleParameters.MuscleElemAmount; ///< The total amount of elements for this muscle
 F0 = .SubjectMusPar.PCSAfactor*PCSA; //< Maximum force output at optimum fiber length
 Lf0 = MuscleParameters.OptimalFiberlength
       * cos(pi/180*MuscleParameters.Pennationangle);
 Vol0 = 1e-6*MuscleParameters.MuscleVolume/MuscleElemAmount; ///< Muscle volume in (m3)
 AnyVar PCSA = 1e4*Vol0/Lf0;///< PCSA (cm^2) is calculated as muscle volume divided between muscle branches, divided by fiber length and corrected for the pennation angle not used in the simple muscle model
};


///////////////////////////////////
//     Gracilis (2 elements)     //
///////////////////////////////////
AnyMuscleModel Gracilis1Par =
{
 AnyFolder &MuscleParameters = .SubjectMusPar.Gracilis;
 AnyIntVar MuscleElemNo = 1; ///< The number of this element of the muscle
 AnyIntVar MuscleElemAmount = MuscleParameters.MuscleElemAmount; ///< The total amount of elements for this muscle
 F0 = .SubjectMusPar.PCSAfactor*PCSA; //< Maximum force output at optimum fiber length
 Lf0 = MuscleParameters.OptimalFiberlength
       * cos(pi/180*MuscleParameters.Pennationangle);
 Vol0 = 1e-6*MuscleParameters.MuscleVolume/MuscleElemAmount; ///< Muscle volume in (m3)
 AnyVar PCSA = 1e4*Vol0/Lf0;///< PCSA (cm^2) is calculated as muscle volume divided between muscle branches, divided by fiber length and corrected for the pennation angle not used in the simple muscle model
};

AnyMuscleModel Gracilis2Par =
{
 AnyFolder &MuscleParameters = .SubjectMusPar.Gracilis;
 AnyIntVar MuscleElemNo = 2; ///< The number of this element of the muscle
 AnyIntVar MuscleElemAmount = MuscleParameters.MuscleElemAmount; ///< The total amount of elements for this muscle
 F0 = .SubjectMusPar.PCSAfactor*PCSA; //< Maximum force output at optimum fiber length
 Lf0 = MuscleParameters.OptimalFiberlength
       * cos(pi/180*MuscleParameters.Pennationangle);
 Vol0 = 1e-6*MuscleParameters.MuscleVolume/MuscleElemAmount; ///< Muscle volume in (m3)
 AnyVar PCSA = 1e4*Vol0/Lf0;///< PCSA (cm^2) is calculated as muscle volume divided between muscle branches, divided by fiber length and corrected for the pennation angle not used in the simple muscle model
};


///////////////////////////////////////////
//     IliacusLateralis (3 elements)     //
///////////////////////////////////////////
AnyMuscleModel IliacusLateralis1Par =
{
 AnyFolder &MuscleParameters = .SubjectMusPar.IliacusLateralis;
 AnyIntVar MuscleElemNo = 1; ///< The number of this element of the muscle
 AnyIntVar MuscleElemAmount = MuscleParameters.MuscleElemAmount; ///< The total amount of elements for this muscle
 F0 = .SubjectMusPar.PCSAfactor*PCSA; //< Maximum force output at optimum fiber length
 Lf0 = MuscleParameters.OptimalFiberlength
       * cos(pi/180*MuscleParameters.Pennationangle);
 Vol0 = 1e-6*MuscleParameters.MuscleVolume/MuscleElemAmount; ///< Muscle volume in (m3)
 AnyVar PCSA = 1e4*Vol0/Lf0;///< PCSA (cm^2) is calculated as muscle volume divided between muscle branches, divided by fiber length and corrected for the pennation angle not used in the simple muscle model
};

AnyMuscleModel IliacusLateralis2Par =
{
 AnyFolder &MuscleParameters = .SubjectMusPar.IliacusLateralis;
 AnyIntVar MuscleElemNo = 2; ///< The number of this element of the muscle
 AnyIntVar MuscleElemAmount = MuscleParameters.MuscleElemAmount; ///< The total amount of elements for this muscle
 F0 = .SubjectMusPar.PCSAfactor*PCSA; //< Maximum force output at optimum fiber length
 Lf0 = MuscleParameters.OptimalFiberlength
       * cos(pi/180*MuscleParameters.Pennationangle);
 Vol0 = 1e-6*MuscleParameters.MuscleVolume/MuscleElemAmount; ///< Muscle volume in (m3)
 AnyVar PCSA = 1e4*Vol0/Lf0;///< PCSA (cm^2) is calculated as muscle volume divided between muscle branches, divided by fiber length and corrected for the pennation angle not used in the simple muscle model
};

AnyMuscleModel IliacusLateralis3Par =
{
 AnyFolder &MuscleParameters = .SubjectMusPar.IliacusLateralis;
 AnyIntVar MuscleElemNo = 3; ///< The number of this element of the muscle
 AnyIntVar MuscleElemAmount = MuscleParameters.MuscleElemAmount; ///< The total amount of elements for this muscle
 F0 = .SubjectMusPar.PCSAfactor*PCSA; //< Maximum force output at optimum fiber length
 Lf0 = MuscleParameters.OptimalFiberlength
       * cos(pi/180*MuscleParameters.Pennationangle);
 Vol0 = 1e-6*MuscleParameters.MuscleVolume/MuscleElemAmount; ///< Muscle volume in (m3)
 AnyVar PCSA = 1e4*Vol0/Lf0;///< PCSA (cm^2) is calculated as muscle volume divided between muscle branches, divided by fiber length and corrected for the pennation angle not used in the simple muscle model
};


/////////////////////////////////////
//     IliacusMid (3 elements)     //
/////////////////////////////////////
AnyMuscleModel IliacusMid1Par =
{
 AnyFolder &MuscleParameters = .SubjectMusPar.IliacusMid;
 AnyIntVar MuscleElemNo = 1; ///< The number of this element of the muscle
 AnyIntVar MuscleElemAmount = MuscleParameters.MuscleElemAmount; ///< The total amount of elements for this muscle
 F0 = .SubjectMusPar.PCSAfactor*PCSA; //< Maximum force output at optimum fiber length
 Lf0 = MuscleParameters.OptimalFiberlength
       * cos(pi/180*MuscleParameters.Pennationangle);
 Vol0 = 1e-6*MuscleParameters.MuscleVolume/MuscleElemAmount; ///< Muscle volume in (m3)
 AnyVar PCSA = 1e4*Vol0/Lf0;///< PCSA (cm^2) is calculated as muscle volume divided between muscle branches, divided by fiber length and corrected for the pennation angle not used in the simple muscle model
};

AnyMuscleModel IliacusMid2Par =
{
 AnyFolder &MuscleParameters = .SubjectMusPar.IliacusMid;
 AnyIntVar MuscleElemNo = 2; ///< The number of this element of the muscle
 AnyIntVar MuscleElemAmount = MuscleParameters.MuscleElemAmount; ///< The total amount of elements for this muscle
 F0 = .SubjectMusPar.PCSAfactor*PCSA; //< Maximum force output at optimum fiber length
 Lf0 = MuscleParameters.OptimalFiberlength
       * cos(pi/180*MuscleParameters.Pennationangle);
 Vol0 = 1e-6*MuscleParameters.MuscleVolume/MuscleElemAmount; ///< Muscle volume in (m3)
 AnyVar PCSA = 1e4*Vol0/Lf0;///< PCSA (cm^2) is calculated as muscle volume divided between muscle branches, divided by fiber length and corrected for the pennation angle not used in the simple muscle model
};

AnyMuscleModel IliacusMid3Par =
{
 AnyFolder &MuscleParameters = .SubjectMusPar.IliacusMid;
 AnyIntVar MuscleElemNo = 3; ///< The number of this element of the muscle
 AnyIntVar MuscleElemAmount = MuscleParameters.MuscleElemAmount; ///< The total amount of elements for this muscle
 F0 = .SubjectMusPar.PCSAfactor*PCSA; //< Maximum force output at optimum fiber length
 Lf0 = MuscleParameters.OptimalFiberlength
       * cos(pi/180*MuscleParameters.Pennationangle);
 Vol0 = 1e-6*MuscleParameters.MuscleVolume/MuscleElemAmount; ///< Muscle volume in (m3)
 AnyVar PCSA = 1e4*Vol0/Lf0;///< PCSA (cm^2) is calculated as muscle volume divided between muscle branches, divided by fiber length and corrected for the pennation angle not used in the simple muscle model
};


//////////////////////////////////////////
//     IliacusMedialis (3 elements)     //
//////////////////////////////////////////
AnyMuscleModel IliacusMedialis1Par =
{
 AnyFolder &MuscleParameters = .SubjectMusPar.IliacusMedialis;
 AnyIntVar MuscleElemNo = 1; ///< The number of this element of the muscle
 AnyIntVar MuscleElemAmount = MuscleParameters.MuscleElemAmount; ///< The total amount of elements for this muscle
 F0 = .SubjectMusPar.PCSAfactor*PCSA; //< Maximum force output at optimum fiber length
 Lf0 = MuscleParameters.OptimalFiberlength
       * cos(pi/180*MuscleParameters.Pennationangle);
 Vol0 = 1e-6*MuscleParameters.MuscleVolume/MuscleElemAmount; ///< Muscle volume in (m3)
 AnyVar PCSA = 1e4*Vol0/Lf0;///< PCSA (cm^2) is calculated as muscle volume divided between muscle branches, divided by fiber length and corrected for the pennation angle not used in the simple muscle model
};

AnyMuscleModel IliacusMedialis2Par =
{
 AnyFolder &MuscleParameters = .SubjectMusPar.IliacusMedialis;
 AnyIntVar MuscleElemNo = 2; ///< The number of this element of the muscle
 AnyIntVar MuscleElemAmount = MuscleParameters.MuscleElemAmount; ///< The total amount of elements for this muscle
 F0 = .SubjectMusPar.PCSAfactor*PCSA; //< Maximum force output at optimum fiber length
 Lf0 = MuscleParameters.OptimalFiberlength
       * cos(pi/180*MuscleParameters.Pennationangle);
 Vol0 = 1e-6*MuscleParameters.MuscleVolume/MuscleElemAmount; ///< Muscle volume in (m3)
 AnyVar PCSA = 1e4*Vol0/Lf0;///< PCSA (cm^2) is calculated as muscle volume divided between muscle branches, divided by fiber length and corrected for the pennation angle not used in the simple muscle model
};

AnyMuscleModel IliacusMedialis3Par =
{
 AnyFolder &MuscleParameters = .SubjectMusPar.IliacusMedialis;
 AnyIntVar MuscleElemNo = 3; ///< The number of this element of the muscle
 AnyIntVar MuscleElemAmount = MuscleParameters.MuscleElemAmount; ///< The total amount of elements for this muscle
 F0 = .SubjectMusPar.PCSAfactor*PCSA; //< Maximum force output at optimum fiber length
 Lf0 = MuscleParameters.OptimalFiberlength
       * cos(pi/180*MuscleParameters.Pennationangle);
 Vol0 = 1e-6*MuscleParameters.MuscleVolume/MuscleElemAmount; ///< Muscle volume in (m3)
 AnyVar PCSA = 1e4*Vol0/Lf0;///< PCSA (cm^2) is calculated as muscle volume divided between muscle branches, divided by fiber length and corrected for the pennation angle not used in the simple muscle model
};


////////////////////////////////////////////////////
//     ObturatorExternusInferior (2 elements)     //
////////////////////////////////////////////////////
AnyMuscleModel ObturatorExternusInferior1Par =
{
 AnyFolder &MuscleParameters = .SubjectMusPar.ObturatorExternusInferior;
 AnyIntVar MuscleElemNo = 1; ///< The number of this element of the muscle
 AnyIntVar MuscleElemAmount = MuscleParameters.MuscleElemAmount; ///< The total amount of elements for this muscle
 F0 = .SubjectMusPar.PCSAfactor*PCSA; //< Maximum force output at optimum fiber length
 Lf0 = MuscleParameters.OptimalFiberlength
       * cos(pi/180*MuscleParameters.Pennationangle);
 Vol0 = 1e-6*MuscleParameters.MuscleVolume/MuscleElemAmount; ///< Muscle volume in (m3)
 AnyVar PCSA = 1e4*Vol0/Lf0;///< PCSA (cm^2) is calculated as muscle volume divided between muscle branches, divided by fiber length and corrected for the pennation angle not used in the simple muscle model
};

AnyMuscleModel ObturatorExternusInferior2Par =
{
 AnyFolder &MuscleParameters = .SubjectMusPar.ObturatorExternusInferior;
 AnyIntVar MuscleElemNo = 2; ///< The number of this element of the muscle
 AnyIntVar MuscleElemAmount = MuscleParameters.MuscleElemAmount; ///< The total amount of elements for this muscle
 F0 = .SubjectMusPar.PCSAfactor*PCSA; //< Maximum force output at optimum fiber length
 Lf0 = MuscleParameters.OptimalFiberlength
       * cos(pi/180*MuscleParameters.Pennationangle);
 Vol0 = 1e-6*MuscleParameters.MuscleVolume/MuscleElemAmount; ///< Muscle volume in (m3)
 AnyVar PCSA = 1e4*Vol0/Lf0;///< PCSA (cm^2) is calculated as muscle volume divided between muscle branches, divided by fiber length and corrected for the pennation angle not used in the simple muscle model
};


////////////////////////////////////////////////////
//     ObturatorExternusSuperior (3 elements)     //
////////////////////////////////////////////////////
AnyMuscleModel ObturatorExternusSuperior1Par =
{
 AnyFolder &MuscleParameters = .SubjectMusPar.ObturatorExternusSuperior;
 AnyIntVar MuscleElemNo = 1; ///< The number of this element of the muscle
 AnyIntVar MuscleElemAmount = MuscleParameters.MuscleElemAmount; ///< The total amount of elements for this muscle
 F0 = .SubjectMusPar.PCSAfactor*PCSA; //< Maximum force output at optimum fiber length
 Lf0 = MuscleParameters.OptimalFiberlength
       * cos(pi/180*MuscleParameters.Pennationangle);
 Vol0 = 1e-6*MuscleParameters.MuscleVolume/MuscleElemAmount; ///< Muscle volume in (m3)
 AnyVar PCSA = 1e4*Vol0/Lf0;///< PCSA (cm^2) is calculated as muscle volume divided between muscle branches, divided by fiber length and corrected for the pennation angle not used in the simple muscle model
};

AnyMuscleModel ObturatorExternusSuperior2Par =
{
 AnyFolder &MuscleParameters = .SubjectMusPar.ObturatorExternusSuperior;
 AnyIntVar MuscleElemNo = 2; ///< The number of this element of the muscle
 AnyIntVar MuscleElemAmount = MuscleParameters.MuscleElemAmount; ///< The total amount of elements for this muscle
 F0 = .SubjectMusPar.PCSAfactor*PCSA; //< Maximum force output at optimum fiber length
 Lf0 = MuscleParameters.OptimalFiberlength
       * cos(pi/180*MuscleParameters.Pennationangle);
 Vol0 = 1e-6*MuscleParameters.MuscleVolume/MuscleElemAmount; ///< Muscle volume in (m3)
 AnyVar PCSA = 1e4*Vol0/Lf0;///< PCSA (cm^2) is calculated as muscle volume divided between muscle branches, divided by fiber length and corrected for the pennation angle not used in the simple muscle model
};

AnyMuscleModel ObturatorExternusSuperior3Par =
{
 AnyFolder &MuscleParameters = .SubjectMusPar.ObturatorExternusSuperior;
 AnyIntVar MuscleElemNo = 3; ///< The number of this element of the muscle
 AnyIntVar MuscleElemAmount = MuscleParameters.MuscleElemAmount; ///< The total amount of elements for this muscle
 F0 = .SubjectMusPar.PCSAfactor*PCSA; //< Maximum force output at optimum fiber length
 Lf0 = MuscleParameters.OptimalFiberlength
       * cos(pi/180*MuscleParameters.Pennationangle);
 Vol0 = 1e-6*MuscleParameters.MuscleVolume/MuscleElemAmount; ///< Muscle volume in (m3)
 AnyVar PCSA = 1e4*Vol0/Lf0;///< PCSA (cm^2) is calculated as muscle volume divided between muscle branches, divided by fiber length and corrected for the pennation angle not used in the simple muscle model
};


////////////////////////////////////////////
//     ObturatorInternus (6 elements)     //
////////////////////////////////////////////
AnyMuscleModel ObturatorInternus1Par =
{
 AnyFolder &MuscleParameters = .SubjectMusPar.ObturatorInternus;
 AnyIntVar MuscleElemNo = 1; ///< The number of this element of the muscle
 AnyIntVar MuscleElemAmount = MuscleParameters.MuscleElemAmount; ///< The total amount of elements for this muscle
 F0 = .SubjectMusPar.PCSAfactor*PCSA; //< Maximum force output at optimum fiber length
 Lf0 = MuscleParameters.OptimalFiberlength
       * cos(pi/180*MuscleParameters.Pennationangle);
 Vol0 = 1e-6*MuscleParameters.MuscleVolume/MuscleElemAmount; ///< Muscle volume in (m3)
 AnyVar PCSA = 1e4*Vol0/Lf0;///< PCSA (cm^2) is calculated as muscle volume divided between muscle branches, divided by fiber length and corrected for the pennation angle not used in the simple muscle model
};

AnyMuscleModel ObturatorInternus2Par =
{
 AnyFolder &MuscleParameters = .SubjectMusPar.ObturatorInternus;
 AnyIntVar MuscleElemNo = 2; ///< The number of this element of the muscle
 AnyIntVar MuscleElemAmount = MuscleParameters.MuscleElemAmount; ///< The total amount of elements for this muscle
 F0 = .SubjectMusPar.PCSAfactor*PCSA; //< Maximum force output at optimum fiber length
 Lf0 = MuscleParameters.OptimalFiberlength
       * cos(pi/180*MuscleParameters.Pennationangle);
 Vol0 = 1e-6*MuscleParameters.MuscleVolume/MuscleElemAmount; ///< Muscle volume in (m3)
 AnyVar PCSA = 1e4*Vol0/Lf0;///< PCSA (cm^2) is calculated as muscle volume divided between muscle branches, divided by fiber length and corrected for the pennation angle not used in the simple muscle model
};

AnyMuscleModel ObturatorInternus3Par =
{
 AnyFolder &MuscleParameters = .SubjectMusPar.ObturatorInternus;
 AnyIntVar MuscleElemNo = 3; ///< The number of this element of the muscle
 AnyIntVar MuscleElemAmount = MuscleParameters.MuscleElemAmount; ///< The total amount of elements for this muscle
 F0 = .SubjectMusPar.PCSAfactor*PCSA; //< Maximum force output at optimum fiber length
 Lf0 = MuscleParameters.OptimalFiberlength
       * cos(pi/180*MuscleParameters.Pennationangle);
 Vol0 = 1e-6*MuscleParameters.MuscleVolume/MuscleElemAmount; ///< Muscle volume in (m3)
 AnyVar PCSA = 1e4*Vol0/Lf0;///< PCSA (cm^2) is calculated as muscle volume divided between muscle branches, divided by fiber length and corrected for the pennation angle not used in the simple muscle model
};

AnyMuscleModel ObturatorInternus4Par =
{
 AnyFolder &MuscleParameters = .SubjectMusPar.ObturatorInternus;
 AnyIntVar MuscleElemNo = 4; ///< The number of this element of the muscle
 AnyIntVar MuscleElemAmount = MuscleParameters.MuscleElemAmount; ///< The total amount of elements for this muscle
 F0 = .SubjectMusPar.PCSAfactor*PCSA; //< Maximum force output at optimum fiber length
 Lf0 = MuscleParameters.OptimalFiberlength
       * cos(pi/180*MuscleParameters.Pennationangle);
 Vol0 = 1e-6*MuscleParameters.MuscleVolume/MuscleElemAmount; ///< Muscle volume in (m3)
 AnyVar PCSA = 1e4*Vol0/Lf0;///< PCSA (cm^2) is calculated as muscle volume divided between muscle branches, divided by fiber length and corrected for the pennation angle not used in the simple muscle model
};

AnyMuscleModel ObturatorInternus5Par =
{
 AnyFolder &MuscleParameters = .SubjectMusPar.ObturatorInternus;
 AnyIntVar MuscleElemNo = 5; ///< The number of this element of the muscle
 AnyIntVar MuscleElemAmount = MuscleParameters.MuscleElemAmount; ///< The total amount of elements for this muscle
 F0 = .SubjectMusPar.PCSAfactor*PCSA; //< Maximum force output at optimum fiber length
 Lf0 = MuscleParameters.OptimalFiberlength
       * cos(pi/180*MuscleParameters.Pennationangle);
 Vol0 = 1e-6*MuscleParameters.MuscleVolume/MuscleElemAmount; ///< Muscle volume in (m3)
 AnyVar PCSA = 1e4*Vol0/Lf0;///< PCSA (cm^2) is calculated as muscle volume divided between muscle branches, divided by fiber length and corrected for the pennation angle not used in the simple muscle model
};

AnyMuscleModel ObturatorInternus6Par =
{
 AnyFolder &MuscleParameters = .SubjectMusPar.ObturatorInternus;
 AnyIntVar MuscleElemNo = 6; ///< The number of this element of the muscle
 AnyIntVar MuscleElemAmount = MuscleParameters.MuscleElemAmount; ///< The total amount of elements for this muscle
 F0 = .SubjectMusPar.PCSAfactor*PCSA; //< Maximum force output at optimum fiber length
 Lf0 = MuscleParameters.OptimalFiberlength
       * cos(pi/180*MuscleParameters.Pennationangle);
 Vol0 = 1e-6*MuscleParameters.MuscleVolume/MuscleElemAmount; ///< Muscle volume in (m3)
 AnyVar PCSA = 1e4*Vol0/Lf0;///< PCSA (cm^2) is calculated as muscle volume divided between muscle branches, divided by fiber length and corrected for the pennation angle not used in the simple muscle model
};


////////////////////////////////////
//     Pectineus (4 elements)     //
////////////////////////////////////
AnyMuscleModel Pectineus1Par =
{
 AnyFolder &MuscleParameters = .SubjectMusPar.Pectineus;
 AnyIntVar MuscleElemNo = 1; ///< The number of this element of the muscle
 AnyIntVar MuscleElemAmount = MuscleParameters.MuscleElemAmount; ///< The total amount of elements for this muscle
 F0 = .SubjectMusPar.PCSAfactor*PCSA; //< Maximum force output at optimum fiber length
 Lf0 = MuscleParameters.OptimalFiberlength
       * cos(pi/180*MuscleParameters.Pennationangle);
 Vol0 = 1e-6*MuscleParameters.MuscleVolume/MuscleElemAmount; ///< Muscle volume in (m3)
 AnyVar PCSA = 1e4*Vol0/Lf0;///< PCSA (cm^2) is calculated as muscle volume divided between muscle branches, divided by fiber length and corrected for the pennation angle not used in the simple muscle model
};

AnyMuscleModel Pectineus2Par =
{
 AnyFolder &MuscleParameters = .SubjectMusPar.Pectineus;
 AnyIntVar MuscleElemNo = 2; ///< The number of this element of the muscle
 AnyIntVar MuscleElemAmount = MuscleParameters.MuscleElemAmount; ///< The total amount of elements for this muscle
 F0 = .SubjectMusPar.PCSAfactor*PCSA; //< Maximum force output at optimum fiber length
 Lf0 = MuscleParameters.OptimalFiberlength
       * cos(pi/180*MuscleParameters.Pennationangle);
 Vol0 = 1e-6*MuscleParameters.MuscleVolume/MuscleElemAmount; ///< Muscle volume in (m3)
 AnyVar PCSA = 1e4*Vol0/Lf0;///< PCSA (cm^2) is calculated as muscle volume divided between muscle branches, divided by fiber length and corrected for the pennation angle not used in the simple muscle model
};

AnyMuscleModel Pectineus3Par =
{
 AnyFolder &MuscleParameters = .SubjectMusPar.Pectineus;
 AnyIntVar MuscleElemNo = 3; ///< The number of this element of the muscle
 AnyIntVar MuscleElemAmount = MuscleParameters.MuscleElemAmount; ///< The total amount of elements for this muscle
 F0 = .SubjectMusPar.PCSAfactor*PCSA; //< Maximum force output at optimum fiber length
 Lf0 = MuscleParameters.OptimalFiberlength
       * cos(pi/180*MuscleParameters.Pennationangle);
 Vol0 = 1e-6*MuscleParameters.MuscleVolume/MuscleElemAmount; ///< Muscle volume in (m3)
 AnyVar PCSA = 1e4*Vol0/Lf0;///< PCSA (cm^2) is calculated as muscle volume divided between muscle branches, divided by fiber length and corrected for the pennation angle not used in the simple muscle model
};

AnyMuscleModel Pectineus4Par =
{
 AnyFolder &MuscleParameters = .SubjectMusPar.Pectineus;
 AnyIntVar MuscleElemNo = 4; ///< The number of this element of the muscle
 AnyIntVar MuscleElemAmount = MuscleParameters.MuscleElemAmount; ///< The total amount of elements for this muscle
 F0 = .SubjectMusPar.PCSAfactor*PCSA; //< Maximum force output at optimum fiber length
 Lf0 = MuscleParameters.OptimalFiberlength
       * cos(pi/180*MuscleParameters.Pennationangle);
 Vol0 = 1e-6*MuscleParameters.MuscleVolume/MuscleElemAmount; ///< Muscle volume in (m3)
 AnyVar PCSA = 1e4*Vol0/Lf0;///< PCSA (cm^2) is calculated as muscle volume divided between muscle branches, divided by fiber length and corrected for the pennation angle not used in the simple muscle model
};


/////////////////////////////////////////
//     PeroneusBrevis (3 elements)     //
/////////////////////////////////////////
AnyMuscleModel PeroneusBrevis1Par =
{
 AnyFolder &MuscleParameters = .SubjectMusPar.PeroneusBrevis;
 AnyIntVar MuscleElemNo = 1; ///< The number of this element of the muscle
 AnyIntVar MuscleElemAmount = MuscleParameters.MuscleElemAmount; ///< The total amount of elements for this muscle
 F0 = .SubjectMusPar.PCSAfactor*PCSA; //< Maximum force output at optimum fiber length
 Lf0 = MuscleParameters.OptimalFiberlength
       * cos(pi/180*MuscleParameters.Pennationangle);
 Vol0 = 1e-6*MuscleParameters.MuscleVolume/MuscleElemAmount; ///< Muscle volume in (m3)
 AnyVar PCSA = 1e4*Vol0/Lf0;///< PCSA (cm^2) is calculated as muscle volume divided between muscle branches, divided by fiber length and corrected for the pennation angle not used in the simple muscle model
};

AnyMuscleModel PeroneusBrevis2Par =
{
 AnyFolder &MuscleParameters = .SubjectMusPar.PeroneusBrevis;
 AnyIntVar MuscleElemNo = 2; ///< The number of this element of the muscle
 AnyIntVar MuscleElemAmount = MuscleParameters.MuscleElemAmount; ///< The total amount of elements for this muscle
 F0 = .SubjectMusPar.PCSAfactor*PCSA; //< Maximum force output at optimum fiber length
 Lf0 = MuscleParameters.OptimalFiberlength
       * cos(pi/180*MuscleParameters.Pennationangle);
 Vol0 = 1e-6*MuscleParameters.MuscleVolume/MuscleElemAmount; ///< Muscle volume in (m3)
 AnyVar PCSA = 1e4*Vol0/Lf0;///< PCSA (cm^2) is calculated as muscle volume divided between muscle branches, divided by fiber length and corrected for the pennation angle not used in the simple muscle model
};

AnyMuscleModel PeroneusBrevis3Par =
{
 AnyFolder &MuscleParameters = .SubjectMusPar.PeroneusBrevis;
 AnyIntVar MuscleElemNo = 3; ///< The number of this element of the muscle
 AnyIntVar MuscleElemAmount = MuscleParameters.MuscleElemAmount; ///< The total amount of elements for this muscle
 F0 = .SubjectMusPar.PCSAfactor*PCSA; //< Maximum force output at optimum fiber length
 Lf0 = MuscleParameters.OptimalFiberlength
       * cos(pi/180*MuscleParameters.Pennationangle);
 Vol0 = 1e-6*MuscleParameters.MuscleVolume/MuscleElemAmount; ///< Muscle volume in (m3)
 AnyVar PCSA = 1e4*Vol0/Lf0;///< PCSA (cm^2) is calculated as muscle volume divided between muscle branches, divided by fiber length and corrected for the pennation angle not used in the simple muscle model
};


/////////////////////////////////////////
//     PeroneusLongus (3 elements)     //
/////////////////////////////////////////
AnyMuscleModel PeroneusLongus1Par =
{
 AnyFolder &MuscleParameters = .SubjectMusPar.PeroneusLongus;
 AnyIntVar MuscleElemNo = 1; ///< The number of this element of the muscle
 AnyIntVar MuscleElemAmount = MuscleParameters.MuscleElemAmount; ///< The total amount of elements for this muscle
 F0 = .SubjectMusPar.PCSAfactor*PCSA; //< Maximum force output at optimum fiber length
 Lf0 = MuscleParameters.OptimalFiberlength
       * cos(pi/180*MuscleParameters.Pennationangle);
 Vol0 = 1e-6*MuscleParameters.MuscleVolume/MuscleElemAmount; ///< Muscle volume in (m3)
 AnyVar PCSA = 1e4*Vol0/Lf0;///< PCSA (cm^2) is calculated as muscle volume divided between muscle branches, divided by fiber length and corrected for the pennation angle not used in the simple muscle model
};

AnyMuscleModel PeroneusLongus2Par =
{
 AnyFolder &MuscleParameters = .SubjectMusPar.PeroneusLongus;
 AnyIntVar MuscleElemNo = 2; ///< The number of this element of the muscle
 AnyIntVar MuscleElemAmount = MuscleParameters.MuscleElemAmount; ///< The total amount of elements for this muscle
 F0 = .SubjectMusPar.PCSAfactor*PCSA; //< Maximum force output at optimum fiber length
 Lf0 = MuscleParameters.OptimalFiberlength
       * cos(pi/180*MuscleParameters.Pennationangle);
 Vol0 = 1e-6*MuscleParameters.MuscleVolume/MuscleElemAmount; ///< Muscle volume in (m3)
 AnyVar PCSA = 1e4*Vol0/Lf0;///< PCSA (cm^2) is calculated as muscle volume divided between muscle branches, divided by fiber length and corrected for the pennation angle not used in the simple muscle model
};

AnyMuscleModel PeroneusLongus3Par =
{
 AnyFolder &MuscleParameters = .SubjectMusPar.PeroneusLongus;
 AnyIntVar MuscleElemNo = 3; ///< The number of this element of the muscle
 AnyIntVar MuscleElemAmount = MuscleParameters.MuscleElemAmount; ///< The total amount of elements for this muscle
 F0 = .SubjectMusPar.PCSAfactor*PCSA; //< Maximum force output at optimum fiber length
 Lf0 = MuscleParameters.OptimalFiberlength
       * cos(pi/180*MuscleParameters.Pennationangle);
 Vol0 = 1e-6*MuscleParameters.MuscleVolume/MuscleElemAmount; ///< Muscle volume in (m3)
 AnyVar PCSA = 1e4*Vol0/Lf0;///< PCSA (cm^2) is calculated as muscle volume divided between muscle branches, divided by fiber length and corrected for the pennation angle not used in the simple muscle model
};


//////////////////////////////////////////
//     PeroneusTertius (3 elements)     //
//////////////////////////////////////////
AnyMuscleModel PeroneusTertius1Par =
{
 AnyFolder &MuscleParameters = .SubjectMusPar.PeroneusTertius;
 AnyIntVar MuscleElemNo = 1; ///< The number of this element of the muscle
 AnyIntVar MuscleElemAmount = MuscleParameters.MuscleElemAmount; ///< The total amount of elements for this muscle
 F0 = .SubjectMusPar.PCSAfactor*PCSA; //< Maximum force output at optimum fiber length
 Lf0 = MuscleParameters.OptimalFiberlength
       * cos(pi/180*MuscleParameters.Pennationangle);
 Vol0 = 1e-6*MuscleParameters.MuscleVolume/MuscleElemAmount; ///< Muscle volume in (m3)
 AnyVar PCSA = 1e4*Vol0/Lf0;///< PCSA (cm^2) is calculated as muscle volume divided between muscle branches, divided by fiber length and corrected for the pennation angle not used in the simple muscle model
};

AnyMuscleModel PeroneusTertius2Par =
{
 AnyFolder &MuscleParameters = .SubjectMusPar.PeroneusTertius;
 AnyIntVar MuscleElemNo = 2; ///< The number of this element of the muscle
 AnyIntVar MuscleElemAmount = MuscleParameters.MuscleElemAmount; ///< The total amount of elements for this muscle
 F0 = .SubjectMusPar.PCSAfactor*PCSA; //< Maximum force output at optimum fiber length
 Lf0 = MuscleParameters.OptimalFiberlength
       * cos(pi/180*MuscleParameters.Pennationangle);
 Vol0 = 1e-6*MuscleParameters.MuscleVolume/MuscleElemAmount; ///< Muscle volume in (m3)
 AnyVar PCSA = 1e4*Vol0/Lf0;///< PCSA (cm^2) is calculated as muscle volume divided between muscle branches, divided by fiber length and corrected for the pennation angle not used in the simple muscle model
};

AnyMuscleModel PeroneusTertius3Par =
{
 AnyFolder &MuscleParameters = .SubjectMusPar.PeroneusTertius;
 AnyIntVar MuscleElemNo = 3; ///< The number of this element of the muscle
 AnyIntVar MuscleElemAmount = MuscleParameters.MuscleElemAmount; ///< The total amount of elements for this muscle
 F0 = .SubjectMusPar.PCSAfactor*PCSA; //< Maximum force output at optimum fiber length
 Lf0 = MuscleParameters.OptimalFiberlength
       * cos(pi/180*MuscleParameters.Pennationangle);
 Vol0 = 1e-6*MuscleParameters.MuscleVolume/MuscleElemAmount; ///< Muscle volume in (m3)
 AnyVar PCSA = 1e4*Vol0/Lf0;///< PCSA (cm^2) is calculated as muscle volume divided between muscle branches, divided by fiber length and corrected for the pennation angle not used in the simple muscle model
};


/////////////////////////////////////
//     Piriformis (1 element )     //
/////////////////////////////////////
AnyMuscleModel Piriformis1Par =
{
 AnyFolder &MuscleParameters = .SubjectMusPar.Piriformis;
 AnyIntVar MuscleElemNo = 1; ///< The number of this element of the muscle
 AnyIntVar MuscleElemAmount = MuscleParameters.MuscleElemAmount; ///< The total amount of elements for this muscle
 F0 = .SubjectMusPar.PCSAfactor*PCSA; //< Maximum force output at optimum fiber length
 Lf0 = MuscleParameters.OptimalFiberlength
       * cos(pi/180*MuscleParameters.Pennationangle);
 Vol0 = 1e-6*MuscleParameters.MuscleVolume/MuscleElemAmount; ///< Muscle volume in (m3)
 AnyVar PCSA = 1e4*Vol0/Lf0;///< PCSA (cm^2) is calculated as muscle volume divided between muscle branches, divided by fiber length and corrected for the pennation angle not used in the simple muscle model
};


////////////////////////////////////
//     Plantaris (1 element )     //
////////////////////////////////////
AnyMuscleModel Plantaris1Par =
{
 AnyFolder &MuscleParameters = .SubjectMusPar.Plantaris;
 AnyIntVar MuscleElemNo = 1; ///< The number of this element of the muscle
 AnyIntVar MuscleElemAmount = MuscleParameters.MuscleElemAmount; ///< The total amount of elements for this muscle
 F0 = .SubjectMusPar.PCSAfactor*PCSA; //< Maximum force output at optimum fiber length
 Lf0 = MuscleParameters.OptimalFiberlength
       * cos(pi/180*MuscleParameters.Pennationangle);
 Vol0 = 1e-6*MuscleParameters.MuscleVolume/MuscleElemAmount; ///< Muscle volume in (m3)
 AnyVar PCSA = 1e4*Vol0/Lf0;///< PCSA (cm^2) is calculated as muscle volume divided between muscle branches, divided by fiber length and corrected for the pennation angle not used in the simple muscle model
};


////////////////////////////////////
//     Popliteus (3 elements)     //
////////////////////////////////////
AnyMuscleModel Popliteus1Par =
{
 AnyFolder &MuscleParameters = .SubjectMusPar.Popliteus;
 AnyIntVar MuscleElemNo = 1; ///< The number of this element of the muscle
 AnyIntVar MuscleElemAmount = MuscleParameters.MuscleElemAmount; ///< The total amount of elements for this muscle
 F0 = .SubjectMusPar.PCSAfactor*PCSA; //< Maximum force output at optimum fiber length
 Lf0 = MuscleParameters.OptimalFiberlength
       * cos(pi/180*MuscleParameters.Pennationangle);
 Vol0 = 1e-6*MuscleParameters.MuscleVolume/MuscleElemAmount; ///< Muscle volume in (m3)
 AnyVar PCSA = 1e4*Vol0/Lf0;///< PCSA (cm^2) is calculated as muscle volume divided between muscle branches, divided by fiber length and corrected for the pennation angle not used in the simple muscle model
};

AnyMuscleModel Popliteus2Par =
{
 AnyFolder &MuscleParameters = .SubjectMusPar.Popliteus;
 AnyIntVar MuscleElemNo = 2; ///< The number of this element of the muscle
 AnyIntVar MuscleElemAmount = MuscleParameters.MuscleElemAmount; ///< The total amount of elements for this muscle
 F0 = .SubjectMusPar.PCSAfactor*PCSA; //< Maximum force output at optimum fiber length
 Lf0 = MuscleParameters.OptimalFiberlength
       * cos(pi/180*MuscleParameters.Pennationangle);
 Vol0 = 1e-6*MuscleParameters.MuscleVolume/MuscleElemAmount; ///< Muscle volume in (m3)
 AnyVar PCSA = 1e4*Vol0/Lf0;///< PCSA (cm^2) is calculated as muscle volume divided between muscle branches, divided by fiber length and corrected for the pennation angle not used in the simple muscle model
};

AnyMuscleModel Popliteus3Par =
{
 AnyFolder &MuscleParameters = .SubjectMusPar.Popliteus;
 AnyIntVar MuscleElemNo = 3; ///< The number of this element of the muscle
 AnyIntVar MuscleElemAmount = MuscleParameters.MuscleElemAmount; ///< The total amount of elements for this muscle
 F0 = .SubjectMusPar.PCSAfactor*PCSA; //< Maximum force output at optimum fiber length
 Lf0 = MuscleParameters.OptimalFiberlength
       * cos(pi/180*MuscleParameters.Pennationangle);
 Vol0 = 1e-6*MuscleParameters.MuscleVolume/MuscleElemAmount; ///< Muscle volume in (m3)
 AnyVar PCSA = 1e4*Vol0/Lf0;///< PCSA (cm^2) is calculated as muscle volume divided between muscle branches, divided by fiber length and corrected for the pennation angle not used in the simple muscle model
};


/////////////////////////////////////
//     PsoasMinor (1 element )     //
/////////////////////////////////////
AnyMuscleModel PsoasMinor1Par =
{
 AnyFolder &MuscleParameters = .SubjectMusPar.PsoasMinor;
 AnyIntVar MuscleElemNo = 1; ///< The number of this element of the muscle
 AnyIntVar MuscleElemAmount = MuscleParameters.MuscleElemAmount; ///< The total amount of elements for this muscle
 F0 = .SubjectMusPar.PCSAfactor*PCSA; //< Maximum force output at optimum fiber length
 Lf0 = MuscleParameters.OptimalFiberlength
       * cos(pi/180*MuscleParameters.Pennationangle);
 Vol0 = 1e-6*MuscleParameters.MuscleVolume/MuscleElemAmount; ///< Muscle volume in (m3)
 AnyVar PCSA = 1e4*Vol0/Lf0;///< PCSA (cm^2) is calculated as muscle volume divided between muscle branches, divided by fiber length and corrected for the pennation angle not used in the simple muscle model
};


/////////////////////////////////////
//     PsoasMajor (11 elements)     //
/////////////////////////////////////
AnyMuscleModel PsoasMajor1Par =
{
 AnyFolder &MuscleParameters = .SubjectMusPar.PsoasMajor;
 AnyIntVar MuscleElemNo = 1; ///< The number of this element of the muscle
 AnyIntVar MuscleElemAmount = MuscleParameters.MuscleElemAmount; ///< The total amount of elements for this muscle
 F0 = .SubjectMusPar.PCSAfactor*PCSA; //< Maximum force output at optimum fiber length
 Lf0 = MuscleParameters.OptimalFiberlength
       * cos(pi/180*MuscleParameters.Pennationangle);
 Vol0 = 1e-6*MuscleParameters.MuscleVolume/MuscleElemAmount; ///< Muscle volume in (m3)
 AnyVar PCSA = 1e4*Vol0/Lf0;///< PCSA (cm^2) is calculated as muscle volume divided between muscle branches, divided by fiber length and corrected for the pennation angle not used in the simple muscle model
};

AnyMuscleModel PsoasMajor2Par =
{
 AnyFolder &MuscleParameters = .SubjectMusPar.PsoasMajor;
 AnyIntVar MuscleElemNo = 2; ///< The number of this element of the muscle
 AnyIntVar MuscleElemAmount = MuscleParameters.MuscleElemAmount; ///< The total amount of elements for this muscle
 F0 = .SubjectMusPar.PCSAfactor*PCSA; //< Maximum force output at optimum fiber length
 Lf0 = MuscleParameters.OptimalFiberlength
       * cos(pi/180*MuscleParameters.Pennationangle);
 Vol0 = 1e-6*MuscleParameters.MuscleVolume/MuscleElemAmount; ///< Muscle volume in (m3)
 AnyVar PCSA = 1e4*Vol0/Lf0;///< PCSA (cm^2) is calculated as muscle volume divided between muscle branches, divided by fiber length and corrected for the pennation angle not used in the simple muscle model
};

AnyMuscleModel PsoasMajor3Par =
{
 AnyFolder &MuscleParameters = .SubjectMusPar.PsoasMajor;
 AnyIntVar MuscleElemNo = 3; ///< The number of this element of the muscle
 AnyIntVar MuscleElemAmount = MuscleParameters.MuscleElemAmount; ///< The total amount of elements for this muscle
 F0 = .SubjectMusPar.PCSAfactor*PCSA; //< Maximum force output at optimum fiber length
 Lf0 = MuscleParameters.OptimalFiberlength
       * cos(pi/180*MuscleParameters.Pennationangle);
 Vol0 = 1e-6*MuscleParameters.MuscleVolume/MuscleElemAmount; ///< Muscle volume in (m3)
 AnyVar PCSA = 1e4*Vol0/Lf0;///< PCSA (cm^2) is calculated as muscle volume divided between muscle branches, divided by fiber length and corrected for the pennation angle not used in the simple muscle model
};

AnyMuscleModel PsoasMajor4Par =
{
 AnyFolder &MuscleParameters = .SubjectMusPar.PsoasMajor;
 AnyIntVar MuscleElemNo = 4; ///< The number of this element of the muscle
 AnyIntVar MuscleElemAmount = MuscleParameters.MuscleElemAmount; ///< The total amount of elements for this muscle
 F0 = .SubjectMusPar.PCSAfactor*PCSA; //< Maximum force output at optimum fiber length
 Lf0 = MuscleParameters.OptimalFiberlength
       * cos(pi/180*MuscleParameters.Pennationangle);
 Vol0 = 1e-6*MuscleParameters.MuscleVolume/MuscleElemAmount; ///< Muscle volume in (m3)
 AnyVar PCSA = 1e4*Vol0/Lf0;///< PCSA (cm^2) is calculated as muscle volume divided between muscle branches, divided by fiber length and corrected for the pennation angle not used in the simple muscle model
};

AnyMuscleModel PsoasMajor5Par =
{
 AnyFolder &MuscleParameters = .SubjectMusPar.PsoasMajor;
 AnyIntVar MuscleElemNo = 5; ///< The number of this element of the muscle
 AnyIntVar MuscleElemAmount = MuscleParameters.MuscleElemAmount; ///< The total amount of elements for this muscle
 F0 = .SubjectMusPar.PCSAfactor*PCSA; //< Maximum force output at optimum fiber length
 Lf0 = MuscleParameters.OptimalFiberlength
       * cos(pi/180*MuscleParameters.Pennationangle);
 Vol0 = 1e-6*MuscleParameters.MuscleVolume/MuscleElemAmount; ///< Muscle volume in (m3)
 AnyVar PCSA = 1e4*Vol0/Lf0;///< PCSA (cm^2) is calculated as muscle volume divided between muscle branches, divided by fiber length and corrected for the pennation angle not used in the simple muscle model
};
AnyMuscleModel PsoasMajor6Par =
{
 AnyFolder &MuscleParameters = .SubjectMusPar.PsoasMajor;
 AnyIntVar MuscleElemNo = 6; ///< The number of this element of the muscle
 AnyIntVar MuscleElemAmount = MuscleParameters.MuscleElemAmount; ///< The total amount of elements for this muscle
 F0 = .SubjectMusPar.PCSAfactor*PCSA; //< Maximum force output at optimum fiber length
 Lf0 = MuscleParameters.OptimalFiberlength
       * cos(pi/180*MuscleParameters.Pennationangle);
 Vol0 = 1e-6*MuscleParameters.MuscleVolume/MuscleElemAmount; ///< Muscle volume in (m3)
 AnyVar PCSA = 1e4*Vol0/Lf0;///< PCSA (cm^2) is calculated as muscle volume divided between muscle branches, divided by fiber length and corrected for the pennation angle not used in the simple muscle model
};

AnyMuscleModel PsoasMajor7Par =
{
 AnyFolder &MuscleParameters = .SubjectMusPar.PsoasMajor;
 AnyIntVar MuscleElemNo = 7; ///< The number of this element of the muscle
 AnyIntVar MuscleElemAmount = MuscleParameters.MuscleElemAmount; ///< The total amount of elements for this muscle
 F0 = .SubjectMusPar.PCSAfactor*PCSA; //< Maximum force output at optimum fiber length
 Lf0 = MuscleParameters.OptimalFiberlength
       * cos(pi/180*MuscleParameters.Pennationangle);
 Vol0 = 1e-6*MuscleParameters.MuscleVolume/MuscleElemAmount; ///< Muscle volume in (m3)
 AnyVar PCSA = 1e4*Vol0/Lf0;///< PCSA (cm^2) is calculated as muscle volume divided between muscle branches, divided by fiber length and corrected for the pennation angle not used in the simple muscle model
};

AnyMuscleModel PsoasMajor8Par =
{
 AnyFolder &MuscleParameters = .SubjectMusPar.PsoasMajor;
 AnyIntVar MuscleElemNo = 8; ///< The number of this element of the muscle
 AnyIntVar MuscleElemAmount = MuscleParameters.MuscleElemAmount; ///< The total amount of elements for this muscle
 F0 = .SubjectMusPar.PCSAfactor*PCSA; //< Maximum force output at optimum fiber length
 Lf0 = MuscleParameters.OptimalFiberlength
       * cos(pi/180*MuscleParameters.Pennationangle);
 Vol0 = 1e-6*MuscleParameters.MuscleVolume/MuscleElemAmount; ///< Muscle volume in (m3)
 AnyVar PCSA = 1e4*Vol0/Lf0;///< PCSA (cm^2) is calculated as muscle volume divided between muscle branches, divided by fiber length and corrected for the pennation angle not used in the simple muscle model
};

AnyMuscleModel PsoasMajor9Par =
{
 AnyFolder &MuscleParameters = .SubjectMusPar.PsoasMajor;
 AnyIntVar MuscleElemNo = 9; ///< The number of this element of the muscle
 AnyIntVar MuscleElemAmount = MuscleParameters.MuscleElemAmount; ///< The total amount of elements for this muscle
 F0 = .SubjectMusPar.PCSAfactor*PCSA; //< Maximum force output at optimum fiber length
 Lf0 = MuscleParameters.OptimalFiberlength
       * cos(pi/180*MuscleParameters.Pennationangle);
 Vol0 = 1e-6*MuscleParameters.MuscleVolume/MuscleElemAmount; ///< Muscle volume in (m3)
 AnyVar PCSA = 1e4*Vol0/Lf0;///< PCSA (cm^2) is calculated as muscle volume divided between muscle branches, divided by fiber length and corrected for the pennation angle not used in the simple muscle model
};

AnyMuscleModel PsoasMajor10Par =
{
 AnyFolder &MuscleParameters = .SubjectMusPar.PsoasMajor;
 AnyIntVar MuscleElemNo = 10; ///< The number of this element of the muscle
 AnyIntVar MuscleElemAmount = MuscleParameters.MuscleElemAmount; ///< The total amount of elements for this muscle
 F0 = .SubjectMusPar.PCSAfactor*PCSA; //< Maximum force output at optimum fiber length
 Lf0 = MuscleParameters.OptimalFiberlength
       * cos(pi/180*MuscleParameters.Pennationangle);
 Vol0 = 1e-6*MuscleParameters.MuscleVolume/MuscleElemAmount; ///< Muscle volume in (m3)
 AnyVar PCSA = 1e4*Vol0/Lf0;///< PCSA (cm^2) is calculated as muscle volume divided between muscle branches, divided by fiber length and corrected for the pennation angle not used in the simple muscle model
};

AnyMuscleModel PsoasMajor11Par =
{
 AnyFolder &MuscleParameters = .SubjectMusPar.PsoasMajor;
 AnyIntVar MuscleElemNo = 11; ///< The number of this element of the muscle
 AnyIntVar MuscleElemAmount = MuscleParameters.MuscleElemAmount; ///< The total amount of elements for this muscle
 F0 = .SubjectMusPar.PCSAfactor*PCSA; //< Maximum force output at optimum fiber length
 Lf0 = MuscleParameters.OptimalFiberlength
       * cos(pi/180*MuscleParameters.Pennationangle);
 Vol0 = 1e-6*MuscleParameters.MuscleVolume/MuscleElemAmount; ///< Muscle volume in (m3)
 AnyVar PCSA = 1e4*Vol0/Lf0;///< PCSA (cm^2) is calculated as muscle volume divided between muscle branches, divided by fiber length and corrected for the pennation angle not used in the simple muscle model
};


///////////////////////////////////////////
//     QuadratusFemoris (4 elements)     //
///////////////////////////////////////////
AnyMuscleModel QuadratusFemoris1Par =
{
 AnyFolder &MuscleParameters = .SubjectMusPar.QuadratusFemoris;
 AnyIntVar MuscleElemNo = 1; ///< The number of this element of the muscle
 AnyIntVar MuscleElemAmount = MuscleParameters.MuscleElemAmount; ///< The total amount of elements for this muscle
 F0 = .SubjectMusPar.PCSAfactor*PCSA; //< Maximum force output at optimum fiber length
 Lf0 = MuscleParameters.OptimalFiberlength
       * cos(pi/180*MuscleParameters.Pennationangle);
 Vol0 = 1e-6*MuscleParameters.MuscleVolume/MuscleElemAmount; ///< Muscle volume in (m3)
 AnyVar PCSA = 1e4*Vol0/Lf0;///< PCSA (cm^2) is calculated as muscle volume divided between muscle branches, divided by fiber length and corrected for the pennation angle not used in the simple muscle model
};

AnyMuscleModel QuadratusFemoris2Par =
{
 AnyFolder &MuscleParameters = .SubjectMusPar.QuadratusFemoris;
 AnyIntVar MuscleElemNo = 2; ///< The number of this element of the muscle
 AnyIntVar MuscleElemAmount = MuscleParameters.MuscleElemAmount; ///< The total amount of elements for this muscle
 F0 = .SubjectMusPar.PCSAfactor*PCSA; //< Maximum force output at optimum fiber length
 Lf0 = MuscleParameters.OptimalFiberlength
       * cos(pi/180*MuscleParameters.Pennationangle);
 Vol0 = 1e-6*MuscleParameters.MuscleVolume/MuscleElemAmount; ///< Muscle volume in (m3)
 AnyVar PCSA = 1e4*Vol0/Lf0;///< PCSA (cm^2) is calculated as muscle volume divided between muscle branches, divided by fiber length and corrected for the pennation angle not used in the simple muscle model
};

AnyMuscleModel QuadratusFemoris3Par =
{
 AnyFolder &MuscleParameters = .SubjectMusPar.QuadratusFemoris;
 AnyIntVar MuscleElemNo = 3; ///< The number of this element of the muscle
 AnyIntVar MuscleElemAmount = MuscleParameters.MuscleElemAmount; ///< The total amount of elements for this muscle
 F0 = .SubjectMusPar.PCSAfactor*PCSA; //< Maximum force output at optimum fiber length
 Lf0 = MuscleParameters.OptimalFiberlength
       * cos(pi/180*MuscleParameters.Pennationangle);
 Vol0 = 1e-6*MuscleParameters.MuscleVolume/MuscleElemAmount; ///< Muscle volume in (m3)
 AnyVar PCSA = 1e4*Vol0/Lf0;///< PCSA (cm^2) is calculated as muscle volume divided between muscle branches, divided by fiber length and corrected for the pennation angle not used in the simple muscle model
};

AnyMuscleModel QuadratusFemoris4Par =
{
 AnyFolder &MuscleParameters = .SubjectMusPar.QuadratusFemoris;
 AnyIntVar MuscleElemNo = 4; ///< The number of this element of the muscle
 AnyIntVar MuscleElemAmount = MuscleParameters.MuscleElemAmount; ///< The total amount of elements for this muscle
 F0 = .SubjectMusPar.PCSAfactor*PCSA; //< Maximum force output at optimum fiber length
 Lf0 = MuscleParameters.OptimalFiberlength
       * cos(pi/180*MuscleParameters.Pennationangle);
 Vol0 = 1e-6*MuscleParameters.MuscleVolume/MuscleElemAmount; ///< Muscle volume in (m3)
 AnyVar PCSA = 1e4*Vol0/Lf0;///< PCSA (cm^2) is calculated as muscle volume divided between muscle branches, divided by fiber length and corrected for the pennation angle not used in the simple muscle model
};


////////////////////////////////////////
//     RectusFemoris (2 elements)     //
////////////////////////////////////////
AnyMuscleModel RectusFemoris1Par =
{
 AnyFolder &MuscleParameters = .SubjectMusPar.RectusFemoris;
 AnyIntVar MuscleElemNo = 1; ///< The number of this element of the muscle
 AnyIntVar MuscleElemAmount = MuscleParameters.MuscleElemAmount; ///< The total amount of elements for this muscle
 F0 = .SubjectMusPar.PCSAfactor*PCSA; //< Maximum force output at optimum fiber length
 Lf0 = MuscleParameters.OptimalFiberlength
       * cos(pi/180*MuscleParameters.Pennationangle);
 Vol0 = 1e-6*MuscleParameters.MuscleVolume/MuscleElemAmount; ///< Muscle volume in (m3)
 AnyVar PCSA = 1e4*Vol0/Lf0;///< PCSA (cm^2) is calculated as muscle volume divided between muscle branches, divided by fiber length and corrected for the pennation angle not used in the simple muscle model
};

AnyMuscleModel RectusFemoris2Par =
{
 AnyFolder &MuscleParameters = .SubjectMusPar.RectusFemoris;
 AnyIntVar MuscleElemNo = 2; ///< The number of this element of the muscle
 AnyIntVar MuscleElemAmount = MuscleParameters.MuscleElemAmount; ///< The total amount of elements for this muscle
 F0 = .SubjectMusPar.PCSAfactor*PCSA; //< Maximum force output at optimum fiber length
 Lf0 = MuscleParameters.OptimalFiberlength
       * cos(pi/180*MuscleParameters.Pennationangle);
 Vol0 = 1e-6*MuscleParameters.MuscleVolume/MuscleElemAmount; ///< Muscle volume in (m3)
 AnyVar PCSA = 1e4*Vol0/Lf0;///< PCSA (cm^2) is calculated as muscle volume divided between muscle branches, divided by fiber length and corrected for the pennation angle not used in the simple muscle model
};


////////////////////////////////////
//     Sartorius (1 element )     //
////////////////////////////////////
AnyMuscleModel Sartorius1Par =
{
 AnyFolder &MuscleParameters = .SubjectMusPar.Sartorius;
 AnyIntVar MuscleElemNo = 1; ///< The number of this element of the muscle
 AnyIntVar MuscleElemAmount = MuscleParameters.MuscleElemAmount; ///< The total amount of elements for this muscle
 F0 = .SubjectMusPar.PCSAfactor*PCSA; //< Maximum force output at optimum fiber length
 Lf0 = MuscleParameters.OptimalFiberlength
       * cos(pi/180*MuscleParameters.Pennationangle);
 Vol0 = 1e-6*MuscleParameters.MuscleVolume/MuscleElemAmount; ///< Muscle volume in (m3)
 AnyVar PCSA = 1e4*Vol0/Lf0;///< PCSA (cm^2) is calculated as muscle volume divided between muscle branches, divided by fiber length and corrected for the pennation angle not used in the simple muscle model
};


//////////////////////////////////////////
//     Semimembranosus (3 elements)     //
//////////////////////////////////////////
AnyMuscleModel Semimembranosus1Par =
{
 AnyFolder &MuscleParameters = .SubjectMusPar.Semimembranosus;
 AnyIntVar MuscleElemNo = 1; ///< The number of this element of the muscle
 AnyIntVar MuscleElemAmount = MuscleParameters.MuscleElemAmount; ///< The total amount of elements for this muscle
 F0 = .SubjectMusPar.PCSAfactor*PCSA; //< Maximum force output at optimum fiber length
 Lf0 = MuscleParameters.OptimalFiberlength
       * cos(pi/180*MuscleParameters.Pennationangle);
 Vol0 = 1e-6*MuscleParameters.MuscleVolume/MuscleElemAmount; ///< Muscle volume in (m3)
 AnyVar PCSA = 1e4*Vol0/Lf0;///< PCSA (cm^2) is calculated as muscle volume divided between muscle branches, divided by fiber length and corrected for the pennation angle not used in the simple muscle model
};

AnyMuscleModel Semimembranosus2Par =
{
 AnyFolder &MuscleParameters = .SubjectMusPar.Semimembranosus;
 AnyIntVar MuscleElemNo = 2; ///< The number of this element of the muscle
 AnyIntVar MuscleElemAmount = MuscleParameters.MuscleElemAmount; ///< The total amount of elements for this muscle
 F0 = .SubjectMusPar.PCSAfactor*PCSA; //< Maximum force output at optimum fiber length
 Lf0 = MuscleParameters.OptimalFiberlength
       * cos(pi/180*MuscleParameters.Pennationangle);
 Vol0 = 1e-6*MuscleParameters.MuscleVolume/MuscleElemAmount; ///< Muscle volume in (m3)
 AnyVar PCSA = 1e4*Vol0/Lf0;///< PCSA (cm^2) is calculated as muscle volume divided between muscle branches, divided by fiber length and corrected for the pennation angle not used in the simple muscle model
};

AnyMuscleModel Semimembranosus3Par =
{
 AnyFolder &MuscleParameters = .SubjectMusPar.Semimembranosus;
 AnyIntVar MuscleElemNo = 3; ///< The number of this element of the muscle
 AnyIntVar MuscleElemAmount = MuscleParameters.MuscleElemAmount; ///< The total amount of elements for this muscle
 F0 = .SubjectMusPar.PCSAfactor*PCSA; //< Maximum force output at optimum fiber length
 Lf0 = MuscleParameters.OptimalFiberlength
       * cos(pi/180*MuscleParameters.Pennationangle);
 Vol0 = 1e-6*MuscleParameters.MuscleVolume/MuscleElemAmount; ///< Muscle volume in (m3)
 AnyVar PCSA = 1e4*Vol0/Lf0;///< PCSA (cm^2) is calculated as muscle volume divided between muscle branches, divided by fiber length and corrected for the pennation angle not used in the simple muscle model
};


/////////////////////////////////////////
//     Semitendinosus (1 element )     //
/////////////////////////////////////////
AnyMuscleModel Semitendinosus1Par =
{
 AnyFolder &MuscleParameters = .SubjectMusPar.Semitendinosus;
 AnyIntVar MuscleElemNo = 1; ///< The number of this element of the muscle
 AnyIntVar MuscleElemAmount = MuscleParameters.MuscleElemAmount; ///< The total amount of elements for this muscle
 F0 = .SubjectMusPar.PCSAfactor*PCSA; //< Maximum force output at optimum fiber length
 Lf0 = MuscleParameters.OptimalFiberlength
       * cos(pi/180*MuscleParameters.Pennationangle);
 Vol0 = 1e-6*MuscleParameters.MuscleVolume/MuscleElemAmount; ///< Muscle volume in (m3)
 AnyVar PCSA = 1e4*Vol0/Lf0;///< PCSA (cm^2) is calculated as muscle volume divided between muscle branches, divided by fiber length and corrected for the pennation angle not used in the simple muscle model
};


/////////////////////////////////////////
//     SoleusMedialis (3 elements)     //
/////////////////////////////////////////
AnyMuscleModel SoleusMedialis1Par =
{
 AnyFolder &MuscleParameters = .SubjectMusPar.SoleusMedialis;
 AnyIntVar MuscleElemNo = 1; ///< The number of this element of the muscle
 AnyIntVar MuscleElemAmount = MuscleParameters.MuscleElemAmount; ///< The total amount of elements for this muscle
 F0 = .SubjectMusPar.PCSAfactor*PCSA; //< Maximum force output at optimum fiber length
 Lf0 = MuscleParameters.OptimalFiberlength
       * cos(pi/180*MuscleParameters.Pennationangle);
 Vol0 = 1e-6*MuscleParameters.MuscleVolume/MuscleElemAmount; ///< Muscle volume in (m3)
 AnyVar PCSA = 1e4*Vol0/Lf0;///< PCSA (cm^2) is calculated as muscle volume divided between muscle branches, divided by fiber length and corrected for the pennation angle not used in the simple muscle model
};

AnyMuscleModel SoleusMedialis2Par =
{
 AnyFolder &MuscleParameters = .SubjectMusPar.SoleusMedialis;
 AnyIntVar MuscleElemNo = 2; ///< The number of this element of the muscle
 AnyIntVar MuscleElemAmount = MuscleParameters.MuscleElemAmount; ///< The total amount of elements for this muscle
 F0 = .SubjectMusPar.PCSAfactor*PCSA; //< Maximum force output at optimum fiber length
 Lf0 = MuscleParameters.OptimalFiberlength
       * cos(pi/180*MuscleParameters.Pennationangle);
 Vol0 = 1e-6*MuscleParameters.MuscleVolume/MuscleElemAmount; ///< Muscle volume in (m3)
 AnyVar PCSA = 1e4*Vol0/Lf0;///< PCSA (cm^2) is calculated as muscle volume divided between muscle branches, divided by fiber length and corrected for the pennation angle not used in the simple muscle model
};

AnyMuscleModel SoleusMedialis3Par =
{
 AnyFolder &MuscleParameters = .SubjectMusPar.SoleusMedialis;
 AnyIntVar MuscleElemNo = 3; ///< The number of this element of the muscle
 AnyIntVar MuscleElemAmount = MuscleParameters.MuscleElemAmount; ///< The total amount of elements for this muscle
 F0 = .SubjectMusPar.PCSAfactor*PCSA; //< Maximum force output at optimum fiber length
 Lf0 = MuscleParameters.OptimalFiberlength
       * cos(pi/180*MuscleParameters.Pennationangle);
 Vol0 = 1e-6*MuscleParameters.MuscleVolume/MuscleElemAmount; ///< Muscle volume in (m3)
 AnyVar PCSA = 1e4*Vol0/Lf0;///< PCSA (cm^2) is calculated as muscle volume divided between muscle branches, divided by fiber length and corrected for the pennation angle not used in the simple muscle model
};


//////////////////////////////////////////
//     SoleusLateralis (3 elements)     //
//////////////////////////////////////////
AnyMuscleModel SoleusLateralis1Par =
{
 AnyFolder &MuscleParameters = .SubjectMusPar.SoleusLateralis;
 AnyIntVar MuscleElemNo = 1; ///< The number of this element of the muscle
 AnyIntVar MuscleElemAmount = MuscleParameters.MuscleElemAmount; ///< The total amount of elements for this muscle
 F0 = .SubjectMusPar.PCSAfactor*PCSA; //< Maximum force output at optimum fiber length
 Lf0 = MuscleParameters.OptimalFiberlength
       * cos(pi/180*MuscleParameters.Pennationangle);
 Vol0 = 1e-6*MuscleParameters.MuscleVolume/MuscleElemAmount; ///< Muscle volume in (m3)
 AnyVar PCSA = 1e4*Vol0/Lf0;///< PCSA (cm^2) is calculated as muscle volume divided between muscle branches, divided by fiber length and corrected for the pennation angle not used in the simple muscle model
};

AnyMuscleModel SoleusLateralis2Par =
{
 AnyFolder &MuscleParameters = .SubjectMusPar.SoleusLateralis;
 AnyIntVar MuscleElemNo = 2; ///< The number of this element of the muscle
 AnyIntVar MuscleElemAmount = MuscleParameters.MuscleElemAmount; ///< The total amount of elements for this muscle
 F0 = .SubjectMusPar.PCSAfactor*PCSA; //< Maximum force output at optimum fiber length
 Lf0 = MuscleParameters.OptimalFiberlength
       * cos(pi/180*MuscleParameters.Pennationangle);
 Vol0 = 1e-6*MuscleParameters.MuscleVolume/MuscleElemAmount; ///< Muscle volume in (m3)
 AnyVar PCSA = 1e4*Vol0/Lf0;///< PCSA (cm^2) is calculated as muscle volume divided between muscle branches, divided by fiber length and corrected for the pennation angle not used in the simple muscle model
};

AnyMuscleModel SoleusLateralis3Par =
{
 AnyFolder &MuscleParameters = .SubjectMusPar.SoleusLateralis;
 AnyIntVar MuscleElemNo = 3; ///< The number of this element of the muscle
 AnyIntVar MuscleElemAmount = MuscleParameters.MuscleElemAmount; ///< The total amount of elements for this muscle
 F0 = .SubjectMusPar.PCSAfactor*PCSA; //< Maximum force output at optimum fiber length
 Lf0 = MuscleParameters.OptimalFiberlength
       * cos(pi/180*MuscleParameters.Pennationangle);
 Vol0 = 1e-6*MuscleParameters.MuscleVolume/MuscleElemAmount; ///< Muscle volume in (m3)
 AnyVar PCSA = 1e4*Vol0/Lf0;///< PCSA (cm^2) is calculated as muscle volume divided between muscle branches, divided by fiber length and corrected for the pennation angle not used in the simple muscle model
};


/////////////////////////////////////////////
//     TensorFasciaeLatae (2 elements)     //
/////////////////////////////////////////////
AnyMuscleModel TensorFasciaeLatae1Par =
{
 AnyFolder &MuscleParameters = .SubjectMusPar.TensorFasciaeLatae;
 AnyIntVar MuscleElemNo = 1; ///< The number of this element of the muscle
 AnyIntVar MuscleElemAmount = MuscleParameters.MuscleElemAmount; ///< The total amount of elements for this muscle
 F0 = .SubjectMusPar.PCSAfactor*PCSA; //< Maximum force output at optimum fiber length
 Lf0 = MuscleParameters.OptimalFiberlength
       * cos(pi/180*MuscleParameters.Pennationangle);
 Vol0 = 1e-6*MuscleParameters.MuscleVolume/MuscleElemAmount; ///< Muscle volume in (m3)
 AnyVar PCSA = 1e4*Vol0/Lf0;///< PCSA (cm^2) is calculated as muscle volume divided between muscle branches, divided by fiber length and corrected for the pennation angle not used in the simple muscle model
};

AnyMuscleModel TensorFasciaeLatae2Par =
{
 AnyFolder &MuscleParameters = .SubjectMusPar.TensorFasciaeLatae;
 AnyIntVar MuscleElemNo = 2; ///< The number of this element of the muscle
 AnyIntVar MuscleElemAmount = MuscleParameters.MuscleElemAmount; ///< The total amount of elements for this muscle
 F0 = .SubjectMusPar.PCSAfactor*PCSA; //< Maximum force output at optimum fiber length
 Lf0 = MuscleParameters.OptimalFiberlength
       * cos(pi/180*MuscleParameters.Pennationangle);
 Vol0 = 1e-6*MuscleParameters.MuscleVolume/MuscleElemAmount; ///< Muscle volume in (m3)
 AnyVar PCSA = 1e4*Vol0/Lf0;///< PCSA (cm^2) is calculated as muscle volume divided between muscle branches, divided by fiber length and corrected for the pennation angle not used in the simple muscle model
};


///////////////////////////////////////////
//     TibialisAnterior (3 elements)     //
///////////////////////////////////////////
AnyMuscleModel TibialisAnterior1Par =
{
 AnyFolder &MuscleParameters = .SubjectMusPar.TibialisAnterior;
 AnyIntVar MuscleElemNo = 1; ///< The number of this element of the muscle
 AnyIntVar MuscleElemAmount = MuscleParameters.MuscleElemAmount; ///< The total amount of elements for this muscle
 F0 = .SubjectMusPar.PCSAfactor*PCSA; //< Maximum force output at optimum fiber length
 Lf0 = MuscleParameters.OptimalFiberlength
       * cos(pi/180*MuscleParameters.Pennationangle);
 Vol0 = 1e-6*MuscleParameters.MuscleVolume/MuscleElemAmount; ///< Muscle volume in (m3)
 AnyVar PCSA = 1e4*Vol0/Lf0;///< PCSA (cm^2) is calculated as muscle volume divided between muscle branches, divided by fiber length and corrected for the pennation angle not used in the simple muscle model
};

AnyMuscleModel TibialisAnterior2Par =
{
 AnyFolder &MuscleParameters = .SubjectMusPar.TibialisAnterior;
 AnyIntVar MuscleElemNo = 2; ///< The number of this element of the muscle
 AnyIntVar MuscleElemAmount = MuscleParameters.MuscleElemAmount; ///< The total amount of elements for this muscle
 F0 = .SubjectMusPar.PCSAfactor*PCSA; //< Maximum force output at optimum fiber length
 Lf0 = MuscleParameters.OptimalFiberlength
       * cos(pi/180*MuscleParameters.Pennationangle);
 Vol0 = 1e-6*MuscleParameters.MuscleVolume/MuscleElemAmount; ///< Muscle volume in (m3)
 AnyVar PCSA = 1e4*Vol0/Lf0;///< PCSA (cm^2) is calculated as muscle volume divided between muscle branches, divided by fiber length and corrected for the pennation angle not used in the simple muscle model
};

AnyMuscleModel TibialisAnterior3Par =
{
 AnyFolder &MuscleParameters = .SubjectMusPar.TibialisAnterior;
 AnyIntVar MuscleElemNo = 3; ///< The number of this element of the muscle
 AnyIntVar MuscleElemAmount = MuscleParameters.MuscleElemAmount; ///< The total amount of elements for this muscle
 F0 = .SubjectMusPar.PCSAfactor*PCSA; //< Maximum force output at optimum fiber length
 Lf0 = MuscleParameters.OptimalFiberlength
       * cos(pi/180*MuscleParameters.Pennationangle);
 Vol0 = 1e-6*MuscleParameters.MuscleVolume/MuscleElemAmount; ///< Muscle volume in (m3)
 AnyVar PCSA = 1e4*Vol0/Lf0;///< PCSA (cm^2) is calculated as muscle volume divided between muscle branches, divided by fiber length and corrected for the pennation angle not used in the simple muscle model
};


////////////////////////////////////////////////////
//     TibialisPosteriorMedialis (3 elements)     //
////////////////////////////////////////////////////
AnyMuscleModel TibialisPosteriorMedialis1Par =
{
 AnyFolder &MuscleParameters = .SubjectMusPar.TibialisPosteriorMedialis;
 AnyIntVar MuscleElemNo = 1; ///< The number of this element of the muscle
 AnyIntVar MuscleElemAmount = MuscleParameters.MuscleElemAmount; ///< The total amount of elements for this muscle
 F0 = .SubjectMusPar.PCSAfactor*PCSA; //< Maximum force output at optimum fiber length
 Lf0 = MuscleParameters.OptimalFiberlength
       * cos(pi/180*MuscleParameters.Pennationangle);
 Vol0 = 1e-6*MuscleParameters.MuscleVolume/MuscleElemAmount; ///< Muscle volume in (m3)
 AnyVar PCSA = 1e4*Vol0/Lf0;///< PCSA (cm^2) is calculated as muscle volume divided between muscle branches, divided by fiber length and corrected for the pennation angle not used in the simple muscle model
};

AnyMuscleModel TibialisPosteriorMedialis2Par =
{
 AnyFolder &MuscleParameters = .SubjectMusPar.TibialisPosteriorMedialis;
 AnyIntVar MuscleElemNo = 2; ///< The number of this element of the muscle
 AnyIntVar MuscleElemAmount = MuscleParameters.MuscleElemAmount; ///< The total amount of elements for this muscle
 F0 = .SubjectMusPar.PCSAfactor*PCSA; //< Maximum force output at optimum fiber length
 Lf0 = MuscleParameters.OptimalFiberlength
       * cos(pi/180*MuscleParameters.Pennationangle);
 Vol0 = 1e-6*MuscleParameters.MuscleVolume/MuscleElemAmount; ///< Muscle volume in (m3)
 AnyVar PCSA = 1e4*Vol0/Lf0;///< PCSA (cm^2) is calculated as muscle volume divided between muscle branches, divided by fiber length and corrected for the pennation angle not used in the simple muscle model
};

AnyMuscleModel TibialisPosteriorMedialis3Par =
{
 AnyFolder &MuscleParameters = .SubjectMusPar.TibialisPosteriorMedialis;
 AnyIntVar MuscleElemNo = 3; ///< The number of this element of the muscle
 AnyIntVar MuscleElemAmount = MuscleParameters.MuscleElemAmount; ///< The total amount of elements for this muscle
 F0 = .SubjectMusPar.PCSAfactor*PCSA; //< Maximum force output at optimum fiber length
 Lf0 = MuscleParameters.OptimalFiberlength
       * cos(pi/180*MuscleParameters.Pennationangle);
 Vol0 = 1e-6*MuscleParameters.MuscleVolume/MuscleElemAmount; ///< Muscle volume in (m3)
 AnyVar PCSA = 1e4*Vol0/Lf0;///< PCSA (cm^2) is calculated as muscle volume divided between muscle branches, divided by fiber length and corrected for the pennation angle not used in the simple muscle model
};


/////////////////////////////////////////////////////
//     TibialisPosteriorLateralis (3 elements)     //
/////////////////////////////////////////////////////
AnyMuscleModel TibialisPosteriorLateralis1Par =
{
 AnyFolder &MuscleParameters = .SubjectMusPar.TibialisPosteriorLateralis;
 AnyIntVar MuscleElemNo = 1; ///< The number of this element of the muscle
 AnyIntVar MuscleElemAmount = MuscleParameters.MuscleElemAmount; ///< The total amount of elements for this muscle
 F0 = .SubjectMusPar.PCSAfactor*PCSA; //< Maximum force output at optimum fiber length
 Lf0 = MuscleParameters.OptimalFiberlength
       * cos(pi/180*MuscleParameters.Pennationangle);
 Vol0 = 1e-6*MuscleParameters.MuscleVolume/MuscleElemAmount; ///< Muscle volume in (m3)
 AnyVar PCSA = 1e4*Vol0/Lf0;///< PCSA (cm^2) is calculated as muscle volume divided between muscle branches, divided by fiber length and corrected for the pennation angle not used in the simple muscle model
};

AnyMuscleModel TibialisPosteriorLateralis2Par =
{
 AnyFolder &MuscleParameters = .SubjectMusPar.TibialisPosteriorLateralis;
 AnyIntVar MuscleElemNo = 2; ///< The number of this element of the muscle
 AnyIntVar MuscleElemAmount = MuscleParameters.MuscleElemAmount; ///< The total amount of elements for this muscle
 F0 = .SubjectMusPar.PCSAfactor*PCSA; //< Maximum force output at optimum fiber length
 Lf0 = MuscleParameters.OptimalFiberlength
       * cos(pi/180*MuscleParameters.Pennationangle);
 Vol0 = 1e-6*MuscleParameters.MuscleVolume/MuscleElemAmount; ///< Muscle volume in (m3)
 AnyVar PCSA = 1e4*Vol0/Lf0;///< PCSA (cm^2) is calculated as muscle volume divided between muscle branches, divided by fiber length and corrected for the pennation angle not used in the simple muscle model
};

AnyMuscleModel TibialisPosteriorLateralis3Par =
{
 AnyFolder &MuscleParameters = .SubjectMusPar.TibialisPosteriorLateralis;
 AnyIntVar MuscleElemNo = 3; ///< The number of this element of the muscle
 AnyIntVar MuscleElemAmount = MuscleParameters.MuscleElemAmount; ///< The total amount of elements for this muscle
 F0 = .SubjectMusPar.PCSAfactor*PCSA; //< Maximum force output at optimum fiber length
 Lf0 = MuscleParameters.OptimalFiberlength
       * cos(pi/180*MuscleParameters.Pennationangle);
 Vol0 = 1e-6*MuscleParameters.MuscleVolume/MuscleElemAmount; ///< Muscle volume in (m3)
 AnyVar PCSA = 1e4*Vol0/Lf0;///< PCSA (cm^2) is calculated as muscle volume divided between muscle branches, divided by fiber length and corrected for the pennation angle not used in the simple muscle model
};


////////////////////////////////////////////
//     VastusIntermedius (6 elements)     //
////////////////////////////////////////////
AnyMuscleModel VastusIntermedius1Par =
{
 AnyFolder &MuscleParameters = .SubjectMusPar.VastusIntermedius;
 AnyIntVar MuscleElemNo = 1; ///< The number of this element of the muscle
 AnyIntVar MuscleElemAmount = MuscleParameters.MuscleElemAmount; ///< The total amount of elements for this muscle
 F0 = .SubjectMusPar.PCSAfactor*PCSA; //< Maximum force output at optimum fiber length
 Lf0 = MuscleParameters.OptimalFiberlength
       * cos(pi/180*MuscleParameters.Pennationangle);
 Vol0 = 1e-6*MuscleParameters.MuscleVolume/MuscleElemAmount; ///< Muscle volume in (m3)
 AnyVar PCSA = 1e4*Vol0/Lf0;///< PCSA (cm^2) is calculated as muscle volume divided between muscle branches, divided by fiber length and corrected for the pennation angle not used in the simple muscle model
};

AnyMuscleModel VastusIntermedius2Par =
{
 AnyFolder &MuscleParameters = .SubjectMusPar.VastusIntermedius;
 AnyIntVar MuscleElemNo = 2; ///< The number of this element of the muscle
 AnyIntVar MuscleElemAmount = MuscleParameters.MuscleElemAmount; ///< The total amount of elements for this muscle
 F0 = .SubjectMusPar.PCSAfactor*PCSA; //< Maximum force output at optimum fiber length
 Lf0 = MuscleParameters.OptimalFiberlength
       * cos(pi/180*MuscleParameters.Pennationangle);
 Vol0 = 1e-6*MuscleParameters.MuscleVolume/MuscleElemAmount; ///< Muscle volume in (m3)
 AnyVar PCSA = 1e4*Vol0/Lf0;///< PCSA (cm^2) is calculated as muscle volume divided between muscle branches, divided by fiber length and corrected for the pennation angle not used in the simple muscle model
};

AnyMuscleModel VastusIntermedius3Par =
{
 AnyFolder &MuscleParameters = .SubjectMusPar.VastusIntermedius;
 AnyIntVar MuscleElemNo = 3; ///< The number of this element of the muscle
 AnyIntVar MuscleElemAmount = MuscleParameters.MuscleElemAmount; ///< The total amount of elements for this muscle
 F0 = .SubjectMusPar.PCSAfactor*PCSA; //< Maximum force output at optimum fiber length
 Lf0 = MuscleParameters.OptimalFiberlength
       * cos(pi/180*MuscleParameters.Pennationangle);
 Vol0 = 1e-6*MuscleParameters.MuscleVolume/MuscleElemAmount; ///< Muscle volume in (m3)
 AnyVar PCSA = 1e4*Vol0/Lf0;///< PCSA (cm^2) is calculated as muscle volume divided between muscle branches, divided by fiber length and corrected for the pennation angle not used in the simple muscle model
};

AnyMuscleModel VastusIntermedius4Par =
{
 AnyFolder &MuscleParameters = .SubjectMusPar.VastusIntermedius;
 AnyIntVar MuscleElemNo = 4; ///< The number of this element of the muscle
 AnyIntVar MuscleElemAmount = MuscleParameters.MuscleElemAmount; ///< The total amount of elements for this muscle
 F0 = .SubjectMusPar.PCSAfactor*PCSA; //< Maximum force output at optimum fiber length
 Lf0 = MuscleParameters.OptimalFiberlength
       * cos(pi/180*MuscleParameters.Pennationangle);
 Vol0 = 1e-6*MuscleParameters.MuscleVolume/MuscleElemAmount; ///< Muscle volume in (m3)
 AnyVar PCSA = 1e4*Vol0/Lf0;///< PCSA (cm^2) is calculated as muscle volume divided between muscle branches, divided by fiber length and corrected for the pennation angle not used in the simple muscle model
};

AnyMuscleModel VastusIntermedius5Par =
{
 AnyFolder &MuscleParameters = .SubjectMusPar.VastusIntermedius;
 AnyIntVar MuscleElemNo = 5; ///< The number of this element of the muscle
 AnyIntVar MuscleElemAmount = MuscleParameters.MuscleElemAmount; ///< The total amount of elements for this muscle
 F0 = .SubjectMusPar.PCSAfactor*PCSA; //< Maximum force output at optimum fiber length
 Lf0 = MuscleParameters.OptimalFiberlength
       * cos(pi/180*MuscleParameters.Pennationangle);
 Vol0 = 1e-6*MuscleParameters.MuscleVolume/MuscleElemAmount; ///< Muscle volume in (m3)
 AnyVar PCSA = 1e4*Vol0/Lf0;///< PCSA (cm^2) is calculated as muscle volume divided between muscle branches, divided by fiber length and corrected for the pennation angle not used in the simple muscle model
};

AnyMuscleModel VastusIntermedius6Par =
{
 AnyFolder &MuscleParameters = .SubjectMusPar.VastusIntermedius;
 AnyIntVar MuscleElemNo = 6; ///< The number of this element of the muscle
 AnyIntVar MuscleElemAmount = MuscleParameters.MuscleElemAmount; ///< The total amount of elements for this muscle
 F0 = .SubjectMusPar.PCSAfactor*PCSA; //< Maximum force output at optimum fiber length
 Lf0 = MuscleParameters.OptimalFiberlength
       * cos(pi/180*MuscleParameters.Pennationangle);
 Vol0 = 1e-6*MuscleParameters.MuscleVolume/MuscleElemAmount; ///< Muscle volume in (m3)
 AnyVar PCSA = 1e4*Vol0/Lf0;///< PCSA (cm^2) is calculated as muscle volume divided between muscle branches, divided by fiber length and corrected for the pennation angle not used in the simple muscle model
};


//////////////////////////////////////////////////
//     VastusLateralisInferior (6 elements)     //
//////////////////////////////////////////////////
AnyMuscleModel VastusLateralisInferior1Par =
{
 AnyFolder &MuscleParameters = .SubjectMusPar.VastusLateralisInferior;
 AnyIntVar MuscleElemNo = 1; ///< The number of this element of the muscle
 AnyIntVar MuscleElemAmount = MuscleParameters.MuscleElemAmount; ///< The total amount of elements for this muscle
 F0 = .SubjectMusPar.PCSAfactor*PCSA; //< Maximum force output at optimum fiber length
 Lf0 = MuscleParameters.OptimalFiberlength
       * cos(pi/180*MuscleParameters.Pennationangle);
 Vol0 = 1e-6*MuscleParameters.MuscleVolume/MuscleElemAmount; ///< Muscle volume in (m3)
 AnyVar PCSA = 1e4*Vol0/Lf0;///< PCSA (cm^2) is calculated as muscle volume divided between muscle branches, divided by fiber length and corrected for the pennation angle not used in the simple muscle model
};

AnyMuscleModel VastusLateralisInferior2Par =
{
 AnyFolder &MuscleParameters = .SubjectMusPar.VastusLateralisInferior;
 AnyIntVar MuscleElemNo = 2; ///< The number of this element of the muscle
 AnyIntVar MuscleElemAmount = MuscleParameters.MuscleElemAmount; ///< The total amount of elements for this muscle
 F0 = .SubjectMusPar.PCSAfactor*PCSA; //< Maximum force output at optimum fiber length
 Lf0 = MuscleParameters.OptimalFiberlength
       * cos(pi/180*MuscleParameters.Pennationangle);
 Vol0 = 1e-6*MuscleParameters.MuscleVolume/MuscleElemAmount; ///< Muscle volume in (m3)
 AnyVar PCSA = 1e4*Vol0/Lf0;///< PCSA (cm^2) is calculated as muscle volume divided between muscle branches, divided by fiber length and corrected for the pennation angle not used in the simple muscle model
};

AnyMuscleModel VastusLateralisInferior3Par =
{
 AnyFolder &MuscleParameters = .SubjectMusPar.VastusLateralisInferior;
 AnyIntVar MuscleElemNo = 3; ///< The number of this element of the muscle
 AnyIntVar MuscleElemAmount = MuscleParameters.MuscleElemAmount; ///< The total amount of elements for this muscle
 F0 = .SubjectMusPar.PCSAfactor*PCSA; //< Maximum force output at optimum fiber length
 Lf0 = MuscleParameters.OptimalFiberlength
       * cos(pi/180*MuscleParameters.Pennationangle);
 Vol0 = 1e-6*MuscleParameters.MuscleVolume/MuscleElemAmount; ///< Muscle volume in (m3)
 AnyVar PCSA = 1e4*Vol0/Lf0;///< PCSA (cm^2) is calculated as muscle volume divided between muscle branches, divided by fiber length and corrected for the pennation angle not used in the simple muscle model
};

AnyMuscleModel VastusLateralisInferior4Par =
{
 AnyFolder &MuscleParameters = .SubjectMusPar.VastusLateralisInferior;
 AnyIntVar MuscleElemNo = 4; ///< The number of this element of the muscle
 AnyIntVar MuscleElemAmount = MuscleParameters.MuscleElemAmount; ///< The total amount of elements for this muscle
 F0 = .SubjectMusPar.PCSAfactor*PCSA; //< Maximum force output at optimum fiber length
 Lf0 = MuscleParameters.OptimalFiberlength
       * cos(pi/180*MuscleParameters.Pennationangle);
 Vol0 = 1e-6*MuscleParameters.MuscleVolume/MuscleElemAmount; ///< Muscle volume in (m3)
 AnyVar PCSA = 1e4*Vol0/Lf0;///< PCSA (cm^2) is calculated as muscle volume divided between muscle branches, divided by fiber length and corrected for the pennation angle not used in the simple muscle model
};

AnyMuscleModel VastusLateralisInferior5Par =
{
 AnyFolder &MuscleParameters = .SubjectMusPar.VastusLateralisInferior;
 AnyIntVar MuscleElemNo = 5; ///< The number of this element of the muscle
 AnyIntVar MuscleElemAmount = MuscleParameters.MuscleElemAmount; ///< The total amount of elements for this muscle
 F0 = .SubjectMusPar.PCSAfactor*PCSA; //< Maximum force output at optimum fiber length
 Lf0 = MuscleParameters.OptimalFiberlength
       * cos(pi/180*MuscleParameters.Pennationangle);
 Vol0 = 1e-6*MuscleParameters.MuscleVolume/MuscleElemAmount; ///< Muscle volume in (m3)
 AnyVar PCSA = 1e4*Vol0/Lf0;///< PCSA (cm^2) is calculated as muscle volume divided between muscle branches, divided by fiber length and corrected for the pennation angle not used in the simple muscle model
};

AnyMuscleModel VastusLateralisInferior6Par =
{
 AnyFolder &MuscleParameters = .SubjectMusPar.VastusLateralisInferior;
 AnyIntVar MuscleElemNo = 6; ///< The number of this element of the muscle
 AnyIntVar MuscleElemAmount = MuscleParameters.MuscleElemAmount; ///< The total amount of elements for this muscle
 F0 = .SubjectMusPar.PCSAfactor*PCSA; //< Maximum force output at optimum fiber length
 Lf0 = MuscleParameters.OptimalFiberlength
       * cos(pi/180*MuscleParameters.Pennationangle);
 Vol0 = 1e-6*MuscleParameters.MuscleVolume/MuscleElemAmount; ///< Muscle volume in (m3)
 AnyVar PCSA = 1e4*Vol0/Lf0;///< PCSA (cm^2) is calculated as muscle volume divided between muscle branches, divided by fiber length and corrected for the pennation angle not used in the simple muscle model
};


//////////////////////////////////////////////////
//     VastusLateralisSuperior (2 elements)     //
//////////////////////////////////////////////////
AnyMuscleModel VastusLateralisSuperior1Par =
{
 AnyFolder &MuscleParameters = .SubjectMusPar.VastusLateralisSuperior;
 AnyIntVar MuscleElemNo = 1; ///< The number of this element of the muscle
 AnyIntVar MuscleElemAmount = MuscleParameters.MuscleElemAmount; ///< The total amount of elements for this muscle
 F0 = .SubjectMusPar.PCSAfactor*PCSA; //< Maximum force output at optimum fiber length
 Lf0 = MuscleParameters.OptimalFiberlength
       * cos(pi/180*MuscleParameters.Pennationangle);
 Vol0 = 1e-6*MuscleParameters.MuscleVolume/MuscleElemAmount; ///< Muscle volume in (m3)
 AnyVar PCSA = 1e4*Vol0/Lf0;///< PCSA (cm^2) is calculated as muscle volume divided between muscle branches, divided by fiber length and corrected for the pennation angle not used in the simple muscle model
};

AnyMuscleModel VastusLateralisSuperior2Par =
{
 AnyFolder &MuscleParameters = .SubjectMusPar.VastusLateralisSuperior;
 AnyIntVar MuscleElemNo = 2; ///< The number of this element of the muscle
 AnyIntVar MuscleElemAmount = MuscleParameters.MuscleElemAmount; ///< The total amount of elements for this muscle
 F0 = .SubjectMusPar.PCSAfactor*PCSA; //< Maximum force output at optimum fiber length
 Lf0 = MuscleParameters.OptimalFiberlength
       * cos(pi/180*MuscleParameters.Pennationangle);
 Vol0 = 1e-6*MuscleParameters.MuscleVolume/MuscleElemAmount; ///< Muscle volume in (m3)
 AnyVar PCSA = 1e4*Vol0/Lf0;///< PCSA (cm^2) is calculated as muscle volume divided between muscle branches, divided by fiber length and corrected for the pennation angle not used in the simple muscle model
};


/////////////////////////////////////////////////
//     VastusMedialisInferior (2 elements)     //
/////////////////////////////////////////////////
AnyMuscleModel VastusMedialisInferior1Par =
{
 AnyFolder &MuscleParameters = .SubjectMusPar.VastusMedialisInferior;
 AnyIntVar MuscleElemNo = 1; ///< The number of this element of the muscle
 AnyIntVar MuscleElemAmount = MuscleParameters.MuscleElemAmount; ///< The total amount of elements for this muscle
 F0 = .SubjectMusPar.PCSAfactor*PCSA; //< Maximum force output at optimum fiber length
 Lf0 = MuscleParameters.OptimalFiberlength
       * cos(pi/180*MuscleParameters.Pennationangle);
 Vol0 = 1e-6*MuscleParameters.MuscleVolume/MuscleElemAmount; ///< Muscle volume in (m3)
 AnyVar PCSA = 1e4*Vol0/Lf0;///< PCSA (cm^2) is calculated as muscle volume divided between muscle branches, divided by fiber length and corrected for the pennation angle not used in the simple muscle model
};

AnyMuscleModel VastusMedialisInferior2Par =
{
 AnyFolder &MuscleParameters = .SubjectMusPar.VastusMedialisInferior;
 AnyIntVar MuscleElemNo = 2; ///< The number of this element of the muscle
 AnyIntVar MuscleElemAmount = MuscleParameters.MuscleElemAmount; ///< The total amount of elements for this muscle
 F0 = .SubjectMusPar.PCSAfactor*PCSA; //< Maximum force output at optimum fiber length
 Lf0 = MuscleParameters.OptimalFiberlength
       * cos(pi/180*MuscleParameters.Pennationangle);
 Vol0 = 1e-6*MuscleParameters.MuscleVolume/MuscleElemAmount; ///< Muscle volume in (m3)
 AnyVar PCSA = 1e4*Vol0/Lf0;///< PCSA (cm^2) is calculated as muscle volume divided between muscle branches, divided by fiber length and corrected for the pennation angle not used in the simple muscle model
};


////////////////////////////////////////////
//     VastusMedialisMid (2 elements)     //
////////////////////////////////////////////
AnyMuscleModel VastusMedialisMid1Par =
{
 AnyFolder &MuscleParameters = .SubjectMusPar.VastusMedialisMid;
 AnyIntVar MuscleElemNo = 1; ///< The number of this element of the muscle
 AnyIntVar MuscleElemAmount = MuscleParameters.MuscleElemAmount; ///< The total amount of elements for this muscle
 F0 = .SubjectMusPar.PCSAfactor*PCSA; //< Maximum force output at optimum fiber length
 Lf0 = MuscleParameters.OptimalFiberlength
       * cos(pi/180*MuscleParameters.Pennationangle);
 Vol0 = 1e-6*MuscleParameters.MuscleVolume/MuscleElemAmount; ///< Muscle volume in (m3)
 AnyVar PCSA = 1e4*Vol0/Lf0;///< PCSA (cm^2) is calculated as muscle volume divided between muscle branches, divided by fiber length and corrected for the pennation angle not used in the simple muscle model
};

AnyMuscleModel VastusMedialisMid2Par =
{
 AnyFolder &MuscleParameters = .SubjectMusPar.VastusMedialisMid;
 AnyIntVar MuscleElemNo = 2; ///< The number of this element of the muscle
 AnyIntVar MuscleElemAmount = MuscleParameters.MuscleElemAmount; ///< The total amount of elements for this muscle
 F0 = .SubjectMusPar.PCSAfactor*PCSA; //< Maximum force output at optimum fiber length
 Lf0 = MuscleParameters.OptimalFiberlength
       * cos(pi/180*MuscleParameters.Pennationangle);
 Vol0 = 1e-6*MuscleParameters.MuscleVolume/MuscleElemAmount; ///< Muscle volume in (m3)
 AnyVar PCSA = 1e4*Vol0/Lf0;///< PCSA (cm^2) is calculated as muscle volume divided between muscle branches, divided by fiber length and corrected for the pennation angle not used in the simple muscle model
};


/////////////////////////////////////////////////
//     VastusMedialisSuperior (6 elements)     //
/////////////////////////////////////////////////
AnyMuscleModel VastusMedialisSuperior1Par =
{
 AnyFolder &MuscleParameters = .SubjectMusPar.VastusMedialisSuperior;
 AnyIntVar MuscleElemNo = 1; ///< The number of this element of the muscle
 AnyIntVar MuscleElemAmount = MuscleParameters.MuscleElemAmount; ///< The total amount of elements for this muscle
 F0 = .SubjectMusPar.PCSAfactor*PCSA; //< Maximum force output at optimum fiber length
 Lf0 = MuscleParameters.OptimalFiberlength
       * cos(pi/180*MuscleParameters.Pennationangle);
 Vol0 = 1e-6*MuscleParameters.MuscleVolume/MuscleElemAmount; ///< Muscle volume in (m3)
 AnyVar PCSA = 1e4*Vol0/Lf0;///< PCSA (cm^2) is calculated as muscle volume divided between muscle branches, divided by fiber length and corrected for the pennation angle not used in the simple muscle model
};

AnyMuscleModel VastusMedialisSuperior2Par =
{
 AnyFolder &MuscleParameters = .SubjectMusPar.VastusMedialisSuperior;
 AnyIntVar MuscleElemNo = 2; ///< The number of this element of the muscle
 AnyIntVar MuscleElemAmount = MuscleParameters.MuscleElemAmount; ///< The total amount of elements for this muscle
 F0 = .SubjectMusPar.PCSAfactor*PCSA; //< Maximum force output at optimum fiber length
 Lf0 = MuscleParameters.OptimalFiberlength
       * cos(pi/180*MuscleParameters.Pennationangle);
 Vol0 = 1e-6*MuscleParameters.MuscleVolume/MuscleElemAmount; ///< Muscle volume in (m3)
 AnyVar PCSA = 1e4*Vol0/Lf0;///< PCSA (cm^2) is calculated as muscle volume divided between muscle branches, divided by fiber length and corrected for the pennation angle not used in the simple muscle model
};

AnyMuscleModel VastusMedialisSuperior3Par =
{
 AnyFolder &MuscleParameters = .SubjectMusPar.VastusMedialisSuperior;
 AnyIntVar MuscleElemNo = 3; ///< The number of this element of the muscle
 AnyIntVar MuscleElemAmount = MuscleParameters.MuscleElemAmount; ///< The total amount of elements for this muscle
 F0 = .SubjectMusPar.PCSAfactor*PCSA; //< Maximum force output at optimum fiber length
 Lf0 = MuscleParameters.OptimalFiberlength
       * cos(pi/180*MuscleParameters.Pennationangle);
 Vol0 = 1e-6*MuscleParameters.MuscleVolume/MuscleElemAmount; ///< Muscle volume in (m3)
 AnyVar PCSA = 1e4*Vol0/Lf0;///< PCSA (cm^2) is calculated as muscle volume divided between muscle branches, divided by fiber length and corrected for the pennation angle not used in the simple muscle model
};

AnyMuscleModel VastusMedialisSuperior4Par =
{
 AnyFolder &MuscleParameters = .SubjectMusPar.VastusMedialisSuperior;
 AnyIntVar MuscleElemNo = 4; ///< The number of this element of the muscle
 AnyIntVar MuscleElemAmount = MuscleParameters.MuscleElemAmount; ///< The total amount of elements for this muscle
 F0 = .SubjectMusPar.PCSAfactor*PCSA; //< Maximum force output at optimum fiber length
 Lf0 = MuscleParameters.OptimalFiberlength
       * cos(pi/180*MuscleParameters.Pennationangle);
 Vol0 = 1e-6*MuscleParameters.MuscleVolume/MuscleElemAmount; ///< Muscle volume in (m3)
 AnyVar PCSA = 1e4*Vol0/Lf0;///< PCSA (cm^2) is calculated as muscle volume divided between muscle branches, divided by fiber length and corrected for the pennation angle not used in the simple muscle model
};

AnyMuscleModel VastusMedialisSuperior5Par =
{
 AnyFolder &MuscleParameters = .SubjectMusPar.VastusMedialisSuperior;
 AnyIntVar MuscleElemNo = 5; ///< The number of this element of the muscle
 AnyIntVar MuscleElemAmount = MuscleParameters.MuscleElemAmount; ///< The total amount of elements for this muscle
 F0 = .SubjectMusPar.PCSAfactor*PCSA; //< Maximum force output at optimum fiber length
 Lf0 = MuscleParameters.OptimalFiberlength
       * cos(pi/180*MuscleParameters.Pennationangle);
 Vol0 = 1e-6*MuscleParameters.MuscleVolume/MuscleElemAmount; ///< Muscle volume in (m3)
 AnyVar PCSA = 1e4*Vol0/Lf0;///< PCSA (cm^2) is calculated as muscle volume divided between muscle branches, divided by fiber length and corrected for the pennation angle not used in the simple muscle model
};

AnyMuscleModel VastusMedialisSuperior6Par =
{
 AnyFolder &MuscleParameters = .SubjectMusPar.VastusMedialisSuperior;
 AnyIntVar MuscleElemNo = 6; ///< The number of this element of the muscle
 AnyIntVar MuscleElemAmount = MuscleParameters.MuscleElemAmount; ///< The total amount of elements for this muscle
 F0 = .SubjectMusPar.PCSAfactor*PCSA; //< Maximum force output at optimum fiber length
 Lf0 = MuscleParameters.OptimalFiberlength
       * cos(pi/180*MuscleParameters.Pennationangle);
 Vol0 = 1e-6*MuscleParameters.MuscleVolume/MuscleElemAmount; ///< Muscle volume in (m3)
 AnyVar PCSA = 1e4*Vol0/Lf0;///< PCSA (cm^2) is calculated as muscle volume divided between muscle branches, divided by fiber length and corrected for the pennation angle not used in the simple muscle model
};
