AnyFileVar FilenameThigh = "femur";
AnyFileVar FilenameShank = "tibia";
AnyFileVar FilenamePelvis = "pelvis";
AnyFileVar FilenameFoot = "subtalar";
AnyFileVar FilenamePatella = "patella";
AnyFileVar FilenameTalus = "talus";
