AnyFileVar FilenameThigh = "femur";//"Cad3_Femur_ISB_final.stl";
AnyFileVar FilenameShank = "tibia";//"Cad3_Tibia_ISB_final.stl"
AnyFileVar FilenameFibula = "fibula";//"?.stl";
AnyFileVar FilenamePelvis = "pelvis";//"?.stl";
AnyFileVar FilenameSacrum = "SacrumSymmSeg";//"?.stl"; old "sacrum.anysurf3" corresponds to "Cad3_Sacrum_ISB.stl";
AnyFileVar FilenameFoot = "foot";//"foot_ISB.stl";
AnyFileVar FilenamePatella = "patella";//"?.stl";
AnyFileVar FilenameTalus = "talus";//"talus_ISB.stl";

AnyFileVar FilenameThighSkin = "Cad3_Femur_Skin_ISB";
AnyFileVar FilenameShankSkin = "Cad3_Tibia_Skin_ISB";
AnyFileVar FilenamePelvisSkin = "Cad3_Pelvis_Skin_ISB";
AnyFileVar FilenameFootSkin = "Foot_Skin_ISB";

AnyFileVar FilenameThighMuscleTissue = "Cad3_Femur_MuscleTissue_ISB";
AnyFileVar FilenameShankMuscleTissue = "Cad3_Tibia_MuscleTissue_ISB";
AnyFileVar FilenamePelvisMuscleTissue = "Cad3_Pelvis_MuscleTissue_ISB";
AnyFileVar FilenameFootMuscleTissue = "Foot_Muscles_ISB";

AnyFileVar FilenameThighMorphing = "cad 3 femur ISB final";
AnyFileVar FilenameShankMorphing = "cad 3 tibia fibula ISB final";
AnyFileVar FilenamePelvisMorphing = "cad 3 pelvis ISB final HIP";
