AnyFolder Scaling = {

  #include "<ANYBODY_PATH_BODY>/BodyModels/GenericBodyModel/BodyModel.StandardParameters.any"

  AnyFolder MassScaling = {
    AnyFolder Pelvis = { AnyVar MassScale = ..AnyManRef.SegmentMasses.Pelvis / ..StandardParameters.Pelvis.Mass; };
    AnyFolder Head = { AnyVar MassScale = (..AnyManRef.SegmentMasses.Head) / (..StandardParameters.Head.Mass); };
    AnyFolder Cervical = { AnyVar MassScale = .Head.MassScale;};
    AnyFolder Trunk = { AnyVar MassScale = ( ..AnyManRef.SegmentMasses.Thorax) / (..StandardParameters.Trunk.Mass  ); }; //Ratio of mass of thorax plus lumbar mass
    AnyFolder Lumbar = { AnyVar MassScale = (..AnyManRef.SegmentMasses.Lumbar) / (..StandardParameters.Lumbar.Mass); };//Ratio of mass of lumbar mass
    AnyFolder Right =
    {
      AnyFolder Clavicula = { AnyVar MassScale = ...AnyManRef.SegmentMasses.Right.Clavicle / (...StandardParameters.Clavicula.Mass + ...StandardParameters.Scapula.Mass); };
      AnyFolder Scapula   = { AnyVar MassScale = ...AnyManRef.SegmentMasses.Right.Clavicle / (...StandardParameters.Clavicula.Mass + ...StandardParameters.Scapula.Mass); };
      AnyFolder Humerus   = { AnyVar MassScale = ...AnyManRef.SegmentMasses.Right.UpperArm / ...StandardParameters.Humerus.Mass; };
      AnyFolder Ulna      = { AnyVar MassScale = ...AnyManRef.SegmentMasses.Right.LowerArm / (...StandardParameters.Ulna.Mass+ ...StandardParameters.Radius.Mass); };
      AnyFolder Radius    = { AnyVar MassScale = ...AnyManRef.SegmentMasses.Right.LowerArm / (...StandardParameters.Ulna.Mass+ ...StandardParameters.Radius.Mass);  };
      AnyFolder Hand      = { AnyVar MassScale = ...AnyManRef.SegmentMasses.Right.Hand / ...StandardParameters.Hand.Mass; };
      AnyFolder Foot      = { AnyVar MassScale = ...AnyManRef.SegmentMasses.Right.Foot  / ...StandardParameters.Right.Foot.Mass; };
      AnyFolder Talus     = { AnyVar MassScale = ...AnyManRef.SegmentMasses.Right.Talus / ...StandardParameters.Right.Talus.Mass; };
      AnyFolder Shank     = { AnyVar MassScale = ...AnyManRef.SegmentMasses.Right.Shank / ...StandardParameters.Right.Shank.Mass; };
      AnyFolder Thigh     = { AnyVar MassScale = ...AnyManRef.SegmentMasses.Right.Thigh / ...StandardParameters.Right.Thigh.Mass; };
    };
    AnyFolder Left =
    {
      AnyFolder Clavicula = { AnyVar MassScale = ...AnyManRef.SegmentMasses.Left.Clavicle / (...StandardParameters.Clavicula.Mass + ...StandardParameters.Scapula.Mass); };
      AnyFolder Scapula   = { AnyVar MassScale = ...AnyManRef.SegmentMasses.Left.Clavicle / (...StandardParameters.Clavicula.Mass + ...StandardParameters.Scapula.Mass); };
      AnyFolder Humerus   = { AnyVar MassScale = ...AnyManRef.SegmentMasses.Left.UpperArm / ...StandardParameters.Humerus.Mass; };
      AnyFolder Ulna      = { AnyVar MassScale = ...AnyManRef.SegmentMasses.Left.LowerArm / (...StandardParameters.Ulna.Mass+ ...StandardParameters.Radius.Mass); };
      AnyFolder Radius    = { AnyVar MassScale = ...AnyManRef.SegmentMasses.Left.LowerArm / (...StandardParameters.Ulna.Mass+ ...StandardParameters.Radius.Mass);  };
      AnyFolder Hand      = { AnyVar MassScale = ...AnyManRef.SegmentMasses.Left.Hand / ...StandardParameters.Hand.Mass; };
      AnyFolder Foot      = { AnyVar MassScale = ...AnyManRef.SegmentMasses.Left.Foot  / ...StandardParameters.Left.Foot.Mass; };
      AnyFolder Talus     = { AnyVar MassScale = ...AnyManRef.SegmentMasses.Left.Talus / ...StandardParameters.Left.Talus.Mass; };
      AnyFolder Shank     = { AnyVar MassScale = ...AnyManRef.SegmentMasses.Left.Shank / ...StandardParameters.Left.Shank.Mass; };
      AnyFolder Thigh     = { AnyVar MassScale = ...AnyManRef.SegmentMasses.Left.Thigh / ...StandardParameters.Left.Thigh.Mass; };
    };
  };

  AnyFolder StrengthScaling = {
    AnyVar p = (2/3); //Power
    AnyFolder Pelvis = { AnyVar StrengthScale = (..AnyManRef.SegmentMasses.Pelvis/ ..StandardParameters.Pelvis.Mass)^.p; };
    AnyFolder Spine = { AnyVar StrengthScale = ((..AnyManRef.SegmentMasses.Thorax + ..AnyManRef.SegmentMasses.Lumbar) / (..StandardParameters.Trunk.Mass + ..StandardParameters.Lumbar.Mass))^.p; };

    AnyFolder Right =
    {
      AnyFolder Humerus = { AnyVar StrengthScale = (...AnyManRef.SegmentMasses.Right.UpperArm /    ...StandardParameters.Humerus.Mass)^..p; };
      AnyFolder Ulna    = { AnyVar StrengthScale = (...AnyManRef.SegmentMasses.Right.LowerArm / (2*...StandardParameters.Ulna.Mass) )^..p; };
      AnyFolder Hand    = { AnyVar StrengthScale = (...AnyManRef.SegmentMasses.Right.Hand      /    ...StandardParameters.Hand.Mass)^..p; };
      AnyFolder Shank = { AnyVar StrengthScale = (...AnyManRef.SegmentMasses.Right.Shank / ...StandardParameters.Right.Shank.Mass)^..p; };
      AnyFolder Thigh = { AnyVar StrengthScale = (...AnyManRef.SegmentMasses.Right.Thigh / ...StandardParameters.Right.Thigh.Mass)^..p; };
      AnyFolder Foot =  { AnyVar StrengthScale = (...AnyManRef.SegmentMasses.Right.Foot / ...StandardParameters.Right.Foot.Mass)^..p; };
    };
    AnyFolder Left =
    {
      AnyFolder Humerus = { AnyVar StrengthScale = (...AnyManRef.SegmentMasses.Left.UpperArm /    ...StandardParameters.Humerus.Mass)^..p; };
      AnyFolder Ulna    = { AnyVar StrengthScale = (...AnyManRef.SegmentMasses.Left.LowerArm / (2*...StandardParameters.Ulna.Mass) )^..p; };
      AnyFolder Hand    = { AnyVar StrengthScale = (...AnyManRef.SegmentMasses.Left.Hand      /    ...StandardParameters.Hand.Mass)^..p; };
      AnyFolder Shank = { AnyVar StrengthScale = (...AnyManRef.SegmentMasses.Left.Shank / ...StandardParameters.Left.Shank.Mass)^..p; };
      AnyFolder Thigh = { AnyVar StrengthScale = (...AnyManRef.SegmentMasses.Left.Thigh / ...StandardParameters.Left.Thigh.Mass)^..p; };
      AnyFolder Foot =  { AnyVar StrengthScale = (...AnyManRef.SegmentMasses.Left.Foot / ...StandardParameters.Left.Foot.Mass)^..p; };
    };
  };

  AnyFolder FiberLengthScaling = {
    AnyFolder Pelvis = { AnyVar FiberLengthScale = ..AnyManRef.SegmentDimensions.PelvisWidth / ..StandardParameters.Pelvis.Width; };
    AnyFolder Right =
    {
      AnyFolder Shank = { AnyVar FiberLengthScale  = ...AnyManRef.SegmentDimensions.Right.ShankLength / ...StandardParameters.Right.Shank.Length; };
      AnyFolder Thigh = { AnyVar FiberLengthScale  = ...AnyManRef.SegmentDimensions.Right.ThighLength / ...StandardParameters.Right.Thigh.Length; };
      AnyFolder Foot = { AnyVar FiberLengthScale  = ...AnyManRef.SegmentDimensions.Right.FootLength / ...StandardParameters.Right.Foot.Length; };
    };
    AnyFolder Left =
    {
      AnyFolder Shank = { AnyVar FiberLengthScale  = ...AnyManRef.SegmentDimensions.Left.ShankLength / ...StandardParameters.Left.Shank.Length; };
      AnyFolder Thigh = { AnyVar FiberLengthScale  = ...AnyManRef.SegmentDimensions.Left.ThighLength / ...StandardParameters.Left.Thigh.Length; };
      AnyFolder Foot = { AnyVar FiberLengthScale  = ...AnyManRef.SegmentDimensions.Left.FootLength / ...StandardParameters.Left.Foot.Length; };
    };
  };

  AnyFolder GeometricalScaling = {

    AnyFolder Right ={

      AnyFolder Clavicula = {
        AnyFunTransform3DLin ScaleFunction = {
          AnyMat33 ARel= {      {-0.280836,  0.188095, -0.941144},      {-0.004752,  0.980323, 0.197343},       { 0.959744, 0.059893,  -0.274416}}';
          ScaleMat = ARel*...Trunk.ScaleFunction.ScaleMat*(ARel');
          Offset = {0,0,0}*ARel';
        };
      };

      AnyFolder Scapula = {
        AnyFunTransform3DLin ScaleFunction = {
          AnyMat33 ARel ={{0.561294, -0.097357, -0.821870},    {0.151325, 0.988389, -0.013736},    {0.813664, -0.116660, 0.569509}}';
          ScaleMat = ARel*...Trunk.ScaleFunction.ScaleMat*(ARel');
          Offset = {0,0,0}*ARel';
        };
      };

      AnyFolder Humerus = {
        AnyVar GeomScale = (...AnyManRef.SegmentDimensions.Right.UpperArmLength / ...StandardParameters.Humerus.Length);
        AnyFunTransform3DLin ScaleFunction = {
          ScaleMat ={{.GeomScale,0,0},{0,.GeomScale,0},{0,0,.GeomScale}};
          Offset = {0,0,0};
        };
      };

      AnyFolder Ulna = {
        AnyVar GeomScale = (...AnyManRef.SegmentDimensions.Right.LowerArmLength / ...StandardParameters.Ulna.Length);
        AnyFunTransform3DLin ScaleFunction = {
          ScaleMat ={{.GeomScale,0,0},{0,.GeomScale,0},{0,0,.GeomScale}};
          Offset = {0,0,0};
        };
      };

      AnyFolder Radius = {
        AnyFunTransform3DLin ScaleFunction = {
          //This Arel is used for mapping the scaling of ulna into the radius coordinate system
          //which is rotated, Arel has been found for a neutral position
          AnyMat33 ARel = {{-0.145873, -0.989303, -0.000001}, {0.989303, -0.145873, 0.000001}, {-0.000001, -0.000000, 1.000000}};
          AnyMat33 ScaleXYZ = ..Ulna.ScaleFunction.ScaleMat;
          ScaleMat = ARel'*ScaleXYZ*ARel;
          Offset = {0,0,0}*ARel;      };
      };

      AnyFolder Hand = {
        AnyVar HandLength = ...AnyManRef.SegmentDimensions.Right.HandLength;
        AnyVar HandBreadth = ...AnyManRef.SegmentDimensions.Right.HandBreadth;
        AnyFunTransform3DLin ScaleFunction = {
          AnyVar BreadthScale = .HandBreadth/....StandardParameters.Hand.HandBreadth;
          AnyVar LengthScale =  .HandLength/....StandardParameters.Hand.HandLength;

          ScaleMat ={{LengthScale,0,0},{0,BreadthScale,0},{0,0,BreadthScale}};

          Offset = {0,0,0};
        };
      };

      AnyFolder Foot  = {
        AnyVar GeomScale = (...AnyManRef.SegmentDimensions.Right.FootLength / ...StandardParameters.Right.Foot.Length);
        AnyFunTransform3DLin ScaleFunction = {

          ScaleMat ={{.GeomScale,0,0},{0,.GeomScale,0},{0,0,.GeomScale}};
          Offset = {0,0,0};
        };
      };

      AnyFolder Shank = {
        AnyVar GeomScale = (...AnyManRef.SegmentDimensions.Right.ShankLength / ...StandardParameters.Right.Shank.Length);
        AnyFunTransform3DLin ScaleFunction = {
          ScaleMat ={{.GeomScale,0,0},{0,.GeomScale,0},{0,0,.GeomScale}};
          Offset = {0,0,0};
        };
      };

      AnyFolder Thigh = {
        AnyVar GeomScale = (...AnyManRef.SegmentDimensions.Right.ThighLength / ...StandardParameters.Right.Thigh.Length);
        AnyFunTransform3DLin ScaleFunction = {
          ScaleMat ={{.GeomScale,0,0},{0,.GeomScale,0},{0,0,.GeomScale}};
          Offset = {0,0,0};
        };
      };

      // Talus uses the scaling function of the Foot segment
      AnyFolder &Talus = Foot;

      // Patella uses the scaling function of the Thigh segment.
      AnyFolder &Patella = Thigh;

    };//Right
    AnyFolder Left ={

      AnyFolder Clavicula = {
        AnyFunTransform3DLin ScaleFunction = {
          AnyMat33 ARel= {      {-0.280836,  0.188095, -0.941144},      {-0.004752,  0.980323, 0.197343},       { 0.959744, 0.059893,  -0.274416}}';
          ScaleMat = ARel*...Trunk.ScaleFunction.ScaleMat*(ARel');
          Offset = {0,0,0}*ARel';
        };
      };

      AnyFolder Scapula = {
        AnyFunTransform3DLin ScaleFunction = {
          AnyMat33 ARel ={{0.561294, -0.097357, -0.821870},    {0.151325, 0.988389, -0.013736},    {0.813664, -0.116660, 0.569509}}';
          ScaleMat = ARel*...Trunk.ScaleFunction.ScaleMat*(ARel');
          Offset = {0,0,0}*ARel';
        };
      };

      AnyFolder Humerus = {
        AnyVar GeomScale = (...AnyManRef.SegmentDimensions.Left.UpperArmLength / ...StandardParameters.Humerus.Length);
        AnyFunTransform3DLin ScaleFunction = {
          ScaleMat ={{.GeomScale,0,0},{0,.GeomScale,0},{0,0,.GeomScale}};
          Offset = {0,0,0};
        };
      };

      AnyFolder Ulna = {
        AnyVar GeomScale = (...AnyManRef.SegmentDimensions.Left.LowerArmLength / ...StandardParameters.Ulna.Length);
        AnyFunTransform3DLin ScaleFunction = {
          ScaleMat ={{.GeomScale,0,0},{0,.GeomScale,0},{0,0,.GeomScale}};
          Offset = {0,0,0};
        };
      };

      AnyFolder Radius = {
        AnyFunTransform3DLin ScaleFunction = {
          //This Arel is used for mapping the scaling of ulna into the radius coordinate system
          //which is rotated, Arel has been found for a neutral position
          AnyMat33 ARel = {{-0.145873, -0.989303, -0.000001}, {0.989303, -0.145873, 0.000001}, {-0.000001, -0.000000, 1.000000}};
          AnyMat33 ScaleXYZ = ..Ulna.ScaleFunction.ScaleMat;
          ScaleMat = ARel'*ScaleXYZ*ARel;
          Offset = {0,0,0}*ARel;      };
      };

      AnyFolder Hand = {
        AnyVar HandLength = ...AnyManRef.SegmentDimensions.Left.HandLength;
        AnyVar HandBreadth = ...AnyManRef.SegmentDimensions.Left.HandBreadth;
        AnyFunTransform3DLin ScaleFunction = {
          AnyVar BreadthScale = .HandBreadth/....StandardParameters.Hand.HandBreadth;
          AnyVar LengthScale =  .HandLength/....StandardParameters.Hand.HandLength;

          ScaleMat ={{LengthScale,0,0},{0,BreadthScale,0},{0,0,BreadthScale}};

          Offset = {0,0,0};
        };
      };


      AnyFolder Foot  = {
        AnyVar    GeomScale = (...AnyManRef.SegmentDimensions.Left.FootLength / ...StandardParameters.Left.Foot.Length);
        AnyFunTransform3DLin ScaleFunction = {
          ScaleMat ={{.GeomScale,0,0},{0,.GeomScale,0},{0,0,.GeomScale}};
          Offset = {0,0,0};
        };
      };

      AnyFolder Shank = {
        AnyVar GeomScale = (...AnyManRef.SegmentDimensions.Left.ShankLength / ...StandardParameters.Left.Shank.Length);
        AnyFunTransform3DLin ScaleFunction = {
          ScaleMat ={{.GeomScale,0,0},{0,.GeomScale,0},{0,0,.GeomScale}};
          Offset = {0,0,0};
        };
      };

      AnyFolder Thigh = {
        AnyVar GeomScale = (...AnyManRef.SegmentDimensions.Left.ThighLength / ...StandardParameters.Left.Thigh.Length);
        AnyFunTransform3DLin ScaleFunction = {
          ScaleMat ={{.GeomScale,0,0},{0,.GeomScale,0},{0,0,.GeomScale}};
          Offset = {0,0,0};
        };
      };

      // Talus uses the scaling function of the Foot segment
      AnyFolder &Talus = Foot;

      // Patella uses the scaling function of the Thigh segment.
      AnyFolder &Patella = Thigh;

    };//Left

    // Common law for the upper body
    // *****************************

    AnyFolder Pelvis = {
      AnyVar GeomScale = (..AnyManRef.SegmentDimensions.PelvisWidth / ..StandardParameters.Pelvis.Width);
      AnyFunTransform3DLin ScaleFunction = {
        ScaleMat ={{.GeomScale,0,0},{0,.GeomScale,0},{0,0,.GeomScale}};
        Offset = {0,0,0};
      };
    };

    AnyFolder Trunk = {
      AnyVar GeomScale = (..AnyManRef.SegmentDimensions.TrunkHeight / ..StandardParameters.Trunk.Height);
      AnyFunTransform3DLin ScaleFunction = {
        ScaleMat ={{.GeomScale,0,0},{0,.GeomScale,0},{0,0,.GeomScale}};
        Offset = {0,0,0};
      };
    };

    AnyFolder Head = {
      AnyVar GeomScale = (..AnyManRef.SegmentDimensions.HeadHeight / ..StandardParameters.Head.Height);
      AnyFunTransform3DLin ScaleFunction = {
        ScaleMat ={{.GeomScale,0,0},{0,.GeomScale,0},{0,0,.GeomScale}};
        Offset = {0,0,0};
      };
    };


    AnyFolder Cervical = {
      AnyFunTransform3DLin &ScaleFunction = .Head.ScaleFunction;
    };

    AnyFolder Lumbar = {
      AnyVar GeomScale = (..AnyManRef.SegmentDimensions.TrunkHeight / ..StandardParameters.Trunk.Height);
      AnyFunTransform3DLin ScaleFunction = {
        ScaleMat ={{.GeomScale,0,0},{0,.GeomScale,0},{0,0,.GeomScale}};
        Offset = {0,0,0};
      };
    };

    AnyFolder &PelvisSeg = Pelvis;
    AnyFolder &SkullSeg = Head;
    AnyFolder &ThoraxSeg = Trunk;

    AnyFolder &C1Seg = Cervical;
    AnyFolder &C2Seg = Cervical;
    AnyFolder &C3Seg = Cervical;
    AnyFolder &C4Seg = Cervical;
    AnyFolder &C5Seg = Cervical;
    AnyFolder &C6Seg = Cervical;
    AnyFolder &C7Seg = Cervical;

    AnyFolder &L1Seg = Lumbar;
    AnyFolder &L2Seg = Lumbar;
    AnyFolder &L3Seg = Lumbar;
    AnyFolder &L4Seg = Lumbar;
    AnyFolder &L5Seg = Lumbar;
    AnyFolder &SacrumSeg = PelvisSeg;

  };

};
