AnyReacForce LayerReactions = {
  AnyJoint &Layer1_SphericalRotational = .Layer_L1.Joints.Vertebrate_Layer;
  AnyJoint &Layer2_SphericalRotational = .Layer_L2.Joints.Vertebrate_Layer;
  AnyJoint &Layer3_SphericalRotational = .Layer_L3.Joints.Vertebrate_Layer;
  AnyJoint &Layer4_SphericalRotational = .Layer_L4.Joints.Vertebrate_Layer;
  AnyJoint &Layer5_SphericalRotational = .Layer_L5.Joints.Vertebrate_Layer;

  AnyJoint &Layer1_YCavitySeg_Driver = .Layer_L1.Joints.BaseSegPosterior_CavitySegPosterior;
  AnyJoint &Layer2_YCavitySeg_Driver = .Layer_L2.Joints.BaseSegPosterior_CavitySegPosterior;
  AnyJoint &Layer3_YCavitySeg_Driver = .Layer_L3.Joints.BaseSegPosterior_CavitySegPosterior;
  AnyJoint &Layer4_YCavitySeg_Driver = .Layer_L4.Joints.BaseSegPosterior_CavitySegPosterior;
  AnyJoint &Layer5_YCavitySeg_Driver = .Layer_L5.Joints.BaseSegPosterior_CavitySegPosterior;

  AnyKinMeasure &Layer1_X_Driver = .Layer_L1.Joints.BaseSeg_Posterior_Anterior_constraint;
  AnyKinMeasure &Layer2_X_Driver = .Layer_L2.Joints.BaseSeg_Posterior_Anterior_constraint;
  AnyKinMeasure &Layer3_X_Driver = .Layer_L3.Joints.BaseSeg_Posterior_Anterior_constraint;
  AnyKinMeasure &Layer4_X_Driver = .Layer_L4.Joints.BaseSeg_Posterior_Anterior_constraint;
  AnyKinMeasure &Layer5_X_Driver = .Layer_L5.Joints.BaseSeg_Posterior_Anterior_constraint;


  AnyKinMeasureOrg DiaphraghmSupport = {
    AnyKinMeasure &ref = ..Diaphragm.Joints.CavitySegConstraint.measure;
    MeasureOrganizer = {1};
  };
};
