/**
Definitions of the Joints in the lumbar spine. From PelvisL5 to T12L1
*/
AnyFolder JointsLumbar = {

  #if SI_JNT_TYPE == "SPHERICAL"
  AnySphericalJoint SacrumPelvisJnt = {
    AnyRefNode &PelvisNode = ..SegmentsLumbar.PelvisSeg.PelvisSacrumJntNode;
    AnyRefNode &SacrumNode = ..SegmentsLumbar.SacrumSeg.SacrumPelvisJntNode;
  };
  #endif
  #if SI_JNT_TYPE == "REVOLUTE"
  AnyRevoluteJoint SacrumPelvisJnt = {
    AnyRefNode &PelvisNode = ..SegmentsLumbar.PelvisSeg.PelvisSacrumJntNode;
    AnyRefNode &SacrumNode = ..SegmentsLumbar.SacrumSeg.SacrumPelvisJntNode;
  };
  #endif
  #if SI_JNT_TYPE == "CYLINDRICAL"
  AnyCylindricalJoint SacrumPelvisJnt = {
    AnyRefNode &PelvisNode = ..SegmentsLumbar.PelvisSeg.PelvisSacrumJntNode;
    AnyRefNode &SacrumNode = ..SegmentsLumbar.SacrumSeg.SacrumPelvisJntNode;
  };
  #endif

  //There are no muscles attached to sacrum
  AnyReacForce SacrumPelvisReaction = {
    AnyJoint &ref=.SacrumPelvisJnt ;
  };

  AnySphericalJoint L5SacrumJnt = {
    AnyRefNode &SacrumNode = ..SegmentsLumbar.SacrumSeg.SacrumL5JntNode;
    AnyRefNode &L5Node = ..SegmentsLumbar.L5Seg.L5SacrumJntNode;
  };

  AnySphericalJoint L4L5Jnt = {
    AnyRefNode &L5Node = ..SegmentsLumbar.L5Seg.L4L5JntNode;
    AnyRefNode &L4Node = ..SegmentsLumbar.L4Seg.L4L5JntNode;
  };

  AnySphericalJoint L3L4Jnt = {
    AnyRefNode &L4Node = ..SegmentsLumbar.L4Seg.L3L4JntNode;
    AnyRefNode &L3Node = ..SegmentsLumbar.L3Seg.L3L4JntNode;
  };

  AnySphericalJoint L2L3Jnt = {
    AnyRefNode &L3Node = ..SegmentsLumbar.L3Seg.L2L3JntNode;
    AnyRefNode &L2Node = ..SegmentsLumbar.L2Seg.L2L3JntNode;
  };

  AnySphericalJoint L1L2Jnt = {
    AnyRefNode &L2Node = ..SegmentsLumbar.L2Seg.L1L2JntNode;
    AnyRefNode &L1Node = ..SegmentsLumbar.L1Seg.L1L2JntNode;
  };

  AnySphericalJoint T12L1Jnt = {
    AnyRefNode &L1Node = ..SegmentsLumbar.L1Seg.T12L1JntNode;
    AnyRefNode &T12Node = ..SegmentsThorax.ThoraxSeg.T12L1JntNode;
  };

//  AnyReacForce T12L1JntReac={
//    AnySphericalJoint &ref=.T12L1Jnt;
//  };

//  AnyRevoluteJoint C0C1Jnt = {
//    Axis=z;
//    AnyRefNode &C1HatNode = ..SegmentsThorax.ThoraxSeg.C1HatNode;
//    AnyRefNode &NeckNode = ..SegmentsThorax.SkullSeg.NeckNode;
//  };

  #if BM_TRUNK_LUMBAR_RHYTHM
  //Spine rhythm leaves three rotational dof between pelvis and thorax free
  AnyKinEqSimpleDriver SpineRhythmDrv = {

    AnyKinMeasureLinComb Measure =
    {
      AnyJoint &u1 = ..SacrumPelvisJnt;
      AnyJoint &u2 = ..L5SacrumJnt;
      AnyJoint &u3 = ..L4L5Jnt;
      AnyJoint &u4 = ..L3L4Jnt;
      AnyJoint &u5 = ..L2L3Jnt;
      AnyJoint &u6 = ..L1L2Jnt;
      AnyJoint &u7 = ..T12L1Jnt;

      #include "SRMatrixes.any"
     }; // Measure

    #if BM_TRUNK_LUMBAR_RHYTHM == _RHYTHM_SOFT_
      // Use a template to create the weight function, so
      // the weight values can be overridden by the user.
      Template_AnyFunConst Weights (NUMBER_OF_ELEMENTS=..nDim) = {};
      CType= repmat(nDim,Soft);
      WeightFun ={&Weights.Fun};
     #endif

    #if SI_JNT_TYPE == "SPHERICAL"
    DriverPos = {0,0,0, 0,0,0, 0,0,0, 0,0,0, 0,0,0, 0,0,0};
    DriverVel = {0,0,0, 0,0,0, 0,0,0, 0,0,0, 0,0,0, 0,0,0};
    Reaction.Type = {Off,Off,Off, Off,Off,Off, Off,Off,Off, Off,Off,Off, Off,Off,Off, Off,Off,Off};
    #endif
    #if SI_JNT_TYPE == "REVOLUTE"
    DriverPos = {0, 0,0,0, 0,0,0, 0,0,0, 0,0,0, 0,0,0};
    DriverVel = {0, 0,0,0, 0,0,0, 0,0,0, 0,0,0, 0,0,0};
    Reaction.Type = {Off, Off,Off,Off, Off,Off,Off, Off,Off,Off, Off,Off,Off, Off,Off,Off};
    #endif
    #if SI_JNT_TYPE == "CYLINDRICAL"
    DriverPos = {0,0, 0,0,0, 0,0,0, 0,0,0, 0,0,0, 0,0,0};
    DriverVel = {0,0, 0,0,0, 0,0,0, 0,0,0, 0,0,0, 0,0,0};
    Reaction.Type = {Off,Off, Off,Off,Off, Off,Off,Off, Off,Off,Off, Off,Off,Off, Off,Off,Off};
    #endif


  }; // SpineRhythmDrv
  #endif

  //Rotational measure between throax and pelvis
  AnyKinRotational PelvisThoraxRotMeasure = {
    AnyRefFrame &Pelvis = ..SegmentsLumbar.PelvisSeg.AnatomicalFrame;
    AnyRefFrame &Thorax = ..SegmentsThorax.ThoraxSeg.AnatomicalFrame;
    Type = RotVector;
  };

};// End of JointsLumbar
