#ifdef LumbarLigaments
// Definition of lumbar ligament attachment points
SegmentsThorax.ThoraxSeg = {
    AnyRefNode ALLNodeInferior = {sRel = .Scale({0.038,0.166,0});};
    AnyRefNode PLLNodeInferior = {sRel = .Scale({0.009,0.15,0});}; //on T12
    AnyRefNode PLLViaNode = {sRel = .Scale({0.004,0.164,0});}; //on T12
    AnyRefNode PLLNodeSuperior = {sRel = .Scale({-0.003,0.18,0});}; //on T11
    // inter/supraspinous
    AnyRefNode InterspinousInferior = {sRel = .Scale({-0.018,0.136,0});};
    AnyRefNode SupraspinousInferior = {sRel = .Scale({-0.028,0.126,0});};
    // ligamenta flavia (right/left)
    AnyRefNode FlavumInferiorR = {sRel = .Scale({-0.00001198, 0.1404274, 0.00745881});};
    AnyRefNode FlavumInferiorL = {sRel = {.FlavumInferiorR.sRel[0], .FlavumInferiorR.sRel[1], .FlavumInferiorR.sRel[2]*-1};};

    AnyRefNode InterTransverseR = {sRel = .Scale({-0.01243741, 0.1655881, 0.02496396});};
    AnyRefNode InterTransverseL = {sRel = {.InterTransverseR.sRel[0], .InterTransverseR.sRel[1], .InterTransverseR.sRel[2]*-1};};

    AnyRefNode InterTransverseRmid = {sRel = .Scale( {-0.0005667311, 0.1610546, 0.02087555});};
    AnyRefNode InterTransverseLmid = {sRel = {.InterTransverseRmid.sRel[0], .InterTransverseRmid.sRel[1], .InterTransverseRmid.sRel[2]*-1};};
};
  // Ligament Nodes
SegmentsLumbar.L1Seg = {
    // anterior longitudinal
    AnyRefNode ALLNodeInferior = {sRel = .Scale({0.051,0.133,0});};
    AnyRefNode ALLNodeSuperior = {sRel = .Scale({0.042,0.159,0});};
    // posterior longitudinal
    AnyRefNode PLLViaNode = {sRel = .Scale({0.037,0.015,0});};

    AnyRefNode PLLNodeSuperior = {sRel = .Scale( {0.01209411, 0.147806, 0});};
    AnyRefNode PLLNodeInferior = {sRel = .Scale({0.021,0.119,0});};
    // inter/supraspinous
    AnyRefNode InterspinousInferior = {sRel = .Scale({-0.0005,0.1065,0});};
    AnyRefNode InterspinousSuperior = {sRel = .Scale({-0.0075,0.118,0});};
    AnyRefNode SupraspinousInferior = {sRel = .Scale({-0.012,0.1,0});};
    AnyRefNode SupraspinousSuperior = {sRel = .Scale({-0.016,0.115,0});};
    // ligamenta flavia (right/left)
    AnyRefNode FlavumInferiorR = {sRel = .Scale({0.012,0.1175,0.0065});};
    AnyRefNode FlavumSuperiorR = {sRel = .Scale({0.005,0.135,0.005});};
    AnyRefNode FlavumInferiorL = {sRel = {.FlavumInferiorR.sRel[0], .FlavumInferiorR.sRel[1], .FlavumInferiorR.sRel[2]*-1};};
    AnyRefNode FlavumSuperiorL = {sRel = {.FlavumSuperiorR.sRel[0], .FlavumSuperiorR.sRel[1], .FlavumSuperiorR.sRel[2]*-1};};

    AnyRefNode InterTransverseR = {sRel = .Scale({0.001681264, 0.1354231, 0.0342857});};
    AnyRefNode InterTransverseL = {sRel = {.InterTransverseR.sRel[0], .InterTransverseR.sRel[1], .InterTransverseR.sRel[2]*-1};};

    AnyRefNode InterTransverseRmid = {sRel = .Scale({0.006658831, 0.1334801, 0.02453004});};
    AnyRefNode InterTransverseLmid = {sRel = {.InterTransverseRmid.sRel[0], .InterTransverseRmid.sRel[1], .InterTransverseRmid.sRel[2]*-1};};
  };
SegmentsLumbar.L2Seg = {
    // anterior longitudinal
    AnyRefNode ALLNodeInferior = {sRel = .Scale({0.062,0.105,0});};
    AnyRefNode ALLNodeSuperior = {sRel = .Scale({0.053,0.129,0});};
    // posterior longitudinal
    AnyRefNode PLLNodeInferior = {sRel = .Scale({0.032,0.092,0});};
    AnyRefNode PLLViaNode = {sRel = .Scale({0.027,0.104,0});};
    AnyRefNode PLLNodeSuperior = {sRel = .Scale({0.023,0.117,0});};
    // inter/supraspinous ligaments
    AnyRefNode InterspinousInferior = {sRel = .Scale({0.0095,0.0725,0});};
    AnyRefNode InterspinousSuperior = {sRel = .Scale({0.003,0.089,0});};
    AnyRefNode SupraspinousInferior = {sRel = .Scale({-0.0005,0.0695,0});};
    AnyRefNode SupraspinousSuperior = {sRel = .Scale({-0.00395,0.0825,0});};
    // ligamenta flavia (right/left)
    AnyRefNode FlavumInferiorR = {sRel = .Scale({0.0225,0.0825,0.007});};
    AnyRefNode FlavumSuperiorR = {sRel = .Scale({0.0175,0.105,0.0055});};
    AnyRefNode FlavumInferiorL = {sRel = {.FlavumInferiorR.sRel[0], .FlavumInferiorR.sRel[1], .FlavumInferiorR.sRel[2]*-1};};
    AnyRefNode FlavumSuperiorL = {sRel = {.FlavumSuperiorR.sRel[0], .FlavumSuperiorR.sRel[1], .FlavumSuperiorR.sRel[2]*-1};};

    AnyRefNode InterTransverseR = {sRel = .Scale({0.01175492, 0.1053886, 0.0342857});};
    AnyRefNode InterTransverseL = {sRel = {.InterTransverseR.sRel[0], .InterTransverseR.sRel[1], .InterTransverseR.sRel[2]*-1};};

    AnyRefNode InterTransverseRmid = {sRel = .Scale({0.02042832, 0.1038095, 0.02836499});};
    AnyRefNode InterTransverseLmid = {sRel = {.InterTransverseRmid.sRel[0], .InterTransverseRmid.sRel[1], .InterTransverseRmid.sRel[2]*-1};};

  };
SegmentsLumbar.L3Seg = {
    // anterior longitudional
    AnyRefNode ALLNodeInferior = {sRel = .Scale({0.069,0.071,0});};
    AnyRefNode ALLNodeSuperior = {sRel = .Scale({0.064,0.097,0});};
    // posterior longitudional
    AnyRefNode PLLNodeInferior = {sRel = .Scale({0.037,0.062,0});};
    AnyRefNode PLLViaNode = {sRel = .Scale({0.033,0.076,0});};
    AnyRefNode PLLNodeSuperior = {sRel = .Scale({0.031,0.089,0});};
    // inter/supraspinous
    AnyRefNode InterspinousInferior = {sRel = .Scale({0.0125,0.0475,0});};
    AnyRefNode InterspinousSuperior = {sRel = .Scale({0.006,0.064,0});};
    AnyRefNode SupraspinousInferior = {sRel = .Scale({0.0005,0.0445,0});};
    AnyRefNode SupraspinousSuperior = {sRel = .Scale({-0.003,0.0585,0});};
    // ligamenta flavia (right/left)
    AnyRefNode FlavumInferiorR = {sRel = .Scale({0.0275,0.055,0.0095});};
    AnyRefNode FlavumSuperiorR = {sRel = .Scale({0.025,0.075,0.006});};
    AnyRefNode FlavumInferiorL = {sRel = {.FlavumInferiorR.sRel[0], .FlavumInferiorR.sRel[1], .FlavumInferiorR.sRel[2]*-1};};
    AnyRefNode FlavumSuperiorL = {sRel = {.FlavumSuperiorR.sRel[0], .FlavumSuperiorR.sRel[1], .FlavumSuperiorR.sRel[2]*-1};};

    AnyRefNode InterTransverseR = {sRel = .Scale({0.0246511, 0.07434323, 0.03382862});};
    AnyRefNode InterTransverseL = {sRel = {.InterTransverseR.sRel[0], .InterTransverseR.sRel[1], .InterTransverseR.sRel[2]*-1};};


    AnyRefNode InterTransverseRmid = {sRel = .Scale({0.02859373, 0.07502131, 0.02394057});};
    AnyRefNode InterTransverseLmid = {sRel = {.InterTransverseRmid.sRel[0], .InterTransverseRmid.sRel[1], .InterTransverseRmid.sRel[2]*-1};};
  };
SegmentsLumbar.L4Seg = {
    // anterior longitudinal
    AnyRefNode ALLNodeInferior = {sRel = .Scale({0.072,0.031,0});};
    AnyRefNode ALLNodeSuperior = {sRel = .Scale({0.071,0.059,0});};
    // posterior longitudinal
    AnyRefNode PLLNodeInferior = {sRel = .Scale({0.039,0.031,0});};
    AnyRefNode PLLViaNode = {sRel = .Scale({0.038,0.046,0});};
    AnyRefNode PLLNodeSuperior = {sRel = .Scale({0.037,0.059,0});};
    // inter/supraspinous
    AnyRefNode InterspinousInferior = {sRel = .Scale({0.015,0.0235,0});};
    AnyRefNode InterspinousSuperior = {sRel = .Scale({0.0125,0.0425,0});};
    AnyRefNode SupraspinousInferior = {sRel = .Scale({0.0015,0.022,0});};
    AnyRefNode SupraspinousSuperior = {sRel = .Scale({-0.000,0.037,0});};
    // ligamenta flavia (right/left)
    AnyRefNode FlavumInferiorR = {sRel = .Scale({0.0275,0.025,0.0115});};
    AnyRefNode FlavumSuperiorR = {sRel = .Scale({0.0295,0.05,0.006});};
    AnyRefNode FlavumInferiorL = {sRel = {.FlavumInferiorR.sRel[0], .FlavumInferiorR.sRel[1], .FlavumInferiorR.sRel[2]*-1};};
    AnyRefNode FlavumSuperiorL = {sRel = {.FlavumSuperiorR.sRel[0], .FlavumSuperiorR.sRel[1], .FlavumSuperiorR.sRel[2]*-1};};

    AnyRefNode InterTransverseR = {sRel = .Scale({0.0275, 0.05000021, 0.03258219});};
    AnyRefNode InterTransverseL = {sRel = {.InterTransverseR.sRel[0], .InterTransverseR.sRel[1], .InterTransverseR.sRel[2]*-1};};

    AnyRefNode InterTransverseRmid = {sRel = .Scale({0.03295033, 0.04644059, 0.02559336});};
    AnyRefNode InterTransverseLmid = {sRel = {.InterTransverseRmid.sRel[0], .InterTransverseRmid.sRel[1], .InterTransverseRmid.sRel[2]*-1};};
  };
SegmentsLumbar.L5Seg = {
    // anterior longitudinal
    AnyRefNode ALLNodeInferior = {sRel = .Scale({0.063,-0.007,0});};
    AnyRefNode ALLNodeSuperior = {sRel = .Scale({0.071,0.020,0});};
    // posterior longitudinal
    AnyRefNode PLLViaNode = {sRel = .Scale({0.037,0.015,0});};
    AnyRefNode PLLNodeSuperior = {sRel = .Scale({0.038,0.027,0});};
    AnyRefNode PLLNodeInferior = {sRel = .Scale({0.03590498, 0.001, 0.0});};
    // ligamenta flavia (right/left)
    AnyRefNode FlavumInferiorR = {sRel = .Scale({0.02904793, 0.01086995, 0.007435671});};
    AnyRefNode FlavumSuperiorR = {sRel = .Scale({0.0295,0.02,0.006});};
    AnyRefNode FlavumInferiorL = {sRel = {.FlavumInferiorR.sRel[0], .FlavumInferiorR.sRel[1], .FlavumInferiorR.sRel[2]*-1};};
    AnyRefNode FlavumSuperiorL = {sRel = {.FlavumSuperiorR.sRel[0], .FlavumSuperiorR.sRel[1], .FlavumSuperiorR.sRel[2]*-1};};
    // inter/supraspinous
    AnyRefNode InterspinousInferior = {sRel = .Scale({0.0125,0.005,0});};
    AnyRefNode InterspinousSuperior = {sRel = .Scale({0.0125,0.02,0});};
    AnyRefNode SupraspinousInferior = {sRel = .Scale({0.0015,0.007,0});};
    AnyRefNode SupraspinousSuperior = {sRel = .Scale({-0.000,0.016,0});};

    AnyRefNode InterTransverseR = {sRel = .Scale({0.02618421, 0.02240737, 0.03258219});};
    AnyRefNode InterTransverseL = {sRel = {.InterTransverseR.sRel[0], .InterTransverseR.sRel[1], .InterTransverseR.sRel[2]*-1};};

    AnyRefNode InterTransverseRmid = {sRel = .Scale({0.03475866, 0.01717806, 0.02636746});};
    AnyRefNode InterTransverseLmid = {sRel = {.InterTransverseRmid.sRel[0], .InterTransverseRmid.sRel[1], .InterTransverseRmid.sRel[2]*-1};};
  };
SegmentsLumbar.SacrumSeg = {  // only superior nodes
    AnyRefNode ALLNodeSuperior = {sRel = .Scale({0.055,-0.020,0});};
    AnyRefNode PLLNodeSuperior = {sRel = .Scale({0.03426434, -0.003116785, 0});};
    // ligamenta flavia (right/left)
    AnyRefNode FlavumSuperiorR = {sRel = .Scale({0.02378489, 0.003368557, 0.01158991});};
    AnyRefNode FlavumSuperiorL = {sRel = {.FlavumSuperiorR.sRel[0], .FlavumSuperiorR.sRel[1], .FlavumSuperiorR.sRel[2]*-1};};
    // inter/supraspinous
    AnyRefNode SupraspinousSuperior = {sRel = .Scale({0.001834338, 0.002112139, 0});};
    AnyRefNode InterspinousSuperior = {sRel = .Scale({0.011456154, 0.003246047, 0});};

    AnyRefNode InterTransverseR = {sRel = .Scale({0.03145664, 0.008208302, 0.0432449});};
    AnyRefNode InterTransverseL = {sRel = {.InterTransverseR.sRel[0], .InterTransverseR.sRel[1], .InterTransverseR.sRel[2]*-1};};

    AnyRefNode InterTransverseRmid = {sRel = .Scale( {0.02804244, 0.007081035, 0.03249829});};
    AnyRefNode InterTransverseLmid = {sRel = {.InterTransverseRmid.sRel[0], .InterTransverseRmid.sRel[1], .InterTransverseRmid.sRel[2]*-1};};
  };
#endif
