/*
Include file with Obliquus Internus definitions.

Mark de Zee (24-06-2003)
*/

AnyFolder ObliquusInternus = {

  AnyMuscleViaPoint OICI_C12 = {
    AnyMuscleModel &MusMdl = ...MuscleParametersSpineRight.ObliquusInternusParameter.OICI_C12Par;
    AnyRefNode &Org = ...SegmentsThorax.ThoraxSeg.OICI_C12NodeR;
    AnyRefNode &Ins = ...SegmentsLumbar.PelvisSeg.OICI_C12NodeR;
    AnyDrawMuscle DrwMus = {#include "../drawSettings/MusDrawSettings.any"};
  };

  AnyMuscleViaPoint OICI_C11 = {
    AnyMuscleModel &MusMdl = ...MuscleParametersSpineRight.ObliquusInternusParameter.OICI_C11Par;
    AnyRefNode &Org = ...SegmentsThorax.ThoraxSeg.OICI_C11NodeR;
    AnyRefNode &Ins = ...SegmentsLumbar.PelvisSeg.OICI_C11NodeR;
    AnyDrawMuscle DrwMus = {#include "../drawSettings/MusDrawSettings.any"};
  };

  AnyMuscleViaPoint OICI_C10 = {
    AnyMuscleModel &MusMdl = ...MuscleParametersSpineRight.ObliquusInternusParameter.OICI_C10Par;
    AnyRefNode &Org = ...SegmentsThorax.ThoraxSeg.OICI_C10NodeR;
    AnyRefNode &Ins = ...SegmentsLumbar.PelvisSeg.OICI_C10NodeR;
    AnyDrawMuscle DrwMus = {#include "../drawSettings/MusDrawSettings.any"};
  };

  AnyMuscleViaPoint OICI_RS1 = {
    AnyMuscleModel &MusMdl = ...MuscleParametersSpineRight.ObliquusInternusParameter.OICI_RS1Par;
    AnyRefNode &Org = ...Buckle.Segments.BuckleSeg.OICI_RS1NodeR;
    AnyRefNode &Ins = ...SegmentsLumbar.PelvisSeg.OICI_RS1NodeR;
    AnyDrawMuscle DrwMus = { #include "../drawSettings/MusDrawSettings.any" };
   };


  AnyMuscleViaPoint OICI_RS2 = {
    AnyMuscleModel &MusMdl = ...MuscleParametersSpineRight.ObliquusInternusParameter.OICI_RS2Par;
    AnyRefNode &Org = ...Buckle.Segments.BuckleSeg.OICI_RS2NodeR;
    AnyRefNode &Ins = ...SegmentsLumbar.PelvisSeg.OICI_RS2NodeR;
    AnyDrawMuscle DrwMus = {#include "../drawSettings/MusDrawSettings.any"};
   };


  AnyMuscleViaPoint OICI_RS3 = {
    AnyMuscleModel &MusMdl = ...MuscleParametersSpineRight.ObliquusInternusParameter.OICI_RS3Par;
    AnyRefNode &Org = ...Buckle.Segments.BuckleSeg.OICI_RS3NodeR;
    AnyRefNode &Ins = ...SegmentsLumbar.PelvisSeg.OICI_RS3NodeR;
    AnyDrawMuscle DrwMus = {#include "../drawSettings/MusDrawSettings.any"};
   };
};
