Segments = {
  SternumSeg = {
    //----------------------------------------------CS Nodes-----------------------------------------------
    AnyRefNode CS1NodeR     ={ sRel =.Scale (.Data.Sternum.Right.CS1Node_pos);};
    AnyRefNode CS1NodeL     ={ sRel =.Scale (.Data.Sternum.Left.CS1Node_pos);};

    //----------------------------------------------IC Nodes-----------------------------------------------
    AnyRefNode IC1NodeR     ={ sRel =.Scale (.Data.Sternum.Right.IC1Node_pos);};
    AnyRefNode IC1NodeL     ={ sRel =.Scale (.Data.Sternum.Left.IC1Node_pos);};

    Right = {
      AnyRefNode CCTangetNodeR1 = { sRel = ..Scale(..Data.R1.Right.CC_AlignmentNode);};
      AnyRefNode CCNodeR1 = {
        sRel = ..Scale(..Data.Sternum.Right.R1Node_pos);
        AnyRefNode RotNode = {
          ARel = RotMat(.sRel, ..CCTangetNodeR1.sRel, sRel + {0.10,0,0}) * RotMat(pi/2,y) * RotMat(pi,z);
        };
      };
    };

    Left = {
      AnyRefNode CCTangetNodeR1 = { sRel =..Scale(..Data.R1.Left.CC_AlignmentNode);};
      AnyRefNode CCNodeR1 = {
        sRel = ..Scale(..Data.Sternum.Left.R1Node_pos);
        AnyRefNode RotNode = {
          ARel = RotMat(.sRel, ..CCTangetNodeR1.sRel, sRel + {0.10,0,0}) * RotMat(-pi/2,y) * RotMat(-pi,z);
        };
      };
    };

    //Lumped Hyoid
    AnyRefNode LumpedHyoidStC0NodeRIns = {sRel = .Scale(.Data.Sternum.Right.LumpedHyoidStC0Ins_pos);};
    AnyRefNode LumpedHyoidStC0NodeLIns = {sRel = .Scale(.Data.Sternum.Left.LumpedHyoidStC0Ins_pos);};

    AnyRefNode Right_IC_Int_R1R2_elem_sternum = {sRel = .Scale(.Data.Sternum.Right.IC_Int_R1R2_elem_sternum_pos); };
    AnyRefNode Left_IC_Int_R1R2_elem_sternum = {sRel = .Scale(.Data.Sternum.Left.IC_Int_R1R2_elem_sternum_pos); };
  };

  SternalBodySeg = {
    AnyRefNode Mid                ={ sRel =.Scale (.Data.Sternum.MidNode_pos);};
    AnyRefNode RACP_CO6_2_mid = {sRel= (.RACP_CO6_2_R.sRel+.RACP_CO6_2_L.sRel)/2;};
    //----------------------------------------------CS Nodes-----------------------------------------------
    AnyRefNode CS2NodeR     ={ sRel =.Scale (.Data.Sternum.Right.CS2Node_pos);};
    AnyRefNode CS3NodeR     ={ sRel =.Scale (.Data.Sternum.Right.CS3Node_pos);};
    AnyRefNode CS4NodeR     ={ sRel =.Scale (.Data.Sternum.Right.CS4Node_pos);};
    AnyRefNode CS5NodeR     ={ sRel =.Scale (.Data.Sternum.Right.CS5Node_pos);};
    AnyRefNode CS6NodeR     ={ sRel =.Scale (.Data.Sternum.Right.CS6Node_pos);};
    AnyRefNode CS7NodeR     ={ sRel =.Scale (.Data.Sternum.Right.CS7Node_pos);};
    AnyRefNode CS8NodeR     ={ sRel =.Scale (.Data.Sternum.Right.CS8Node_pos);};
    AnyRefNode CS9NodeR     ={ sRel =.Scale (.Data.Sternum.Right.CS9Node_pos);};
    AnyRefNode CS10NodeR    ={ sRel =.Scale (.Data.Sternum.Right.CS10Node_pos);};
    AnyRefNode CS2NodeL     ={ sRel =.Scale (.Data.Sternum.Left.CS2Node_pos);};
    AnyRefNode CS3NodeL     ={ sRel =.Scale (.Data.Sternum.Left.CS3Node_pos);};
    AnyRefNode CS4NodeL     ={ sRel =.Scale (.Data.Sternum.Left.CS4Node_pos);};
    AnyRefNode CS5NodeL     ={ sRel =.Scale (.Data.Sternum.Left.CS5Node_pos);};
    AnyRefNode CS6NodeL     ={ sRel =.Scale (.Data.Sternum.Left.CS6Node_pos);};
    AnyRefNode CS7NodeL     ={ sRel =.Scale (.Data.Sternum.Left.CS7Node_pos);};
    AnyRefNode CS8NodeL     ={ sRel =.Scale (.Data.Sternum.Left.CS8Node_pos);};
    AnyRefNode CS9NodeL     ={ sRel =.Scale (.Data.Sternum.Left.CS9Node_pos);};
    AnyRefNode CS10NodeL    ={ sRel =.Scale (.Data.Sternum.Left.CS10Node_pos);};


      //----------------------------------------------IC Nodes-----------------------------------------------
    AnyRefNode IC2NodeR     ={ sRel =.Scale (.Data.Sternum.Right.IC3Node_pos);};
    AnyRefNode IC3NodeR     ={ sRel =.Scale (.Data.Sternum.Right.IC3Node_pos);};
    AnyRefNode IC4NodeR     ={ sRel =.Scale (.Data.Sternum.Right.IC4Node_pos);};
    AnyRefNode IC5NodeR     ={ sRel =.Scale (.Data.Sternum.Right.IC5Node_pos);};
    AnyRefNode IC6NodeR     ={ sRel =.Scale (.Data.Sternum.Right.IC6Node_pos);};
    AnyRefNode IC7NodeR     ={ sRel =.Scale (.Data.Sternum.Right.IC7Node_pos);};
    AnyRefNode IC8NodeR     ={ sRel =.Scale (.Data.Sternum.Right.IC8Node_pos);};
    AnyRefNode IC9NodeR     ={ sRel =.Scale (.Data.Sternum.Right.IC9Node_pos);};
    AnyRefNode IC10NodeR    ={ sRel =.Scale (.Data.Sternum.Right.IC10Node_pos);};
    AnyRefNode IC2NodeL     ={ sRel =.Scale (.Data.Sternum.Left.IC3Node_pos);};
    AnyRefNode IC3NodeL     ={ sRel =.Scale (.Data.Sternum.Left.IC3Node_pos);};
    AnyRefNode IC4NodeL     ={ sRel =.Scale (.Data.Sternum.Left.IC4Node_pos);};
    AnyRefNode IC5NodeL     ={ sRel =.Scale (.Data.Sternum.Left.IC5Node_pos);};
    AnyRefNode IC6NodeL     ={ sRel =.Scale (.Data.Sternum.Left.IC6Node_pos);};
    AnyRefNode IC7NodeL     ={ sRel =.Scale (.Data.Sternum.Left.IC7Node_pos);};
    AnyRefNode IC8NodeL     ={ sRel =.Scale (.Data.Sternum.Left.IC8Node_pos);};
    AnyRefNode IC9NodeL     ={ sRel =.Scale (.Data.Sternum.Left.IC9Node_pos);};
    AnyRefNode IC10NodeL    ={ sRel =.Scale (.Data.Sternum.Left.IC10Node_pos);};

    Right = {
      AnyRefNode CCTangetNodeR2 ={ sRel = ..Scale(..Data.R2.Right.CC_AlignmentNode); };
      AnyRefNode CCTangetNodeR3 ={ sRel = ..Scale(..Data.R3.Right.CC_AlignmentNode); };
      AnyRefNode CCTangetNodeR4 ={ sRel = ..Scale(..Data.R4.Right.CC_AlignmentNode); };
      AnyRefNode CCTangetNodeR5 ={ sRel = ..Scale(..Data.R5.Right.CC_AlignmentNode); };
      AnyRefNode CCTangetNodeR6 ={ sRel = ..Scale(..Data.R6.Right.CC_AlignmentNode); };
      AnyRefNode CCTangetNodeR7 ={ sRel = ..Scale(..Data.R7.Right.CC_AlignmentNode); };
      AnyRefNode CCTangetNodeR8 ={ sRel = ..Scale(..Data.R8.Right.CC_AlignmentNode); };
      AnyRefNode CCTangetNodeR9 ={ sRel = ..Scale(..Data.R9.Right.CC_AlignmentNode); };
      AnyRefNode CCTangetNodeR10 ={ sRel = ..Scale(..Data.R10.Right.CC_AlignmentNode); };
      AnyRefNode CCNodeR2 ={ sRel = ..Scale(..Data.Sternum.Right.R2Node_pos); AnyRefNode RotNode ={ ARel=RotMat(.sRel,..CCTangetNodeR2.sRel,sRel+{0.10,0,0})*RotMat(pi/2,y)*RotMat(pi,z);};};
      AnyRefNode CCNodeR3 ={ sRel = ..Scale(..Data.Sternum.Right.R3Node_pos); AnyRefNode RotNode ={ ARel=RotMat(.sRel,..CCTangetNodeR3.sRel,sRel+{0.10,0,0})*RotMat(pi/2,y)*RotMat(pi,z);};};
      AnyRefNode CCNodeR4 ={ sRel = ..Scale(..Data.Sternum.Right.R4Node_pos); AnyRefNode RotNode ={ ARel=RotMat(.sRel,..CCTangetNodeR4.sRel,sRel+{0.10,0,0})*RotMat(pi/2,y)*RotMat(pi,z);};};
      AnyRefNode CCNodeR5 ={ sRel = ..Scale(..Data.Sternum.Right.R5Node_pos); AnyRefNode RotNode ={ ARel=RotMat(.sRel,..CCTangetNodeR5.sRel,sRel+{0.10,0,0})*RotMat(pi/2,y)*RotMat(pi,z);};};
      AnyRefNode CCNodeR6 ={ sRel = ..Scale(..Data.Sternum.Right.R6Node_pos); AnyRefNode RotNode ={ ARel=RotMat(.sRel,..CCTangetNodeR6.sRel,sRel+{0.10,0,0})*RotMat(pi/2,y)*RotMat(pi,z);};};
      AnyRefNode CCNodeR7 ={ sRel = ..Scale(..Data.Sternum.Right.R7Node_pos); AnyRefNode RotNode ={ ARel=RotMat(.sRel,..CCTangetNodeR7.sRel,sRel+{0.10,0,0})*RotMat(pi/2,y)*RotMat(pi,z);};};
      AnyRefNode CCNodeR8 ={ sRel = ..Scale(..Data.Sternum.Right.R8Node_pos); AnyRefNode RotNode ={ ARel=RotMat(.sRel,..CCTangetNodeR8.sRel,sRel+{0.10,0,0})*RotMat(pi/2,y)*RotMat(pi,z);};};
      AnyRefNode CCNodeR9 ={ sRel = ..Scale(..Data.Sternum.Right.R9Node_pos); AnyRefNode RotNode ={ ARel=RotMat(.sRel,..CCTangetNodeR9.sRel,sRel+{0.10,0,0})*RotMat(pi/2,y)*RotMat(pi,z);};};
      AnyRefNode CCNodeR10 ={ sRel = ..Scale(..Data.Sternum.Right.R10Node_pos);AnyRefNode RotNode ={ ARel=RotMat(.sRel,..CCTangetNodeR10.sRel,sRel+{0.10,0,0})*RotMat(pi/2,y)*RotMat(pi,z);};};
    };
    Left = {
      AnyRefNode CCTangetNodeR2 = { sRel = ..Scale (..Data.R2.Left.CC_AlignmentNode); };
      AnyRefNode CCTangetNodeR3 = { sRel = ..Scale (..Data.R3.Left.CC_AlignmentNode); };
      AnyRefNode CCTangetNodeR4 = { sRel = ..Scale (..Data.R4.Left.CC_AlignmentNode); };
      AnyRefNode CCTangetNodeR5 = { sRel = ..Scale (..Data.R5.Left.CC_AlignmentNode); };
      AnyRefNode CCTangetNodeR6 = { sRel = ..Scale (..Data.R6.Left.CC_AlignmentNode); };
      AnyRefNode CCTangetNodeR7 = { sRel = ..Scale (..Data.R7.Left.CC_AlignmentNode); };
      AnyRefNode CCTangetNodeR8 = { sRel = ..Scale (..Data.R8.Left.CC_AlignmentNode); };
      AnyRefNode CCTangetNodeR9 = { sRel = ..Scale (..Data.R9.Left.CC_AlignmentNode); };
      AnyRefNode CCTangetNodeR10 = { sRel = ..Scale (..Data.R10.Left.CC_AlignmentNode); };
      AnyRefNode CCNodeR2 = { sRel = ..Scale(..Data.Sternum.Left.R2Node_pos); AnyRefNode RotNode = { ARel = RotMat(.sRel, ..CCTangetNodeR2.sRel,sRel+{0.10,0,0})*RotMat(-pi/2,y)*RotMat(-pi,z);};};
      AnyRefNode CCNodeR3 = { sRel = ..Scale(..Data.Sternum.Left.R3Node_pos); AnyRefNode RotNode = { ARel = RotMat(.sRel, ..CCTangetNodeR3.sRel,sRel+{0.10,0,0})*RotMat(-pi/2,y)*RotMat(-pi,z);};};
      AnyRefNode CCNodeR4 = { sRel = ..Scale(..Data.Sternum.Left.R4Node_pos); AnyRefNode RotNode = { ARel = RotMat(.sRel, ..CCTangetNodeR4.sRel,sRel+{0.10,0,0})*RotMat(-pi/2,y)*RotMat(-pi,z);};};
      AnyRefNode CCNodeR5 = { sRel = ..Scale(..Data.Sternum.Left.R5Node_pos); AnyRefNode RotNode = { ARel = RotMat(.sRel, ..CCTangetNodeR5.sRel,sRel+{0.10,0,0})*RotMat(-pi/2,y)*RotMat(-pi,z);};};
      AnyRefNode CCNodeR6 = { sRel = ..Scale(..Data.Sternum.Left.R6Node_pos); AnyRefNode RotNode = { ARel = RotMat(.sRel, ..CCTangetNodeR6.sRel,sRel+{0.10,0,0})*RotMat(-pi/2,y)*RotMat(-pi,z);};};
      AnyRefNode CCNodeR7 = { sRel = ..Scale(..Data.Sternum.Left.R7Node_pos); AnyRefNode RotNode = { ARel = RotMat(.sRel, ..CCTangetNodeR7.sRel,sRel+{0.10,0,0})*RotMat(-pi/2,y)*RotMat(-pi,z);};};
      AnyRefNode CCNodeR8 = { sRel = ..Scale(..Data.Sternum.Left.R8Node_pos); AnyRefNode RotNode = { ARel = RotMat(.sRel, ..CCTangetNodeR8.sRel,sRel+{0.10,0,0})*RotMat(-pi/2,y)*RotMat(-pi,z);};};
      AnyRefNode CCNodeR9 = { sRel = ..Scale(..Data.Sternum.Left.R9Node_pos); AnyRefNode RotNode = { ARel = RotMat(.sRel, ..CCTangetNodeR9.sRel,sRel+{0.10,0,0})*RotMat(-pi/2,y)*RotMat(-pi,z);};};
      AnyRefNode CCNodeR10 = { sRel = ..Scale(..Data.Sternum.Left.R10Node_pos); AnyRefNode RotNode = { ARel = RotMat(.sRel, ..CCTangetNodeR10.sRel,sRel+{0.10,0,0})*RotMat(-pi/2,y)*RotMat(-pi,z);};};
    };

    AnyRefNode RACP_CO6Node= {sRel = .Scale(.Data.Sternum.RACP_CO6Node_pos);};
    AnyRefNode TrThR2SNodeRIns         = {sRel = .Scale(.Data.Sternum.Right.TrThR2SNode_pos);};
    AnyRefNode TrThR3SNodeRIns         = {sRel = .Scale(.Data.Sternum.Right.TrThR3SNode_pos);};
    AnyRefNode TrThR4SNodeRIns         = {sRel = .Scale(.Data.Sternum.Right.TrThR4SNode_pos);};
    AnyRefNode TrThR5SNodeRIns         = {sRel = .Scale(.Data.Sternum.Right.TrThR5SNode_pos);};
    AnyRefNode TrThR6SNodeRIns         = {sRel = .Scale(.Data.Sternum.Right.TrThR6SNode_pos);};
    AnyRefNode TrThNodeRIns= {sRel = .Scale(.Data.Sternum.Right.TrThNode_pos);};

    AnyRefNode TrThR2SNodeLIns         = {sRel = .Scale(.Data.Sternum.Left.TrThR2SNode_pos);};
    AnyRefNode TrThR3SNodeLIns         = {sRel = .Scale(.Data.Sternum.Left.TrThR3SNode_pos);};
    AnyRefNode TrThR4SNodeLIns         = {sRel = .Scale(.Data.Sternum.Left.TrThR4SNode_pos);};
    AnyRefNode TrThR5SNodeLIns         = {sRel = .Scale(.Data.Sternum.Left.TrThR5SNode_pos);};
    AnyRefNode TrThR6SNodeLIns         = {sRel = .Scale(.Data.Sternum.Left.TrThR6SNode_pos);};
    AnyRefNode TrThNodeLIns= {sRel = .Scale(.Data.Sternum.Left.TrThNode_pos);};

    Right = {
      AnyRefNode ObliquusInternusNode_1= {sRel = ..Scale(..Data.Sternum.Right.OICI_C9Node_pos);};
      AnyRefNode ObliquusInternusNode_2= {sRel = ..Scale(..Data.Sternum.Right.OICI_C8Node_pos);};

      #if BM_TRUNK_THORACIC_STERNUM_TOPOLOGY != 4
        Torus3PointOuterFit ObliquusWrapping() = {
          P1=..CS10NodeR.sRel;
          P2=..CC_DiaphragmNode6R.sRel;
          P3=.ObliquusInternusNode_2.sRel;
        };
      #endif
    };

    Left = {
      AnyRefNode ObliquusInternusNode_1= {sRel = ..Scale(..Data.Sternum.Left.OICI_C9Node_pos);};
      AnyRefNode ObliquusInternusNode_2= {sRel = ..Scale(..Data.Sternum.Left.OICI_C8Node_pos);};

      #if BM_TRUNK_THORACIC_STERNUM_TOPOLOGY != 4
        Torus3PointOuterFit ObliquusWrapping() = {
          P1 = ..CS10NodeL.sRel;
          P2 = ..CC_DiaphragmNode6L.sRel;
          P3 = .ObliquusInternusNode_2.sRel;
        };
      #endif
    };

    AnyRefNode Xiphoid_DiaphragmNodeR = {sRel = .Scale(.Data.Sternum.Right.Xiphoid_DiaphragmNode_pos); };
    AnyRefNode CC_DiaphragmNode1R = {sRel = .Scale(.Data.Sternum.Right.CC_DiaphragmNode1_pos); };
    AnyRefNode CC_DiaphragmNode2R = {sRel = .Scale(.Data.Sternum.Right.CC_DiaphragmNode2_pos); };
    AnyRefNode CC_DiaphragmNode3R = {sRel = .Scale(.Data.Sternum.Right.CC_DiaphragmNode3_pos); };
    AnyRefNode CC_DiaphragmNode4R = {sRel = .Scale(.Data.Sternum.Right.CC_DiaphragmNode4_pos); };
    AnyRefNode CC_DiaphragmNode5R = {sRel = .Scale(.Data.Sternum.Right.CC_DiaphragmNode5_pos); };
    AnyRefNode CC_DiaphragmNode6R = {sRel = .Scale(.Data.Sternum.Right.CC_DiaphragmNode6_pos); };
    AnyRefNode CC_DiaphragmNode7R = {sRel = .Scale(.Data.Sternum.Right.CC_DiaphragmNode7_pos); };

    AnyRefNode Xiphoid_DiaphragmNodeL = {sRel = .Scale(.Data.Sternum.Left.Xiphoid_DiaphragmNode_pos); };
    AnyRefNode CC_DiaphragmNode1L = {sRel = .Scale(.Data.Sternum.Left.CC_DiaphragmNode1_pos); };
    AnyRefNode CC_DiaphragmNode2L = {sRel = .Scale(.Data.Sternum.Left.CC_DiaphragmNode2_pos); };
    AnyRefNode CC_DiaphragmNode3L = {sRel = .Scale(.Data.Sternum.Left.CC_DiaphragmNode3_pos); };
    AnyRefNode CC_DiaphragmNode4L = {sRel = .Scale(.Data.Sternum.Left.CC_DiaphragmNode4_pos); };
    AnyRefNode CC_DiaphragmNode5L = {sRel = .Scale(.Data.Sternum.Left.CC_DiaphragmNode5_pos); };
    AnyRefNode CC_DiaphragmNode6L = {sRel = .Scale(.Data.Sternum.Left.CC_DiaphragmNode6_pos); };
    AnyRefNode CC_DiaphragmNode7L = {sRel = .Scale(.Data.Sternum.Left.CC_DiaphragmNode7_pos); };


    AnyRefNode Right_IC_Int_R2R3_elem_sternum = {sRel = .Scale(.Data.Sternum.Right.IC_Int_R2R3_elem_sternum_pos); };
    AnyRefNode Right_IC_Int_R3R4_elem_sternum = {sRel = .Scale(.Data.Sternum.Right.IC_Int_R3R4_elem_sternum_pos); };
    AnyRefNode Right_IC_Int_R4R5_elem_sternum = {sRel = .Scale(.Data.Sternum.Right.IC_Int_R4R5_elem_sternum_pos); };
    AnyRefNode Right_IC_Int_R5R6_elem_sternum = {sRel = .Scale(.Data.Sternum.Right.IC_Int_R5R6_elem_sternum_pos); };
    AnyRefNode Right_IC_Int_R6R7_elem_sternum = {sRel = .Scale(.Data.Sternum.Right.IC_Int_R6R7_elem_sternum_pos); };
    AnyRefNode Right_IC_Int_R7R8_elem_sternum = {sRel = .Scale(.Data.Sternum.Right.IC_Int_R7R8_elem_sternum_pos); };
    AnyRefNode Right_IC_Int_R8R9_elem_sternum = {sRel = .Scale(.Data.Sternum.Right.IC_Int_R8R9_elem_sternum_pos); };
    AnyRefNode Right_IC_Int_R9R10_elem_sternum = {sRel = .Scale(.Data.Sternum.Right.IC_Int_R9R10_elem_sternum_pos); };

    AnyRefNode Left_IC_Int_R2R3_elem_sternum = {sRel = .Scale(.Data.Sternum.Left.IC_Int_R2R3_elem_sternum_pos); };
    AnyRefNode Left_IC_Int_R3R4_elem_sternum = {sRel = .Scale(.Data.Sternum.Left.IC_Int_R3R4_elem_sternum_pos); };
    AnyRefNode Left_IC_Int_R4R5_elem_sternum = {sRel = .Scale(.Data.Sternum.Left.IC_Int_R4R5_elem_sternum_pos); };
    AnyRefNode Left_IC_Int_R5R6_elem_sternum = {sRel = .Scale(.Data.Sternum.Left.IC_Int_R5R6_elem_sternum_pos); };
    AnyRefNode Left_IC_Int_R6R7_elem_sternum = {sRel = .Scale(.Data.Sternum.Left.IC_Int_R6R7_elem_sternum_pos); };
    AnyRefNode Left_IC_Int_R7R8_elem_sternum = {sRel = .Scale(.Data.Sternum.Left.IC_Int_R7R8_elem_sternum_pos); };
    AnyRefNode Left_IC_Int_R8R9_elem_sternum = {sRel = .Scale(.Data.Sternum.Left.IC_Int_R8R9_elem_sternum_pos); };
    AnyRefNode Left_IC_Int_R9R10_elem_sternum = {sRel = .Scale(.Data.Sternum.Left.IC_Int_R9R10_elem_sternum_pos); };
   };


  Right = {

    R1Seg= {
      AnyRefNode ITC7R7Via1NodeR = { sRel =  .Scale(.Data.R1.Right.ITC7R7Via1Node_pos); };
      AnyRefNode ITR1R7NodeROrg  = { sRel =  .Scale(.Data.R1.Right.ITR1R7Node_pos); };
      AnyRefNode ICptR3C4Via2Node= { sRel =  .Scale(.Data.R1.Right.ICptR3C4Via2Node_pos);};
      AnyRefNode ICptR4C5Via2Node= { sRel =  .Scale(.Data.R1.Right.ICptR4C5Via2Node_pos);};
      AnyRefNode ICptR5C6Via2Node= { sRel =  .Scale(.Data.R1.Right.ICptR5C6Via2Node_pos);};
      AnyRefNode ICptR6C4Via2Node= { sRel =  .Scale(.Data.R1.Right.ICptR6C4Via2Node_pos);};
      AnyRefNode ScalenusAnteriorR1C6Node = { sRel =  .Scale(.Data.R1.Right.ScalenusAnteriorR1C6NodeIns_pos);};
      AnyRefNode ScalenusAnteriorR1C5Node = { sRel =  .Scale(.Data.R1.Right.ScalenusAnteriorR1C5NodeIns_pos);};
      AnyRefNode ScalenusAnteriorR1C4Node = { sRel =  .Scale(.Data.R1.Right.ScalenusAnteriorR1C4NodeIns_pos);};
      AnyRefNode ScalenusAnteriorR1C3Node = { sRel =  .Scale(.Data.R1.Right.ScalenusAnteriorR1C3NodeIns_pos);};
      AnyRefNode ScalenusMediusR1C7Node   = { sRel =  .Scale(.Data.R1.Right.ScalenusMediusR1C7NodeIns_pos);};
      AnyRefNode ScalenusMediusR1C6Node   = { sRel =  .Scale(.Data.R1.Right.ScalenusMediusR1C6NodeIns_pos);};
      AnyRefNode ScalenusMediusR1C5Node   = { sRel =  .Scale(.Data.R1.Right.ScalenusMediusR1C5NodeIns_pos);};
      AnyRefNode ScalenusMediusR1C4Node   = { sRel =  .Scale(.Data.R1.Right.ScalenusMediusR1C4NodeIns_pos);};
      AnyRefNode ScalenusMediusR1C3Node   = { sRel =  .Scale(.Data.R1.Right.ScalenusMediusR1C3NodeIns_pos);};
      AnyRefNode ScalenusMediusR1C2Node   = { sRel =  .Scale(.Data.R1.Right.ScalenusMediusR1C2NodeIns_pos);};
      AnyRefNode LCBrC7R1_R_Ins   = { sRel =  .Scale(.Data.R1.Right.LCBrC7R1Ins_pos);};
      AnyRefNode SCR1R3_R_Org     = { sRel =  .Scale(.Data.R1.Right.SCR1R3Org_pos);};
      AnyRefNode SCR1R4_R_Org     = { sRel =  .Scale(.Data.R1.Right.SCR1R4Org_pos);};
      AnyRefNode O_serratus_anterior_8R = {sRel = .Scale(.Data.R1.Right.O_serratus_anterior_pos); };
      AnyFolder &DataRib =Data.R1.Right;
      #if BM_TRUNK_THORACIC_MODEL == _THORACIC_MODEL_FLEXIBLE_
      #include "ICPoints.any"  //create points for inter costal muscles
      #endif
    };

    R2Seg= {
      AnyRefNode ITC7R7Via2NodeR = { sRel =  .Scale(.Data.R2.Right.ITC7R7Via2Node_pos);};
      AnyRefNode ITR1R7Via1NodeR = { sRel =  .Scale(.Data.R2.Right.ITR1R7Via1Node_pos);};
      AnyRefNode ITR2R8NodeROrg  = { sRel =  .Scale(.Data.R2.Right.ITR2R8Node_pos);};
      AnyRefNode ScalenusPosteriorR2C7Node = { sRel =  .Scale(.Data.R2.Right.ScalenusPosteriorR2C7NodeIns_pos);};
      AnyRefNode ScalenusPosteriorR2C6Node = { sRel =  .Scale(.Data.R2.Right.ScalenusPosteriorR2C6NodeIns_pos);};
      AnyRefNode ScalenusPosteriorR2C5Node = { sRel =  .Scale(.Data.R2.Right.ScalenusPosteriorR2C5NodeIns_pos);};
      AnyRefNode TrThR2SNodeROrg  = { sRel =  .Scale(.Data.R2.Right.TrThR2SNodeOrg_pos);};
      AnyRefNode TrThR2R4NodeROrg = { sRel =  .Scale(.Data.R2.Right.TrThR2R4NodeOrg_pos);};
      AnyRefNode LCBrT1R2_R_Ins   = { sRel =  .Scale(.Data.R2.Right.LCBrT1R2Ins_pos);};
      AnyRefNode SCR2R4_R_Org     = { sRel =  .Scale(.Data.R2.Right.SCR2R4Org_pos);};
      AnyRefNode SCR2R5_R_Org     = { sRel =  .Scale(.Data.R2.Right.SCR2R5Org_pos);};
      AnyRefNode O_serratus_anterior_7R = {sRel = .Scale(.Data.R2.Right.O_serratus_anterior_pos); };
      AnyRefNode O_serratus_posterior_superior_1R = {sRel = .Scale(.Data.R2.Right.O_serratus_posterior_superior_pos); };
      AnyRefNode IC_Int_R1R2_elem_sternum = {sRel = .Scale(.Data.R2.Right.IC_Int_R1R2_elem_sternum_pos); };
      AnyFolder &DataRib =Data.R2.Right;
      #if BM_TRUNK_THORACIC_MODEL == _THORACIC_MODEL_FLEXIBLE_
      #include "ICPoints.any"  //create points for inter costal muscles
      #endif

    };

    R3Seg= {
      AnyRefNode LTptT3L3NodeR  = { sRel =  .Scale(.Data.Thorax.Right.LTptT3L3Node_pos);  };
      AnyRefNode ITC7R7Via3NodeR= { sRel =  .Scale(.Data.R3.Right.ITC7R7Via3Node_pos);  };
      AnyRefNode ITR1R7Via2NodeR= { sRel =  .Scale(.Data.R3.Right.ITR1R7Via2Node_pos);  };
      AnyRefNode ITR2R8Via1NodeR= { sRel =  .Scale(.Data.R3.Right.ITR2R8Via1Node_pos);  };
      AnyRefNode ITR3R9NodeROrg = { sRel =  .Scale(.Data.R3.Right.ITR3R9Node_pos);  };
      AnyRefNode ICptR3C4Node   = { sRel =  .Scale(.Data.R3.Right.ICptR3C4Node_pos);};
      AnyRefNode ICptR4C5Via3Node= {sRel =  .Scale(.Data.R3.Right.ICptR4C5Via3Node_pos);};
      AnyRefNode ICptR5C6Via3Node= {sRel =  .Scale(.Data.R3.Right.ICptR5C6Via3Node_pos);};
      AnyRefNode ICptR6C4Via3Node= {sRel =  .Scale(.Data.R3.Right.ICptR6C4Via3Node_pos);};
      AnyRefNode TrThR3SNodeROrg  = { sRel =  .Scale(.Data.R3.Right.TrThR3SNodeOrg_pos);};
      AnyRefNode TrThR3R5NodeROrg = { sRel =  .Scale(.Data.R3.Right.TrThR3R5NodeOrg_pos);};
      AnyRefNode LCBrT2R3_R_Ins   = { sRel =  .Scale(.Data.R3.Right.LCBrT2R3Ins_pos);};
      AnyRefNode SCR1R3_R_Ins     = { sRel =  .Scale(.Data.R3.Right.SCR1R3Ins_pos);};
      AnyRefNode SCR3R5_R_Org     = { sRel =  .Scale(.Data.R3.Right.SCR3R5Org_pos);};
      AnyRefNode SCR3R6_R_Org     = { sRel =  .Scale(.Data.R3.Right.SCR3R6Org_pos);};
      AnyRefNode O_serratus_anterior_6R = {sRel = .Scale(.Data.R3.Right.O_serratus_anterior_pos); };
      AnyRefNode O_serratus_posterior_superior_2R = {sRel = .Scale(.Data.R3.Right.O_serratus_posterior_superior_pos); };
      AnyRefNode IC_Int_R2R3_elem_sternum = {sRel = .Scale(.Data.R3.Right.IC_Int_R2R3_elem_sternum_pos); };
      AnyFolder &DataRib =Data.R3.Right;
      #if BM_TRUNK_THORACIC_MODEL == _THORACIC_MODEL_FLEXIBLE_
      #include "ICPoints.any"  //create points for inter costal muscles
      #endif
    };

    R4Seg= {
      AnyRefNode LTptT3L3Via1NodeR= { sRel =  .Scale(.Data.Thorax.Right.LTptT3L3Via1Node_pos);};
      AnyRefNode LTptT4L4NodeR    = { sRel =  .Scale(.Data.Thorax.Right.LTptT4L4Node_pos);};
      AnyRefNode ITC7R7Via4NodeR  = { sRel =  .Scale(.Data.R4.Right.ITC7R7Via4Node_pos);};
      AnyRefNode ITR1R7Via3NodeR  = { sRel =  .Scale(.Data.R4.Right.ITR1R7Via3Node_pos);};
      AnyRefNode ITR2R8Via2NodeR  = { sRel =  .Scale(.Data.R4.Right.ITR2R8Via2Node_pos);};
      AnyRefNode ITR3R9Via1NodeR  = { sRel =  .Scale(.Data.R4.Right.ITR3R9Via1Node_pos);};
      AnyRefNode ITR4R10NodeROrg  = { sRel =  .Scale(.Data.R4.Right.ITR4R10Node_pos);};
      AnyRefNode ICptR4C5Node     = { sRel =  .Scale(.Data.R4.Right.ICptR4C5Node_pos);};
      AnyRefNode ICptR5C6Via4Node = { sRel =  .Scale(.Data.R4.Right.ICptR5C6Via4Node_pos);};
      AnyRefNode ICptR6C4Via4Node = { sRel =  .Scale(.Data.R4.Right.ICptR6C4Via4Node_pos);};
      AnyRefNode TrThR4SNodeROrg  = { sRel =  .Scale(.Data.R4.Right.TrThR4SNodeOrg_pos);};
      AnyRefNode TrThR4R6NodeROrg = { sRel =  .Scale(.Data.R4.Right.TrThR4R6NodeOrg_pos);};
      AnyRefNode TrThR2R4NodeRIns = { sRel =  .Scale(.Data.R4.Right.TrThR2R4NodeIns_pos);};
      AnyRefNode LCBrT3R4_R_Ins   = { sRel =  .Scale(.Data.R4.Right.LCBrT3R4Ins_pos);};
      AnyRefNode SCR1R4_R_Ins     = { sRel =  .Scale(.Data.R4.Right.SCR1R4Ins_pos);};
      AnyRefNode SCR2R4_R_Ins     = { sRel =  .Scale(.Data.R4.Right.SCR2R4Ins_pos);};
      AnyRefNode SCR4R6_R_Org     = { sRel =  .Scale(.Data.R4.Right.SCR4R6Org_pos);};
      AnyRefNode SCR4R7_R_Org     = { sRel =  .Scale(.Data.R4.Right.SCR4R7Org_pos);};
      AnyRefNode O_serratus_anterior_5R = {sRel = .Scale(.Data.R4.Right.O_serratus_anterior_pos); };
      AnyRefNode O_serratus_posterior_superior_3R = {sRel = .Scale(.Data.R4.Right.O_serratus_posterior_superior_pos); };
      AnyRefNode IC_Int_R3R4_elem_sternum = {sRel = .Scale(.Data.R4.Right.IC_Int_R3R4_elem_sternum_pos); };
      AnyFolder &DataRib =Data.R4.Right;
      #if BM_TRUNK_THORACIC_MODEL == _THORACIC_MODEL_FLEXIBLE_
      #include "ICPoints.any"  //create points for inter costal muscles
      #endif
    };

    R5Seg= {
      AnyRefNode IC_R5_Ant_R_Ins = {sRel = .Scale(.Data.R5.Right.IC_AntIns_pos);};
      AnyRefNode LTptT3L3Via2NodeR= { sRel =  .Scale(.Data.Thorax.Right.LTptT3L3Via2Node_pos);};
      AnyRefNode LTptT4L4Via1NodeR= { sRel =  .Scale(.Data.Thorax.Right.LTptT4L4Via1Node_pos);};
      AnyRefNode LTptT5L5NodeR    = { sRel =  .Scale(.Data.Thorax.Right.LTptT5L5Node_pos);};
      AnyRefNode ILptC5SIPSNodeR  = { sRel =  .Scale(.Data.Thorax.Right.ILptC5SIPSNode_pos);};
      AnyRefNode ITC7R7Via5NodeR  = { sRel =  .Scale(.Data.R5.Right.ITC7R7Via5Node_pos);};
      AnyRefNode ITR1R7Via4NodeR  = { sRel =  .Scale(.Data.R5.Right.ITR1R7Via4Node_pos);};
      AnyRefNode ITR2R8Via3NodeR  = { sRel =  .Scale(.Data.R5.Right.ITR2R8Via3Node_pos);};
      AnyRefNode ITR3R9Via2NodeR  = { sRel =  .Scale(.Data.R5.Right.ITR3R9Via2Node_pos);};
      AnyRefNode ITR4R10Via1NodeR = { sRel =  .Scale(.Data.R5.Right.ITR4R10Via1Node_pos);};
      AnyRefNode ITR5R11NodeROrg  = { sRel =  .Scale(.Data.R5.Right.R5ITR5R11Node_pos);};
      AnyRefNode ICptR5C6Node     = { sRel =  .Scale(.Data.R5.Right.ICptR5C6Node_pos);};
      AnyRefNode ICptR6C4Via5Node = { sRel =  .Scale(.Data.R5.Right.ICptR6C4Via5Node_pos);};
      AnyRefNode TrThR5SNodeROrg  = { sRel =  .Scale(.Data.R5.Right.TrThR5SNodeOrg_pos);};
      AnyRefNode TrThR3R5NodeRIns = { sRel =  .Scale(.Data.R5.Right.TrThR3R5NodeIns_pos);};
      AnyRefNode TrThR5R7NodeROrg = { sRel =  .Scale(.Data.R5.Right.TrThR5R7NodeOrg_pos);};
      AnyRefNode LCBrT4R5_R_Ins   = { sRel =  .Scale(.Data.R5.Right.LCBrT4R5Ins_pos);};
      AnyRefNode SCR2R5_R_Ins     = { sRel =  .Scale(.Data.R5.Right.SCR2R5Ins_pos);};
      AnyRefNode SCR3R5_R_Ins     = { sRel =  .Scale(.Data.R5.Right.SCR3R5Ins_pos);};
      AnyRefNode SCR5R7_R_Org     = { sRel =  .Scale(.Data.R5.Right.SCR5R7Org_pos);};
      AnyRefNode SCR5R8_R_Org     = { sRel =  .Scale(.Data.R5.Right.SCR5R8Org_pos);};
      AnyRefNode O_serratus_anterior_4R = {sRel = .Scale(.Data.R5.Right.O_serratus_anterior_pos); };
      AnyRefNode O_serratus_posterior_superior_4R = {sRel = .Scale(.Data.R5.Right.O_serratus_posterior_superior_pos); };
      AnyRefNode IC_Int_R4R5_elem_sternum = {sRel = .Scale(.Data.R5.Right.IC_Int_R4R5_elem_sternum_pos); };
      AnyFolder &DataRib =Data.R5.Right;
      #if BM_TRUNK_THORACIC_MODEL == _THORACIC_MODEL_FLEXIBLE_
      #include "ICPoints.any"  //create points for inter costal muscles
      #endif
    };

    R6Seg= {
      AnyRefNode LTptT3L3Via3NodeR   = { sRel =  .Scale(.Data.Thorax.Right.LTptT3L3Via3Node_pos);};
      AnyRefNode LTptT4L4Via2NodeR   = { sRel =  .Scale(.Data.Thorax.Right.LTptT4L4Via2Node_pos);};
      AnyRefNode LTptT5L5Via1NodeR   = { sRel =  .Scale(.Data.Thorax.Right.LTptT5L5Via1Node_pos);};
      AnyRefNode LTptT6S1NodeR       = { sRel =  .Scale(.Data.Thorax.Right.LTptT6S1Node_pos);};
      AnyRefNode ILptC5SIPSVia1NodeR = { sRel =  .Scale(.Data.Thorax.Right.ILptC5SIPSVia1Node_pos);};
      AnyRefNode ILptC6SIPSNodeR     = { sRel =  .Scale(.Data.Thorax.Right.ILptC6SIPSNode_pos);};
      AnyRefNode ObliquusExternusNode        = { sRel =  .Scale(.Data.Thorax.Right.OEC6_RSNode_pos);};
      AnyRefNode ITC7R7Via6NodeR     = { sRel =  .Scale(.Data.R6.Right.ITC7R7Via6Node_pos);};
      AnyRefNode ITR1R7Via5NodeR     = { sRel =  .Scale(.Data.R6.Right.ITR1R7Via5Node_pos);};
      AnyRefNode ITR2R8Via4NodeR     = { sRel =  .Scale(.Data.R6.Right.ITR2R8Via4Node_pos);};
      AnyRefNode ITR3R9Via3NodeR     = { sRel =  .Scale(.Data.R6.Right.ITR3R9Via3Node_pos);};
      AnyRefNode ITR4R10Via2NodeR    = { sRel =  .Scale(.Data.R6.Right.ITR4R10Via2Node_pos);};
      AnyRefNode ITR5R11Via1NodeR    = { sRel =  .Scale(.Data.R6.Right.ITR5R11Via1Node_pos);};
      AnyRefNode ITR6R12NodeR        = { sRel =  .Scale(.Data.R6.Right.R6ITR6R12Node_pos);};
      AnyRefNode ICptR6C4Node     = { sRel =  .Scale(.Data.R6.Right.ICptR6C4Node_pos);};
      AnyRefNode TrThR6SNodeROrg  = { sRel =  .Scale(.Data.R6.Right.TrThR6SNodeOrg_pos);};
      AnyRefNode TrThR4R6NodeRIns = { sRel =  .Scale(.Data.R6.Right.TrThR4R6NodeIns_pos);};
      AnyRefNode LCBrT5R6_R_Ins   = { sRel =  .Scale(.Data.R6.Right.LCBrT5R6Ins_pos);};
      AnyRefNode SCR3R6_R_Ins     = { sRel =  .Scale(.Data.R6.Right.SCR3R6Ins_pos);};
      AnyRefNode SCR4R6_R_Ins     = { sRel =  .Scale(.Data.R6.Right.SCR4R6Ins_pos);};
      AnyRefNode SCR6R8_R_Org     = { sRel =  .Scale(.Data.R6.Right.SCR6R8Org_pos);};
      AnyRefNode SCR6R9_R_Org     = { sRel =  .Scale(.Data.R6.Right.SCR6R9Org_pos);};
      AnyRefNode O_serratus_anterior_3R = {sRel = .Scale(.Data.R6.Right.O_serratus_anterior_pos); };
      AnyRefNode IC_Int_R5R6_elem_sternum = {sRel = .Scale(.Data.R6.Right.IC_Int_R5R6_elem_sternum_pos); };
      AnyFolder &DataRib =Data.R6.Right;
      #if BM_TRUNK_THORACIC_MODEL == _THORACIC_MODEL_FLEXIBLE_
      #include "ICPoints.any"  //create points for inter costal muscles
      #endif
    };

    R7Seg= {
      AnyRefNode ILptC7CINodeR       = { sRel =  .Scale(.Data.Thorax.Right.ILptC7CINode_pos);};
      AnyRefNode LTptT3L3Via4NodeR   = { sRel =  .Scale(.Data.Thorax.Right.LTptT3L3Via4Node_pos);};
      AnyRefNode LTptT4L4Via3NodeR   = { sRel =  .Scale(.Data.Thorax.Right.LTptT4L4Via3Node_pos);};
      AnyRefNode LTptT5L5Via2NodeR   = { sRel =  .Scale(.Data.Thorax.Right.LTptT5L5Via2Node_pos);};
      AnyRefNode LTptT6S1Via1NodeR   = { sRel =  .Scale(.Data.Thorax.Right.LTptT6S1Via1Node_pos);};
      AnyRefNode LTptT7S2NodeR       = { sRel =  .Scale(.Data.Thorax.Right.LTptT7S2Node_pos);};
      AnyRefNode ILptC5SIPSVia2NodeR = { sRel =  .Scale(.Data.Thorax.Right.ILptC5SIPSVia2Node_pos);};
      AnyRefNode ILptC6SIPSVia1NodeR = { sRel =  .Scale(.Data.Thorax.Right.ILptC6SIPSVia1Node_pos);};
      AnyRefNode ObliquusExternusNode        = { sRel =  .Scale(.Data.Thorax.Right.OEC7_RSNode_pos);};
      AnyRefNode ITC7R7NodeRIns      = { sRel =  .Scale(.Data.R7.Right.ITC7R7Node_posIns);};
      AnyRefNode ITR1R7NodeRIns      = { sRel =  .Scale(.Data.R7.Right.ITR1R7Node_posIns);};
      AnyRefNode ITR2R8Via5NodeR     = { sRel =  .Scale(.Data.R7.Right.ITR2R8Via5Node_pos);};
      AnyRefNode ITR3R9Via4NodeR     = { sRel =  .Scale(.Data.R7.Right.ITR3R9Via4Node_pos);};
      AnyRefNode ITR4R10Via3NodeR    = { sRel =  .Scale(.Data.R7.Right.ITR4R10Via3Node_pos);};
      AnyRefNode ITR5R11Via2NodeR    = { sRel =  .Scale(.Data.R7.Right.ITR5R11Via2Node_pos);};
      AnyRefNode ITR6R12Via1NodeR    = { sRel =  .Scale(.Data.R7.Right.ITR6R12Via1Node_pos);};
      AnyRefNode TrThR5R7NodeRIns = { sRel =  .Scale(.Data.R7.Right.TrThR5R7NodeIns_pos);};
      AnyRefNode TrThR7SNodeROrg  = { sRel =  .Scale(.Data.R7.Right.TrThR7SNodeOrg_pos);};
      AnyRefNode LCBrT6R7_R_Ins   = { sRel =  .Scale(.Data.R7.Right.LCBrT6R7Ins_pos);};
      AnyRefNode LCLgT5R7_R_Ins   = { sRel =  .Scale(.Data.R7.Right.LCLgT5R7Ins_pos);};
      AnyRefNode SCR4R7_R_Ins     = { sRel =  .Scale(.Data.R7.Right.SCR4R7Ins_pos);};
      AnyRefNode SCR5R7_R_Ins     = { sRel =  .Scale(.Data.R7.Right.SCR5R7Ins_pos);};
      AnyRefNode SCR7R9_R_Org     = { sRel =  .Scale(.Data.R7.Right.SCR7R9Org_pos);};
      AnyRefNode SCR7R10_R_Org    = { sRel =  .Scale(.Data.R7.Right.SCR7R10Org_pos);};
      AnyRefNode O_serratus_anterior_2R = {sRel = .Scale(.Data.R7.Right.O_serratus_anterior_pos); };
      AnyRefNode IC_Int_R6R7_elem_sternum = {sRel = .Scale(.Data.R7.Right.IC_Int_R6R7_elem_sternum_pos); };
      AnyFolder &DataRib =Data.R7.Right;
      #if BM_TRUNK_THORACIC_MODEL == _THORACIC_MODEL_FLEXIBLE_
      #include "ICPoints.any"  //create points for inter costal muscles
      #endif
    };

    R8Seg= {
      AnyRefNode ILptC7CIVia1NodeR   = { sRel =  .Scale(.Data.Thorax.Right.ILptC7CIVia1Node_pos);};
      AnyRefNode ILptC8CINodeR       = { sRel =  .Scale(.Data.Thorax.Right.ILptC8CINode_pos);};
      AnyRefNode LTptT3L3Via5NodeR   = { sRel =  .Scale(.Data.Thorax.Right.LTptT3L3Via5Node_pos);};
      AnyRefNode LTptT4L4Via4NodeR   = { sRel =  .Scale(.Data.Thorax.Right.LTptT4L4Via4Node_pos);};
      AnyRefNode LTptT5L5Via3NodeR   = { sRel =  .Scale(.Data.Thorax.Right.LTptT5L5Via3Node_pos);};
      AnyRefNode LTptT6S1Via2NodeR   = { sRel =  .Scale(.Data.Thorax.Right.LTptT6S1Via2Node_pos);};
      AnyRefNode LTptT7S2Via1NodeR   = { sRel =  .Scale(.Data.Thorax.Right.LTptT7S2Via1Node_pos);};
      AnyRefNode LTptT8S3NodeR       = { sRel =  .Scale(.Data.Thorax.Right.LTptT8S3Node_pos);};
      AnyRefNode ILptC5SIPSVia3NodeR = { sRel =  .Scale(.Data.Thorax.Right.ILptC5SIPSVia3Node_pos);};
      AnyRefNode ILptC6SIPSVia2NodeR = { sRel =  .Scale(.Data.Thorax.Right.ILptC6SIPSVia2Node_pos);};
      AnyRefNode ObliquusExternusNode        = { sRel =  .Scale(.Data.Thorax.Right.OEC8_RSNode_pos);};
      AnyRefNode ITR2R8NodeRIns      = { sRel =  .Scale(.Data.R8.Right.ITR2R8Node_posIns);};
      AnyRefNode ITR3R9Via5NodeR     = { sRel =  .Scale(.Data.R8.Right.ITR3R9Via5Node_pos);};
      AnyRefNode ITR4R10Via4NodeR    = { sRel =  .Scale(.Data.R8.Right.ITR4R10Via4Node_pos);};
      AnyRefNode ITR5R11Via3NodeR    = { sRel =  .Scale(.Data.R8.Right.ITR5R11Via3Node_pos);};
      AnyRefNode ITR6R12Via2NodeR    = { sRel =  .Scale(.Data.R8.Right.ITR6R12Via2Node_pos);};
      AnyRefNode TrThR8SNodeROrg  = { sRel =  .Scale(.Data.R8.Right.TrThR8SNodeOrg_pos);};
      AnyRefNode LCBrT7R8_R_Ins   = { sRel =  .Scale(.Data.R8.Right.LCBrT7R8Ins_pos);};
      AnyRefNode LCLgT6R8_R_Ins   = { sRel =  .Scale(.Data.R8.Right.LCLgT6R8Ins_pos);};
      AnyRefNode SCR5R8_R_Ins     = { sRel =  .Scale(.Data.R8.Right.SCR5R8Ins_pos);};
      AnyRefNode SCR6R8_R_Ins     = { sRel =  .Scale(.Data.R8.Right.SCR6R8Ins_pos);};
      AnyRefNode SCR8R10_R_Org    = { sRel =  .Scale(.Data.R8.Right.SCR8R10Org_pos);};
      AnyRefNode SCR8R11_R_Ins    = { sRel =  .Scale(.Data.R8.Right.SCR8R11Ins_pos); };
      AnyRefNode O_serratus_anterior_1R = {sRel = .Scale(.Data.R8.Right.O_serratus_anterior_pos); };
      AnyRefNode IC_Int_R7R8_elem_sternum = {sRel = .Scale(.Data.R8.Right.IC_Int_R7R8_elem_sternum_pos); };
      AnyFolder &DataRib =Data.R8.Right;
      #if BM_TRUNK_THORACIC_MODEL == _THORACIC_MODEL_FLEXIBLE_
      #include "ICPoints.any"  //create points for inter costal muscles
      #endif
    };

    R9Seg= {
      AnyRefNode ILptC7CIVia2NodeR   = { sRel =  .Scale(.Data.Thorax.Right.ILptC7CIVia2Node_pos);};
      AnyRefNode ILptC8CIVia1NodeR   = { sRel =  .Scale(.Data.Thorax.Right.ILptC8CIVia1Node_pos);};
      AnyRefNode ILptC9CINodeR       = { sRel =  .Scale(.Data.Thorax.Right.ILptC9CINode_pos);};
      AnyRefNode LTptT3L3Via6NodeR   = { sRel =  .Scale(.Data.Thorax.Right.LTptT3L3Via6Node_pos);};
      AnyRefNode LTptT4L4Via5NodeR   = { sRel =  .Scale(.Data.Thorax.Right.LTptT4L4Via5Node_pos);};
      AnyRefNode LTptT5L5Via4NodeR   = { sRel =  .Scale(.Data.Thorax.Right.LTptT5L5Via4Node_pos);};
      AnyRefNode LTptT6S1Via3NodeR   = { sRel =  .Scale(.Data.Thorax.Right.LTptT6S1Via3Node_pos);};
      AnyRefNode LTptT7S2Via2NodeR   = { sRel =  .Scale(.Data.Thorax.Right.LTptT7S2Via2Node_pos);};
      AnyRefNode LTptT8S3Via1NodeR   = { sRel =  .Scale(.Data.Thorax.Right.LTptT8S3Via1Node_pos);};
      AnyRefNode LTptT9S4NodeR       = { sRel =  .Scale(.Data.Thorax.Right.LTptT9S4Node_pos);};
      AnyRefNode ILptC5SIPSVia4NodeR = { sRel =  .Scale(.Data.Thorax.Right.ILptC5SIPSVia4Node_pos);};
      AnyRefNode ILptC6SIPSVia3NodeR = { sRel =  .Scale(.Data.Thorax.Right.ILptC6SIPSVia3Node_pos);};
      AnyRefNode ObliquusExternusNode        = { sRel =  .Scale(.Data.Thorax.Right.OEC9_RSNode_pos);};
     AnyRefNode ObliquusExternusNode_1        = { sRel =  .Scale(.Data.Thorax.Right.OEC9_RSNode_1_pos);};

      AnyRefNode ITR3R9NodeRIns      = { sRel =  .Scale(.Data.R9.Right.ITR3R9Node_posIns);};
      AnyRefNode ITR4R10Via5NodeR    = { sRel =  .Scale(.Data.R9.Right.ITR4R10Via5Node_pos);};
      AnyRefNode ITR5R11Via4NodeR    = { sRel =  .Scale(.Data.R9.Right.ITR5R11Via4Node_pos);};
      AnyRefNode ITR6R12Via3NodeR    = { sRel =  .Scale(.Data.R9.Right.ITR6R12Via3Node_pos);};
      AnyRefNode TrThR9SNodeROrg  = { sRel =  .Scale(.Data.R9.Right.TrThR9SNodeOrg_pos);};
      AnyRefNode LCBrT8R9_R_Ins   = { sRel =  .Scale(.Data.R9.Right.LCBrT8R9Ins_pos);};
      AnyRefNode LCLgT7R9_R_Ins   = { sRel =  .Scale(.Data.R9.Right.LCLgT7R9Ins_pos);};
      AnyRefNode SCR6R9_R_Ins     = { sRel =  .Scale(.Data.R9.Right.SCR6R9Ins_pos);};
      AnyRefNode SCR7R9_R_Ins     = { sRel =  .Scale(.Data.R9.Right.SCR7R9Ins_pos);};
      AnyRefNode SCR9R11_R_Ins   = { sRel =  .Scale(.Data.R9.Right.SCR9R11Ins_pos); };
      AnyRefNode O_serratus_posterior_inferior_R9R = {sRel = .Scale(.Data.R9.Right.O_serratus_posterior_inferior_pos); };
      AnyRefNode IC_Int_R8R9_elem_sternum = {sRel = .Scale(.Data.R9.Right.IC_Int_R8R9_elem_sternum_pos); };
      AnyFolder &DataRib =Data.R9.Right;
      #if BM_TRUNK_THORACIC_MODEL == _THORACIC_MODEL_FLEXIBLE_
      #include "ICPoints.any"  //create points for inter costal muscles
      #endif
    };

    R10Seg= {
      AnyRefNode ILptC7CIVia3NodeR   = { sRel =  .Scale(.Data.Thorax.Right.ILptC7CIVia3Node_pos);};
      AnyRefNode ILptC8CIVia2NodeR   = { sRel =  .Scale(.Data.Thorax.Right.ILptC8CIVia2Node_pos);};
      AnyRefNode ILptC9CIVia1NodeR   = { sRel =  .Scale(.Data.Thorax.Right.ILptC9CIVia1Node_pos);};
      AnyRefNode ILptC10CINodeR      = { sRel =  .Scale(.Data.Thorax.Right.ILptC10CINode_pos);};
      AnyRefNode LTptT3L3Via7NodeR   = { sRel =  .Scale(.Data.Thorax.Right.LTptT3L3Via7Node_pos);};
      AnyRefNode LTptT4L4Via6NodeR   = { sRel =  .Scale(.Data.Thorax.Right.LTptT4L4Via6Node_pos);};
      AnyRefNode LTptT5L5Via5NodeR   = { sRel =  .Scale(.Data.Thorax.Right.LTptT5L5Via5Node_pos);};
      AnyRefNode LTptT6S1Via4NodeR   = { sRel =  .Scale(.Data.Thorax.Right.LTptT6S1Via4Node_pos);};
      AnyRefNode LTptT7S2Via3NodeR   = { sRel =  .Scale(.Data.Thorax.Right.LTptT7S2Via3Node_pos);};
      AnyRefNode LTptT8S3Via2NodeR   = { sRel =  .Scale(.Data.Thorax.Right.LTptT8S3Via2Node_pos);};
      AnyRefNode LTptT9S4Via1NodeR   = { sRel =  .Scale(.Data.Thorax.Right.LTptT9S4Via1Node_pos);};
      AnyRefNode LTptT10SacrumNodeR  = { sRel =  .Scale(.Data.Thorax.Right.LTptT10SacrumNode_pos);};
      AnyRefNode ILptC5SIPSVia5NodeR = { sRel =  .Scale(.Data.Thorax.Right.ILptC5SIPSVia5Node_pos);};
      AnyRefNode ILptC6SIPSVia4NodeR = { sRel =  .Scale(.Data.Thorax.Right.ILptC6SIPSVia4Node_pos);};
      AnyRefNode ObliquusExternusNode_00       = { sRel =  .Scale(.Data.Thorax.Right.OEC6_1_RSNode_pos);};
      AnyRefNode ObliquusExternusNode_0       = { sRel =  .Scale(.Data.Thorax.Right.OEC6_2_RSNode_pos);};
      AnyRefNode ObliquusExternusNode_1       = { sRel =  .Scale(.Data.Thorax.Right.OEC10_RSNode_pos);};
      AnyRefNode ObliquusExternusNode_2       = { sRel =  .Scale(.Data.R10.Right.OEC10a_CINode_pos);};
      AnyRefNode ObliquusInternusNode_1       = { sRel =  .Scale(.Data.Thorax.Right.OICI_C10Node_pos);};
      AnyRefNode ObliquusInternusNode_2       = { sRel =  .Scale(.Data.Thorax.Right.OICI_C10aNode_pos);};
      AnyRefNode ITR4R10NodeRIns     = { sRel =  .Scale(.Data.R10.Right.ITR4R10Node_posIns);};
      AnyRefNode ITR5R11Via5NodeR    = { sRel =  .Scale(.Data.R10.Right.ITR5R11Via5Node_pos);};
      AnyRefNode ITR6R12Via4NodeR    = { sRel =  .Scale(.Data.R10.Right.ITR6R12Via4Node_pos);};
      AnyRefNode TrThR10SNodeROrg = { sRel =  .Scale(.Data.R10.Right.TrThR10SNodeOrg_pos);};
      AnyRefNode LCBrT9R10_R_Ins  = { sRel =  .Scale(.Data.R10.Right.LCBrT9R10Ins_pos);};
      AnyRefNode LCLgT8R10_R_Ins  = { sRel =  .Scale(.Data.R10.Right.LCLgT8R10Ins_pos);};
      AnyRefNode SCR7R10_R_Ins    = { sRel =  .Scale(.Data.R10.Right.SCR7R10Ins_pos);};
      AnyRefNode SCR8R10_R_Ins    = { sRel =  .Scale(.Data.R10.Right.SCR8R10Ins_pos);};
      AnyRefNode O_serratus_posterior_inferior_R10R = {sRel = .Scale(.Data.R10.Right.O_serratus_posterior_inferior_pos); };
      AnyRefNode R10_DiaphragmNode1R = {sRel = .Scale(.Data.R10.Right.R10_DiaphragmNode1_pos); };
      AnyRefNode R10_DiaphragmNode2R = {sRel = .Scale(.Data.R10.Right.R10_DiaphragmNode2_pos); };
      AnyRefNode R10_DiaphragmNode3R = {sRel = .Scale(.Data.R10.Right.R10_DiaphragmNode3_pos); };
      AnyRefNode IC_Int_R9R10_elem_sternum = {sRel = .Scale(.Data.R10.Right.IC_Int_R9R10_elem_sternum_pos); };
      AnyRefNode CCNodeR11 ={ sRel = .Scale(.Data.Thorax.Right.OEC11_CINode_pos);};
      AnyRefNode MidNode        = { sRel =  .Scale(.Data.R10.Right.MidNode_pos); };
      AnyFolder &DataRib =Data.R10.Right;
      #if BM_TRUNK_THORACIC_MODEL == _THORACIC_MODEL_FLEXIBLE_
      #include "ICPoints.any"  //create points for inter costal muscles
      #endif
    };

    R11Seg = {
      AnyRefNode ObliquusExternusNode = { sRel =  .Scale(.Data.Thorax.Right.OEC11_CINode_pos);};
      AnyRefNode ObliquusInternusNode       = { sRel =  .Scale(.Data.Thorax.Right.OICI_C11Node_pos);};


      AnyRefNode ObliquusExternusNode1       = { sRel =  .Scale(.Data.Thorax.Right.OEC11_CINode1_pos);};
      AnyRefNode ObliquusInternusNode1       = { sRel =  .Scale(.Data.R12.Right.OEC12_CINode1_pos);};

      AnyRefNode O_serratus_posterior_inferior_R11R = {sRel = .Scale(.Data.R11.Right.O_serratus_posterior_inferior_pos);};
      AnyRefNode LTptT7S2Via4NodeR    = {sRel = .Scale(.Data.Thorax.Right.LTptT7S2Via4Node_pos); };
      AnyRefNode LTptT8S3Via3NodeR    = {sRel = .Scale(.Data.Thorax.Right.LTptT8S3Via3Node_pos); };
      AnyRefNode LTptT9S4Via2NodeR    = {sRel = .Scale(.Data.Thorax.Right.LTptT9S4Via2Node_pos); };
      AnyRefNode ITR5R11NodeRIns     = {sRel =  .Scale(.Data.T11.Right.ITR5R11Node_pos); };
      AnyRefNode LTptT10SacrumVia1NodeR = {sRel = .Scale(.Data.Thorax.Right.LTptT10SacrumVia1Node_pos); };
      AnyRefNode ITR6R12Via5NodeR = {sRel =  .Scale(.Data.T11.Right.ITR6R12Via5Node_pos); };
      AnyRefNode LTptC11SacrumNodeR   = {sRel = .Scale(.Data.Thorax.Right.LTptC11SacrumNode_pos); };
      AnyRefNode ILptC11CINodeR = {sRel = .Scale(.Data.Thorax.Right.ILptC11CINode_pos); };
      AnyRefNode LCBrT10R11_R_Ins  = { sRel =  .Scale(.Data.R11.Right.LCBrT10R11Ins_pos);};
      AnyRefNode LCLgT9R11_R_Ins  = { sRel =  .Scale(.Data.R11.Right.LCLgT9R11Ins_pos);};
      AnyRefNode SCR8R11_R_Org = { sRel =  .Scale(.Data.T11.Right.SCR8R11_Org_pos);};
      AnyRefNode SCR9R11_R_Org = { sRel =  .Scale(.Data.T11.Right.SCR9R11_Org_pos);};
      AnyRefNode R11_DiaphragmNode1R = {sRel = .Scale(.Data.R11.Right.R11_DiaphragmNode1_pos); };
      AnyRefNode R11_DiaphragmNode2R = {sRel = .Scale(.Data.R11.Right.R11_DiaphragmNode2_pos); };
      AnyRefNode R11_DiaphragmNode3R = {sRel = .Scale(.Data.R11.Right.R11_DiaphragmNode3_pos); };
      AnyRefNode CCTangetNodeR11 ={ sRel = .Scale(.Data.R11.Right.CC_AlignmentNode); };
      AnyRefNode CCTangetNodeR11R10 ={ sRel = .Scale(.Data.R11.Right.CCTangetNodeR11R10); };
      AnyRefNode CCNodeR11 ={ sRel = .Scale(.Data.Thorax.Right.OEC11_CINode_pos);AnyRefNode RotNode ={ ARel=RotMat(.sRel,..CCTangetNodeR11.sRel,..CCTangetNodeR11R10.sRel);};};
      AnyRefNode CCNodeR12 ={ sRel = .Scale(.Data.R12.Right.OEC12_CINode_pos);};
      AnyFolder &DataRib =Data.R11.Right;
      #if BM_TRUNK_THORACIC_MODEL == _THORACIC_MODEL_FLEXIBLE_
      #include "ICPoints.any"  //create points for inter costal muscles
      #endif
    };

    R12Seg = {
      AnyRefNode ObliquusExternusNode = { sRel =  .Scale(.Data.R12.Right.OEC12_CINode_pos);};

      AnyRefNode ITR6R12NodeRIns = {sRel =  .Scale(.Data.R12.Right.ITR6R12Node_pos); };
      AnyRefNode LTptT8S3Via4NodeR    = {sRel = .Scale(.Data.R12.Right.LTptT8S3Via4Node_pos);};
      AnyRefNode LTptT9S4Via3NodeR    = {sRel = .Scale(.Data.R12.Right.LTptT9S4Via3Node_pos);};
      AnyRefNode LTptT10SacrumVia2NodeR = {sRel = .Scale(.Data.R12.Right.LTptT10SacrumVia2Node_pos); };
      AnyRefNode LTptC11SacrumVia1NodeR = {sRel = .Scale(.Data.R12.Right.LTptC11SacrumVia1Node_pos); };
      AnyRefNode LTptC12SacrumNodeR   = {sRel = .Scale(.Data.R12.Right.LTptC12SacrumNode_pos); };
      AnyRefNode QLC12Lat_CINode1R = {sRel = .Scale(.Data.R12.Right.QLC12Lat_CINode1_pos); };
      AnyRefNode QLC12Lat_CINode2R = {sRel = .Scale(.Data.R12.Right.QLC12Lat_CINode2_pos); };
      AnyRefNode QLC12Lat_CINode3R = {sRel = .Scale(.Data.R12.Right.QLC12Lat_CINode3_pos); };
      AnyRefNode QLC12Lat_CINode4R = {sRel = .Scale(.Data.R12.Right.QLC12Lat_CINode4_pos); };
      AnyRefNode QLC12Lat_CINode5R = {sRel = .Scale(.Data.R12.Right.QLC12Lat_CINode5_pos); };
      AnyRefNode QLC12InterMedian_CINode1R = {sRel = .Scale(.Data.R12.Right.QLC12InterMedian_CINode1_pos); };
      AnyRefNode QLC12InterMedian_CINode2R = {sRel = .Scale(.Data.R12.Right.QLC12InterMedian_CINode2_pos); };
      AnyRefNode QLC12InterMedian_CINode3R = {sRel = .Scale(.Data.R12.Right.QLC12InterMedian_CINode3_pos); };
      AnyRefNode QLC12InterMedian_CINode4R = {sRel = .Scale(.Data.R12.Right.QLC12InterMedian_CINode4_pos); };
      AnyRefNode QLC12InterMedian_CINode5R = {sRel = .Scale(.Data.R12.Right.QLC12InterMedian_CINode5_pos); };
      AnyRefNode QLC12Median_CINode1R = {sRel = .Scale(.Data.R12.Right.QLC12Median_CINode1_pos); };
      AnyRefNode QLC12Median_CINode2R = {sRel = .Scale(.Data.R12.Right.QLC12Median_CINode2_pos); };
      AnyRefNode QLC12Median_CINode3R = {sRel = .Scale(.Data.R12.Right.QLC12Median_CINode3_pos); };
      AnyRefNode QLC12Median_CINode4R = {sRel = .Scale(.Data.R12.Right.QLC12Median_CINode4_pos); };
      AnyRefNode ILptC12CINodeR    = {sRel = .Scale(.Data.R12.Right.ILptC12CINode_pos );};
      AnyRefNode ILptC10CIVia1NodeR= {sRel = .Scale(.Data.R12.Right.ILptC10CIVia1Node_pos );};
      AnyRefNode ILptC9CIVia2NodeR = {sRel = .Scale(.Data.R12.Right.ILptC9CIVia2Node_pos );};
      AnyRefNode ILptC8CIVia3NodeR = {sRel = .Scale(.Data.R12.Right.ILptC8CIVia3Node_pos );};
      AnyRefNode ILptC7CIVia4NodeR = {sRel = .Scale(.Data.R12.Right.ILptC7CIVia4Node_pos );};
      AnyRefNode ILptC6SIPSVia5NodeR = {sRel = .Scale(.Data.R12.Right.ILptC6SIPSVia5Node_pos );};
      AnyRefNode ILptC5SIPSVia6NodeR = {sRel = .Scale(.Data.R12.Right.ILptC5SIPSVia6Node_pos );};
      AnyRefNode LCBrT11R12_R_Ins  = { sRel =  .Scale(.Data.R12.Right.LCBrT11R12Ins_pos);};
      AnyRefNode LCLgT10R12_R_Ins  = { sRel =  .Scale(.Data.R12.Right.LCLgT10R12Ins_pos);};
      AnyRefNode O_serratus_posterior_inferior_R12R = {sRel = .Scale(.Data.R12.Right.O_serratus_posterior_inferior_pos);};
      AnyRefNode R12_DiaphragmNode1R = {sRel = .Scale(.Data.R12.Right.R12_DiaphragmNode1_pos); };
      AnyRefNode R12_DiaphragmNode2R = {sRel = .Scale(.Data.R12.Right.R12_DiaphragmNode2_pos); };
      AnyRefNode CCTangetNodeR12 ={ sRel = .Scale(.Data.R12.Right.CC_AlignmentNode); };
      AnyRefNode CCTangetNodeR12R11 ={ sRel = .Scale(.Data.R12.Right.CCTangetNodeR12R11); };
      AnyRefNode CCNodeR12 ={ sRel = .Scale(.Data.R12.Right.OEC12_CINode_pos);AnyRefNode RotNode ={ ARel=RotMat(.sRel,..CCTangetNodeR12.sRel,..CCTangetNodeR12R11.sRel);};};
      AnyFolder &DataRib =Data.R12.Right;
      #if BM_TRUNK_THORACIC_MODEL == _THORACIC_MODEL_FLEXIBLE_
      #include "ICPoints.any"  //create points for inter costal muscles
      #endif

    };

    #if BM_TRUNK_THORACIC_STERNUM_TOPOLOGY == 4
      CostalCartilageSeg = {

        AnyRefNode Mid                ={ sRel =.Scale (.Data.Sternum.MidNode_pos);};
        //----------------------------------------------CS Nodes-----------------------------------------------
        AnyRefNode CS3NodeR     ={ sRel =.Scale (.Data.Sternum.Right.CS3Node_pos);};
        AnyRefNode CS4NodeR     ={ sRel =.Scale (.Data.Sternum.Right.CS4Node_pos);};
        AnyRefNode CS5NodeR     ={ sRel =.Scale (.Data.Sternum.Right.CS5Node_pos);};
        AnyRefNode CS6NodeR     ={ sRel =.Scale (.Data.Sternum.Right.CS6Node_pos);};
        AnyRefNode CS7NodeR     ={ sRel =.Scale (.Data.Sternum.Right.CS7Node_pos);};
        AnyRefNode CS8NodeR     ={ sRel =.Scale (.Data.Sternum.Right.CS8Node_pos);};
        AnyRefNode CS9NodeR     ={ sRel =.Scale (.Data.Sternum.Right.CS9Node_pos);};
        AnyRefNode CS10NodeR    ={ sRel =.Scale (.Data.Sternum.Right.CS10Node_pos);};


          //----------------------------------------------IC Nodes-----------------------------------------------
        AnyRefNode IC3NodeR     ={ sRel =.Scale (.Data.Sternum.Right.IC3Node_pos);};
        AnyRefNode IC4NodeR     ={ sRel =.Scale (.Data.Sternum.Right.IC4Node_pos);};
        AnyRefNode IC5NodeR     ={ sRel =.Scale (.Data.Sternum.Right.IC5Node_pos);};
        AnyRefNode IC6NodeR     ={ sRel =.Scale (.Data.Sternum.Right.IC6Node_pos);};
        AnyRefNode IC7NodeR     ={ sRel =.Scale (.Data.Sternum.Right.IC7Node_pos);};
        AnyRefNode IC8NodeR     ={ sRel =.Scale (.Data.Sternum.Right.IC8Node_pos);};
        AnyRefNode IC9NodeR     ={ sRel =.Scale (.Data.Sternum.Right.IC9Node_pos);};
        AnyRefNode IC10NodeR    ={ sRel =.Scale (.Data.Sternum.Right.IC10Node_pos);};


        AnyRefNode CCTangetNodeR3R     ={ sRel =.Scale (.Data.R3.Right.CC_AlignmentNode);};
        AnyRefNode CCTangetNodeR4R       ={ sRel =.Scale (.Data.R4.Right.CC_AlignmentNode);};
        AnyRefNode CCTangetNodeR5R       ={ sRel =.Scale (.Data.R5.Right.CC_AlignmentNode);};
        AnyRefNode CCTangetNodeR6R       ={ sRel =.Scale (.Data.R6.Right.CC_AlignmentNode);};
        AnyRefNode CCTangetNodeR7R       ={ sRel =.Scale (.Data.R7.Right.CC_AlignmentNode);};
        AnyRefNode CCTangetNodeR8R       ={ sRel =.Scale (.Data.R8.Right.CC_AlignmentNode);};
        AnyRefNode CCTangetNodeR9R       ={ sRel =.Scale (.Data.R9.Right.CC_AlignmentNode);};
        AnyRefNode CCTangetNodeR10R       ={ sRel =.Scale (.Data.R10.Right.CC_AlignmentNode);};


        //----------------------------------------------CC Nodes------------------------------------------------
        AnyRefNode R3NodeR     ={ sRel =.Scale (.Data.Sternum.Right.R3Node_pos); AnyRefNode RotNode ={ ARel=RotMat(.sRel,..CCTangetNodeR3R.sRel,sRel+{0.10,0,0})*RotMat(pi/2,y)*RotMat(pi,z);};};
        AnyRefNode R4NodeR     ={ sRel =.Scale (.Data.Sternum.Right.R4Node_pos); AnyRefNode RotNode ={ ARel=RotMat(.sRel,..CCTangetNodeR4R.sRel,sRel+{0.10,0,0})*RotMat(pi/2,y)*RotMat(pi,z);};};
        AnyRefNode R5NodeR     ={ sRel =.Scale (.Data.Sternum.Right.R5Node_pos); AnyRefNode RotNode ={ ARel=RotMat(.sRel,..CCTangetNodeR5R.sRel,sRel+{0.10,0,0})*RotMat(pi/2,y)*RotMat(pi,z);};};
        AnyRefNode R6NodeR     ={ sRel =.Scale (.Data.Sternum.Right.R6Node_pos); AnyRefNode RotNode ={ ARel=RotMat(.sRel,..CCTangetNodeR6R.sRel,sRel+{0.10,0,0})*RotMat(pi/2,y)*RotMat(pi,z);};};
        AnyRefNode R7NodeR     ={ sRel =.Scale (.Data.Sternum.Right.R7Node_pos); AnyRefNode RotNode ={ ARel=RotMat(.sRel,..CCTangetNodeR7R.sRel,sRel+{0.10,0,0})*RotMat(pi/2,y)*RotMat(pi,z);};};
        AnyRefNode R8NodeR     ={ sRel =.Scale (.Data.Sternum.Right.R8Node_pos); AnyRefNode RotNode ={ ARel=RotMat(.sRel,..CCTangetNodeR8R.sRel,sRel+{0.10,0,0})*RotMat(pi/2,y)*RotMat(pi,z);};};
        AnyRefNode R9NodeR     ={ sRel =.Scale (.Data.Sternum.Right.R9Node_pos); AnyRefNode RotNode ={ ARel=RotMat(.sRel,..CCTangetNodeR9R.sRel,sRel+{0.10,0,0})*RotMat(pi/2,y)*RotMat(pi,z);};};
        AnyRefNode R10NodeR    ={ sRel =.Scale (.Data.Sternum.Right.R10Node_pos);AnyRefNode RotNode ={ ARel=RotMat(.sRel,..CCTangetNodeR10R.sRel,sRel+{0.10,0,0})*RotMat(pi/2,y)*RotMat(pi,z);};};

        AnyRefNode R3NodeRsup     ={ sRel =.Scale (.Data.Sternum.Right.R3Node_pos + {0, .Data.AllRibs.CCOffset[7],0});  };
        AnyRefNode R3NodeRinf     ={ sRel =.Scale (.Data.Sternum.Right.R3Node_pos + {0,-.Data.AllRibs.CCOffset[7],0});  };
        AnyRefNode R3NodeRpos     ={ sRel =.Scale (.Data.Sternum.Right.R3Node_pos + {-.Data.AllRibs.CCOffset[7],0,0});  };
        AnyRefNode R3NodeRant     ={ sRel =.Scale (.Data.Sternum.Right.R3Node_pos + {.Data.AllRibs.CCOffset[7],0,0});  };
        AnyRefNode R4NodeRsup     ={ sRel =.Scale (.Data.Sternum.Right.R4Node_pos + {0, .Data.AllRibs.CCOffset[6],0});  };
        AnyRefNode R4NodeRinf     ={ sRel =.Scale (.Data.Sternum.Right.R4Node_pos + {0,-.Data.AllRibs.CCOffset[6],0});  };
        AnyRefNode R4NodeRpos     ={ sRel =.Scale (.Data.Sternum.Right.R4Node_pos + {-.Data.AllRibs.CCOffset[6],0,0});  };
        AnyRefNode R4NodeRant     ={ sRel =.Scale (.Data.Sternum.Right.R4Node_pos + {.Data.AllRibs.CCOffset[6],0,0});  };
        AnyRefNode R5NodeRsup     ={ sRel =.Scale (.Data.Sternum.Right.R5Node_pos + {0, .Data.AllRibs.CCOffset[5],0});  };
        AnyRefNode R5NodeRinf     ={ sRel =.Scale (.Data.Sternum.Right.R5Node_pos + {0,-.Data.AllRibs.CCOffset[5],0});  };
        AnyRefNode R5NodeRpos     ={ sRel =.Scale (.Data.Sternum.Right.R5Node_pos + {-.Data.AllRibs.CCOffset[5],0,0});  };
        AnyRefNode R5NodeRant     ={ sRel =.Scale (.Data.Sternum.Right.R5Node_pos + {.Data.AllRibs.CCOffset[5],0,0});  };
        AnyRefNode R6NodeRsup     ={ sRel =.Scale (.Data.Sternum.Right.R6Node_pos + {0, .Data.AllRibs.CCOffset[4],0});  };
        AnyRefNode R6NodeRinf     ={ sRel =.Scale (.Data.Sternum.Right.R6Node_pos + {0,-.Data.AllRibs.CCOffset[4],0});  };
        AnyRefNode R6NodeRpos     ={ sRel =.Scale (.Data.Sternum.Right.R6Node_pos + {-.Data.AllRibs.CCOffset[4],0,0});  };
        AnyRefNode R6NodeRant     ={ sRel =.Scale (.Data.Sternum.Right.R6Node_pos + {.Data.AllRibs.CCOffset[4],0,0});  };
        AnyRefNode R7NodeRsup     ={ sRel =.Scale (.Data.Sternum.Right.R7Node_pos + {0, .Data.AllRibs.CCOffset[3],0});  };
        AnyRefNode R7NodeRinf     ={ sRel =.Scale (.Data.Sternum.Right.R7Node_pos + {0,-.Data.AllRibs.CCOffset[3],0});  };
        AnyRefNode R7NodeRpos     ={ sRel =.Scale (.Data.Sternum.Right.R7Node_pos + {-.Data.AllRibs.CCOffset[3],0,0});  };
        AnyRefNode R7NodeRant     ={ sRel =.Scale (.Data.Sternum.Right.R7Node_pos + {.Data.AllRibs.CCOffset[3],0,0});  };
        AnyRefNode R8NodeRsup     ={ sRel =.Scale (.Data.Sternum.Right.R8Node_pos + {0, .Data.AllRibs.CCOffset[2],0});  };
        AnyRefNode R8NodeRinf     ={ sRel =.Scale (.Data.Sternum.Right.R8Node_pos + {0,-.Data.AllRibs.CCOffset[2],0});  };
        AnyRefNode R8NodeRpos     ={ sRel =.Scale (.Data.Sternum.Right.R8Node_pos + {-.Data.AllRibs.CCOffset[2],0,0});  };
        AnyRefNode R8NodeRant     ={ sRel =.Scale (.Data.Sternum.Right.R8Node_pos + {.Data.AllRibs.CCOffset[2],0,0});  };
        AnyRefNode R9NodeRsup     ={ sRel =.Scale (.Data.Sternum.Right.R9Node_pos + {0, .Data.AllRibs.CCOffset[1],0});  };
        AnyRefNode R9NodeRinf     ={ sRel =.Scale (.Data.Sternum.Right.R9Node_pos + {0,-.Data.AllRibs.CCOffset[1],0});  };
        AnyRefNode R9NodeRpos     ={ sRel =.Scale (.Data.Sternum.Right.R9Node_pos + {-.Data.AllRibs.CCOffset[1],0,0});  };
        AnyRefNode R9NodeRant     ={ sRel =.Scale (.Data.Sternum.Right.R9Node_pos + {.Data.AllRibs.CCOffset[1],0,0});  };
        AnyRefNode R10NodeRsup     ={ sRel =.Scale (.Data.Sternum.Right.R10Node_pos + {0, .Data.AllRibs.CCOffset[0],0});  };
        AnyRefNode R10NodeRinf     ={ sRel =.Scale (.Data.Sternum.Right.R10Node_pos + {0,-.Data.AllRibs.CCOffset[0],0});  };
        AnyRefNode R10NodeRpos     ={ sRel =.Scale (.Data.Sternum.Right.R10Node_pos + {-.Data.AllRibs.CCOffset[0],0,0});  };
        AnyRefNode R10NodeRant     ={ sRel =.Scale (.Data.Sternum.Right.R10Node_pos + {.Data.AllRibs.CCOffset[0],0,0});  };
        AnyRefNode RACP_CO6Node= {sRel = .Scale(.Data.Sternum.RACP_CO6Node_pos);};
        AnyRefNode TrThR2SNodeRIns         = {sRel = .Scale(.Data.Sternum.Right.TrThR2SNode_pos);};
        AnyRefNode TrThR3SNodeRIns         = {sRel = .Scale(.Data.Sternum.Right.TrThR3SNode_pos);};
        AnyRefNode TrThR4SNodeRIns         = {sRel = .Scale(.Data.Sternum.Right.TrThR4SNode_pos);};
        AnyRefNode TrThR5SNodeRIns         = {sRel = .Scale(.Data.Sternum.Right.TrThR5SNode_pos);};
        AnyRefNode TrThR6SNodeRIns         = {sRel = .Scale(.Data.Sternum.Right.TrThR6SNode_pos);};
        AnyRefNode TrThNodeRIns= {sRel = .Scale(.Data.Sternum.Right.TrThNode_pos);};
        AnyRefNode ObliquusInternus_1 = {sRel = .Scale(.Data.Sternum.Right.OICI_C9Node_pos);};
        AnyRefNode ObliquusInternus_2 =  {sRel = .Scale(.Data.Sternum.Right.OICI_C8Node_pos);};

        Right = {
          Torus3PointOuterFit ObliquusWrapping() = {
            P1 = ..CS10NodeR.sRel;
            P2 = ..CC_DiaphragmNode6R.sRel;
            P3 = .ObliquusInternusNode_2.sRel;
          };
        };
        Left = {
          Torus3PointOuterFit ObliquusWrapping() = {
            P1 = ..CS10NodeL.sRel;
            P2 = ..CC_DiaphragmNode6L.sRel;
            P3 = .ObliquusInternusNode_2.sRel;
          };
        };
        AnyRefNode Xiphoid_DiaphragmNodeR = {sRel = .Scale(.Data.Sternum.Right.Xiphoid_DiaphragmNode_pos); };
        AnyRefNode CC_DiaphragmNode1R = {sRel = .Scale(.Data.Sternum.Right.CC_DiaphragmNode1_pos); };
        AnyRefNode CC_DiaphragmNode2R = {sRel = .Scale(.Data.Sternum.Right.CC_DiaphragmNode2_pos); };
        AnyRefNode CC_DiaphragmNode3R = {sRel = .Scale(.Data.Sternum.Right.CC_DiaphragmNode3_pos); };
        AnyRefNode CC_DiaphragmNode4R = {sRel = .Scale(.Data.Sternum.Right.CC_DiaphragmNode4_pos); };
        AnyRefNode CC_DiaphragmNode5R = {sRel = .Scale(.Data.Sternum.Right.CC_DiaphragmNode5_pos); };
        AnyRefNode CC_DiaphragmNode6R = {sRel = .Scale(.Data.Sternum.Right.CC_DiaphragmNode6_pos); };
        AnyRefNode CC_DiaphragmNode7R = {sRel = .Scale(.Data.Sternum.Right.CC_DiaphragmNode7_pos); };
        AnyRefNode Right_IC_Int_R3R4_elem_sternum = {sRel = .Scale(.Data.Sternum.Right.IC_Int_R3R4_elem_sternum_pos); };
        AnyRefNode Right_IC_Int_R4R5_elem_sternum = {sRel = .Scale(.Data.Sternum.Right.IC_Int_R4R5_elem_sternum_pos); };
        AnyRefNode Right_IC_Int_R5R6_elem_sternum = {sRel = .Scale(.Data.Sternum.Right.IC_Int_R5R6_elem_sternum_pos); };
        AnyRefNode Right_IC_Int_R6R7_elem_sternum = {sRel = .Scale(.Data.Sternum.Right.IC_Int_R6R7_elem_sternum_pos); };
        AnyRefNode Right_IC_Int_R7R8_elem_sternum = {sRel = .Scale(.Data.Sternum.Right.IC_Int_R7R8_elem_sternum_pos); };
        AnyRefNode Right_IC_Int_R8R9_elem_sternum = {sRel = .Scale(.Data.Sternum.Right.IC_Int_R8R9_elem_sternum_pos); };
        AnyRefNode Right_IC_Int_R9R10_elem_sternum = {sRel = .Scale(.Data.Sternum.Right.IC_Int_R9R10_elem_sternum_pos); };

      };
    #endif
  };

  Left = {
    R1Seg= {
      AnyRefNode ITC7R7Via1NodeL = { sRel =  .Scale(.Data.R1.Left.ITC7R7Via1Node_pos); };
      AnyRefNode ITR1R7NodeLOrg  = { sRel =  .Scale(.Data.R1.Left.ITR1R7Node_pos); };
      AnyRefNode ICptR3C4Via2Node= { sRel =  .Scale(.Data.R1.Left.ICptR3C4Via2Node_pos);};
      AnyRefNode ICptR4C5Via2Node= { sRel =  .Scale(.Data.R1.Left.ICptR4C5Via2Node_pos);};
      AnyRefNode ICptR5C6Via2Node= { sRel =  .Scale(.Data.R1.Left.ICptR5C6Via2Node_pos);};
      AnyRefNode ICptR6C4Via2Node= { sRel =  .Scale(.Data.R1.Left.ICptR6C4Via2Node_pos);};
      AnyRefNode ScalenusAnteriorR1C6Node = { sRel =  .Scale(.Data.R1.Left.ScalenusAnteriorR1C6NodeIns_pos);};
      AnyRefNode ScalenusAnteriorR1C5Node = { sRel =  .Scale(.Data.R1.Left.ScalenusAnteriorR1C5NodeIns_pos);};
      AnyRefNode ScalenusAnteriorR1C4Node = { sRel =  .Scale(.Data.R1.Left.ScalenusAnteriorR1C4NodeIns_pos);};
      AnyRefNode ScalenusAnteriorR1C3Node = { sRel =  .Scale(.Data.R1.Left.ScalenusAnteriorR1C3NodeIns_pos);};
      AnyRefNode ScalenusMediusR1C7Node   = { sRel =  .Scale(.Data.R1.Left.ScalenusMediusR1C7NodeIns_pos);};
      AnyRefNode ScalenusMediusR1C6Node   = { sRel =  .Scale(.Data.R1.Left.ScalenusMediusR1C6NodeIns_pos);};
      AnyRefNode ScalenusMediusR1C5Node   = { sRel =  .Scale(.Data.R1.Left.ScalenusMediusR1C5NodeIns_pos);};
      AnyRefNode ScalenusMediusR1C4Node   = { sRel =  .Scale(.Data.R1.Left.ScalenusMediusR1C4NodeIns_pos);};
      AnyRefNode ScalenusMediusR1C3Node   = { sRel =  .Scale(.Data.R1.Left.ScalenusMediusR1C3NodeIns_pos);};
      AnyRefNode ScalenusMediusR1C2Node   = { sRel =  .Scale(.Data.R1.Left.ScalenusMediusR1C2NodeIns_pos);};
      AnyRefNode LCBrC7R1_L_Ins   = { sRel =  .Scale(.Data.R1.Left.LCBrC7R1Ins_pos);};
      AnyRefNode SCR1R3_L_Org     = { sRel =  .Scale(.Data.R1.Left.SCR1R3Org_pos);};
      AnyRefNode SCR1R4_L_Org     = { sRel =  .Scale(.Data.R1.Left.SCR1R4Org_pos);};
      AnyRefNode O_serratus_anterior_8L = {sRel = .Scale(.Data.R1.Left.O_serratus_anterior_pos); };
      AnyFolder &DataRib =Data.R1.Left;
      #if BM_TRUNK_THORACIC_MODEL == _THORACIC_MODEL_FLEXIBLE_
      #include "ICPoints.any"  //create points for inter costal muscles
      #endif

    };

    R2Seg= {
      AnyRefNode ITC7R7Via2NodeL = { sRel =  .Scale(.Data.R2.Left.ITC7R7Via2Node_pos);};
      AnyRefNode ITR1R7Via1NodeL = { sRel =  .Scale(.Data.R2.Left.ITR1R7Via1Node_pos);};
      AnyRefNode ITR2R8NodeLOrg  = { sRel =  .Scale(.Data.R2.Left.ITR2R8Node_pos);};
      AnyRefNode ScalenusPosteriorR2C7Node= { sRel =  .Scale(.Data.R2.Left.ScalenusPosteriorR2C7NodeIns_pos);};
      AnyRefNode ScalenusPosteriorR2C6Node= { sRel =  .Scale(.Data.R2.Left.ScalenusPosteriorR2C6NodeIns_pos);};
      AnyRefNode ScalenusPosteriorR2C5Node= { sRel =  .Scale(.Data.R2.Left.ScalenusPosteriorR2C5NodeIns_pos);};
      AnyRefNode TrThR2SNodeLOrg  = { sRel =  .Scale(.Data.R2.Left.TrThR2SNodeOrg_pos);};
      AnyRefNode TrThR2R4NodeLOrg = { sRel =  .Scale(.Data.R2.Left.TrThR2R4NodeOrg_pos);};
      AnyRefNode LCBrT1R2_L_Ins   = { sRel =  .Scale(.Data.R2.Left.LCBrT1R2Ins_pos);};
      AnyRefNode SCR2R4_L_Org     = { sRel =  .Scale(.Data.R2.Left.SCR2R4Org_pos);};
      AnyRefNode SCR2R5_L_Org     = { sRel =  .Scale(.Data.R2.Left.SCR2R5Org_pos);};
      AnyRefNode O_serratus_anterior_7L = {sRel = .Scale(.Data.R2.Left.O_serratus_anterior_pos); };
      AnyRefNode O_serratus_posterior_superior_1L = {sRel = .Scale(.Data.R2.Left.O_serratus_posterior_superior_pos); };
      AnyRefNode IC_Int_R1R2_elem_sternum = {sRel = .Scale(.Data.R2.Left.IC_Int_R1R2_elem_sternum_pos); };
      AnyFolder &DataRib =Data.R2.Left;
      #if BM_TRUNK_THORACIC_MODEL == _THORACIC_MODEL_FLEXIBLE_
      #include "ICPoints.any"  //create points for inter costal muscles
      #endif
    };

    R3Seg= {
      AnyRefNode LTptT3L3NodeL  = { sRel =  .Scale(.Data.Thorax.Left.LTptT3L3Node_pos);  };
      AnyRefNode ITC7R7Via3NodeL= { sRel =  .Scale(.Data.R3.Left.ITC7R7Via3Node_pos);  };
      AnyRefNode ITR1R7Via2NodeL= { sRel =  .Scale(.Data.R3.Left.ITR1R7Via2Node_pos);  };
      AnyRefNode ITR2R8Via1NodeL= { sRel =  .Scale(.Data.R3.Left.ITR2R8Via1Node_pos);  };
      AnyRefNode ITR3R9NodeLOrg = { sRel =  .Scale(.Data.R3.Left.ITR3R9Node_pos);  };
      AnyRefNode ICptR3C4Node   = { sRel =  .Scale(.Data.R3.Left.ICptR3C4Node_pos);};
      AnyRefNode ICptR4C5Via3Node= {sRel =  .Scale(.Data.R3.Left.ICptR4C5Via3Node_pos);};
      AnyRefNode ICptR5C6Via3Node= {sRel =  .Scale(.Data.R3.Left.ICptR5C6Via3Node_pos);};
      AnyRefNode ICptR6C4Via3Node= {sRel =  .Scale(.Data.R3.Left.ICptR6C4Via3Node_pos);};
      AnyRefNode TrThR3SNodeLOrg  = { sRel =  .Scale(.Data.R3.Left.TrThR3SNodeOrg_pos);};
      AnyRefNode TrThR3R5NodeLOrg = { sRel =  .Scale(.Data.R3.Left.TrThR3R5NodeOrg_pos);};
      AnyRefNode LCBrT2R3_L_Ins   = { sRel =  .Scale(.Data.R3.Left.LCBrT2R3Ins_pos);};
      AnyRefNode SCR1R3_L_Ins     = { sRel =  .Scale(.Data.R3.Left.SCR1R3Ins_pos);};
      AnyRefNode SCR3R5_L_Org     = { sRel =  .Scale(.Data.R3.Left.SCR3R5Org_pos);};
      AnyRefNode SCR3R6_L_Org     = { sRel =  .Scale(.Data.R3.Left.SCR3R6Org_pos);};
      AnyRefNode O_serratus_anterior_6L = {sRel = .Scale(.Data.R3.Left.O_serratus_anterior_pos); };
      AnyRefNode O_serratus_posterior_superior_2L = {sRel = .Scale(.Data.R3.Left.O_serratus_posterior_superior_pos); };
      AnyRefNode IC_Int_R2R3_elem_sternum = {sRel = .Scale(.Data.R3.Left.IC_Int_R2R3_elem_sternum_pos); };
      AnyFolder &DataRib =Data.R3.Left;
      #if BM_TRUNK_THORACIC_MODEL == _THORACIC_MODEL_FLEXIBLE_
      #include "ICPoints.any"  //create points for inter costal muscles
      #endif
 };

    R4Seg= {
      AnyRefNode LTptT3L3Via1NodeL= { sRel =  .Scale(.Data.Thorax.Left.LTptT3L3Via1Node_pos);};
      AnyRefNode LTptT4L4NodeL    = { sRel =  .Scale(.Data.Thorax.Left.LTptT4L4Node_pos);};
      AnyRefNode ITC7R7Via4NodeL  = { sRel =  .Scale(.Data.R4.Left.ITC7R7Via4Node_pos);};
      AnyRefNode ITR1R7Via3NodeL  = { sRel =  .Scale(.Data.R4.Left.ITR1R7Via3Node_pos);};
      AnyRefNode ITR2R8Via2NodeL  = { sRel =  .Scale(.Data.R4.Left.ITR2R8Via2Node_pos);};
      AnyRefNode ITR3R9Via1NodeL  = { sRel =  .Scale(.Data.R4.Left.ITR3R9Via1Node_pos);};
      AnyRefNode ITR4R10NodeLOrg  = { sRel =  .Scale(.Data.R4.Left.ITR4R10Node_pos);};
      AnyRefNode ICptR4C5Node     = { sRel =  .Scale(.Data.R4.Left.ICptR4C5Node_pos);};
      AnyRefNode ICptR5C6Via4Node = { sRel =  .Scale(.Data.R4.Left.ICptR5C6Via4Node_pos);};
      AnyRefNode ICptR6C4Via4Node = { sRel =  .Scale(.Data.R4.Left.ICptR6C4Via4Node_pos);};
      AnyRefNode TrThR4SNodeLOrg  = { sRel =  .Scale(.Data.R4.Left.TrThR4SNodeOrg_pos);};
      AnyRefNode TrThR4R6NodeLOrg = { sRel =  .Scale(.Data.R4.Left.TrThR4R6NodeOrg_pos);};
      AnyRefNode TrThR2R4NodeLIns = { sRel =  .Scale(.Data.R4.Left.TrThR2R4NodeIns_pos);};
      AnyRefNode LCBrT3R4_L_Ins   = { sRel =  .Scale(.Data.R4.Left.LCBrT3R4Ins_pos);};
      AnyRefNode SCR1R4_L_Ins     = { sRel =  .Scale(.Data.R4.Left.SCR1R4Ins_pos);};
      AnyRefNode SCR2R4_L_Ins     = { sRel =  .Scale(.Data.R4.Left.SCR2R4Ins_pos);};
      AnyRefNode SCR4R6_L_Org     = { sRel =  .Scale(.Data.R4.Left.SCR4R6Org_pos);};
      AnyRefNode SCR4R7_L_Org     = { sRel =  .Scale(.Data.R4.Left.SCR4R7Org_pos);};
      AnyRefNode O_serratus_anterior_5L = {sRel = .Scale(.Data.R4.Left.O_serratus_anterior_pos);};
      AnyRefNode O_serratus_posterior_superior_3L = {sRel = .Scale(.Data.R4.Left.O_serratus_posterior_superior_pos);};
      AnyRefNode IC_Int_R3R4_elem_sternum = {sRel = .Scale(.Data.R4.Left.IC_Int_R3R4_elem_sternum_pos); };
      AnyFolder &DataRib =Data.R4.Left;
      #if BM_TRUNK_THORACIC_MODEL == _THORACIC_MODEL_FLEXIBLE_
      #include "ICPoints.any"  //create points for inter costal muscles
      #endif
    };

    R5Seg= {
      AnyRefNode IC_R5_Ant_L_Ins = {sRel = .Scale(.Data.R5.Left.IC_AntIns_pos);};
      AnyRefNode LTptT3L3Via2NodeL= { sRel =  .Scale(.Data.Thorax.Left.LTptT3L3Via2Node_pos);};
      AnyRefNode LTptT4L4Via1NodeL= { sRel =  .Scale(.Data.Thorax.Left.LTptT4L4Via1Node_pos);};
      AnyRefNode LTptT5L5NodeL    = { sRel =  .Scale(.Data.Thorax.Left.LTptT5L5Node_pos);};
      AnyRefNode ILptC5SIPSNodeL  = { sRel =  .Scale(.Data.Thorax.Left.ILptC5SIPSNode_pos);};
      AnyRefNode ITC7R7Via5NodeL  = { sRel =  .Scale(.Data.R5.Left.ITC7R7Via5Node_pos);};
      AnyRefNode ITR1R7Via4NodeL  = { sRel =  .Scale(.Data.R5.Left.ITR1R7Via4Node_pos);};
      AnyRefNode ITR2R8Via3NodeL  = { sRel =  .Scale(.Data.R5.Left.ITR2R8Via3Node_pos);};
      AnyRefNode ITR3R9Via2NodeL  = { sRel =  .Scale(.Data.R5.Left.ITR3R9Via2Node_pos);};
      AnyRefNode ITR4R10Via1NodeL = { sRel =  .Scale(.Data.R5.Left.ITR4R10Via1Node_pos);};
      AnyRefNode ITR5R11NodeLOrg  = { sRel =  .Scale(.Data.R5.Left.R5ITR5R11Node_pos);};
      AnyRefNode ICptR5C6Node     = { sRel =  .Scale(.Data.R5.Left.ICptR5C6Node_pos);};
      AnyRefNode ICptR6C4Via5Node = { sRel =  .Scale(.Data.R5.Left.ICptR6C4Via5Node_pos);};
      AnyRefNode TrThR5SNodeLOrg  = { sRel =  .Scale(.Data.R5.Left.TrThR5SNodeOrg_pos);};
      AnyRefNode TrThR3R5NodeLIns = { sRel =  .Scale(.Data.R5.Left.TrThR3R5NodeIns_pos);};
      AnyRefNode TrThR5R7NodeLOrg = { sRel =  .Scale(.Data.R5.Left.TrThR5R7NodeOrg_pos);};
      AnyRefNode LCBrT4R5_L_Ins   = { sRel =  .Scale(.Data.R5.Left.LCBrT4R5Ins_pos);};
      AnyRefNode SCR2R5_L_Ins     = { sRel =  .Scale(.Data.R5.Left.SCR2R5Ins_pos);};
      AnyRefNode SCR3R5_L_Ins     = { sRel =  .Scale(.Data.R5.Left.SCR3R5Ins_pos);};
      AnyRefNode SCR5R7_L_Org     = { sRel =  .Scale(.Data.R5.Left.SCR5R7Org_pos);};
      AnyRefNode SCR5R8_L_Org     = { sRel =  .Scale(.Data.R5.Left.SCR5R8Org_pos);};
      AnyRefNode O_serratus_anterior_4L = {sRel = .Scale(.Data.R5.Left.O_serratus_anterior_pos);};
      AnyRefNode O_serratus_posterior_superior_4L = {sRel = .Scale(.Data.R5.Left.O_serratus_posterior_superior_pos);};
      AnyRefNode IC_Int_R4R5_elem_sternum = {sRel = .Scale(.Data.R5.Left.IC_Int_R4R5_elem_sternum_pos); };
      AnyFolder &DataRib =Data.R5.Left;
      #if BM_TRUNK_THORACIC_MODEL == _THORACIC_MODEL_FLEXIBLE_
      #include "ICPoints.any"  //create points for inter costal muscles
      #endif
 };

    R6Seg= {
      AnyRefNode LTptT3L3Via3NodeL   = { sRel =  .Scale(.Data.Thorax.Left.LTptT3L3Via3Node_pos);};
      AnyRefNode LTptT4L4Via2NodeL   = { sRel =  .Scale(.Data.Thorax.Left.LTptT4L4Via2Node_pos);};
      AnyRefNode LTptT5L5Via1NodeL   = { sRel =  .Scale(.Data.Thorax.Left.LTptT5L5Via1Node_pos);};
      AnyRefNode LTptT6S1NodeL       = { sRel =  .Scale(.Data.Thorax.Left.LTptT6S1Node_pos);};
      AnyRefNode ILptC5SIPSVia1NodeL = { sRel =  .Scale(.Data.Thorax.Left.ILptC5SIPSVia1Node_pos);};
      AnyRefNode ILptC6SIPSNodeL     = { sRel =  .Scale(.Data.Thorax.Left.ILptC6SIPSNode_pos);};
      AnyRefNode ObliquusExternusNode        = { sRel =  .Scale(.Data.Thorax.Left.OEC6_RSNode_pos);};
      AnyRefNode ITC7R7Via6NodeL     = { sRel =  .Scale(.Data.R6.Left.ITC7R7Via6Node_pos);};
      AnyRefNode ITR1R7Via5NodeL     = { sRel =  .Scale(.Data.R6.Left.ITR1R7Via5Node_pos);};
      AnyRefNode ITR2R8Via4NodeL     = { sRel =  .Scale(.Data.R6.Left.ITR2R8Via4Node_pos);};
      AnyRefNode ITR3R9Via3NodeL     = { sRel =  .Scale(.Data.R6.Left.ITR3R9Via3Node_pos);};
      AnyRefNode ITR4R10Via2NodeL    = { sRel =  .Scale(.Data.R6.Left.ITR4R10Via2Node_pos);};
      AnyRefNode ITR5R11Via1NodeL    = { sRel =  .Scale(.Data.R6.Left.ITR5R11Via1Node_pos);};
      AnyRefNode ITR6R12NodeL        = { sRel =  .Scale(.Data.R6.Left.R6ITR6R12Node_pos);};
      AnyRefNode ICptR6C4Node     = { sRel =  .Scale(.Data.R6.Left.ICptR6C4Node_pos);};
      AnyRefNode TrThR6SNodeLOrg  = { sRel =  .Scale(.Data.R6.Left.TrThR6SNodeOrg_pos);};
      AnyRefNode TrThR4R6NodeLIns = { sRel =  .Scale(.Data.R6.Left.TrThR4R6NodeIns_pos);};
      AnyRefNode LCBrT5R6_L_Ins   = { sRel =  .Scale(.Data.R6.Left.LCBrT5R6Ins_pos);};
      AnyRefNode SCR3R6_L_Ins     = { sRel =  .Scale(.Data.R6.Left.SCR3R6Ins_pos);};
      AnyRefNode SCR4R6_L_Ins     = { sRel =  .Scale(.Data.R6.Left.SCR4R6Ins_pos);};
      AnyRefNode SCR6R8_L_Org     = { sRel =  .Scale(.Data.R6.Left.SCR6R8Org_pos);};
      AnyRefNode SCR6R9_L_Org     = { sRel =  .Scale(.Data.R6.Left.SCR6R9Org_pos);};
      AnyRefNode O_serratus_anterior_3L = {sRel = .Scale(.Data.R6.Left.O_serratus_anterior_pos); };
      AnyRefNode IC_Int_R5R6_elem_sternum = {sRel = .Scale(.Data.R6.Left.IC_Int_R5R6_elem_sternum_pos); };
      AnyFolder &DataRib =Data.R6.Left;
      #if BM_TRUNK_THORACIC_MODEL == _THORACIC_MODEL_FLEXIBLE_
      #include "ICPoints.any"  //create points for inter costal muscles
      #endif
  };

    R7Seg= {
      AnyRefNode ILptC7CINodeL       = { sRel =  .Scale(.Data.Thorax.Left.ILptC7CINode_pos);};
      AnyRefNode LTptT3L3Via4NodeL   = { sRel =  .Scale(.Data.Thorax.Left.LTptT3L3Via4Node_pos);};
      AnyRefNode LTptT4L4Via3NodeL   = { sRel =  .Scale(.Data.Thorax.Left.LTptT4L4Via3Node_pos);};
      AnyRefNode LTptT5L5Via2NodeL   = { sRel =  .Scale(.Data.Thorax.Left.LTptT5L5Via2Node_pos);};
      AnyRefNode LTptT6S1Via1NodeL   = { sRel =  .Scale(.Data.Thorax.Left.LTptT6S1Via1Node_pos);};
      AnyRefNode LTptT7S2NodeL       = { sRel =  .Scale(.Data.Thorax.Left.LTptT7S2Node_pos);};
      AnyRefNode ILptC5SIPSVia2NodeL = { sRel =  .Scale(.Data.Thorax.Left.ILptC5SIPSVia2Node_pos);};
      AnyRefNode ILptC6SIPSVia1NodeL = { sRel =  .Scale(.Data.Thorax.Left.ILptC6SIPSVia1Node_pos);};
      AnyRefNode ObliquusExternusNode        = { sRel =  .Scale(.Data.Thorax.Left.OEC7_RSNode_pos);};
      AnyRefNode ITC7R7NodeLIns      = { sRel =  .Scale(.Data.R7.Left.ITC7R7Node_posIns);};
      AnyRefNode ITR1R7NodeLIns      = { sRel =  .Scale(.Data.R7.Left.ITR1R7Node_posIns);};
      AnyRefNode ITR2R8Via5NodeL     = { sRel =  .Scale(.Data.R7.Left.ITR2R8Via5Node_pos);};
      AnyRefNode ITR3R9Via4NodeL     = { sRel =  .Scale(.Data.R7.Left.ITR3R9Via4Node_pos);};
      AnyRefNode ITR4R10Via3NodeL    = { sRel =  .Scale(.Data.R7.Left.ITR4R10Via3Node_pos);};
      AnyRefNode ITR5R11Via2NodeL    = { sRel =  .Scale(.Data.R7.Left.ITR5R11Via2Node_pos);};
      AnyRefNode ITR6R12Via1NodeL    = { sRel =  .Scale(.Data.R7.Left.ITR6R12Via1Node_pos);};
      AnyRefNode TrThR5R7NodeLIns = { sRel =  .Scale(.Data.R7.Left.TrThR5R7NodeIns_pos);};
      AnyRefNode TrThR7SNodeLOrg  = { sRel =  .Scale(.Data.R7.Left.TrThR7SNodeOrg_pos);};
      AnyRefNode LCBrT6R7_L_Ins   = { sRel =  .Scale(.Data.R7.Left.LCBrT6R7Ins_pos);};
      AnyRefNode LCLgT5R7_L_Ins   = { sRel =  .Scale(.Data.R7.Left.LCLgT5R7Ins_pos);};
      AnyRefNode SCR4R7_L_Ins     = { sRel =  .Scale(.Data.R7.Left.SCR4R7Ins_pos);};
      AnyRefNode SCR5R7_L_Ins     = { sRel =  .Scale(.Data.R7.Left.SCR5R7Ins_pos);};
      AnyRefNode SCR7R9_L_Org     = { sRel =  .Scale(.Data.R7.Left.SCR7R9Org_pos);};
      AnyRefNode SCR7R10_L_Org    = { sRel =  .Scale(.Data.R7.Left.SCR7R10Org_pos);};
      AnyRefNode O_serratus_anterior_2L = {sRel = .Scale(.Data.R7.Left.O_serratus_anterior_pos);};
      AnyRefNode IC_Int_R6R7_elem_sternum = {sRel = .Scale(.Data.R7.Left.IC_Int_R6R7_elem_sternum_pos); };
      AnyFolder &DataRib =Data.R7.Left;
      #if BM_TRUNK_THORACIC_MODEL == _THORACIC_MODEL_FLEXIBLE_
      #include "ICPoints.any"  //create points for inter costal muscles
      #endif
  };

    R8Seg= {
      AnyRefNode ILptC7CIVia1NodeL   = { sRel =  .Scale(.Data.Thorax.Left.ILptC7CIVia1Node_pos);};
      AnyRefNode ILptC8CINodeL       = { sRel =  .Scale(.Data.Thorax.Left.ILptC8CINode_pos);};
      AnyRefNode LTptT3L3Via5NodeL   = { sRel =  .Scale(.Data.Thorax.Left.LTptT3L3Via5Node_pos);};
      AnyRefNode LTptT4L4Via4NodeL   = { sRel =  .Scale(.Data.Thorax.Left.LTptT4L4Via4Node_pos);};
      AnyRefNode LTptT5L5Via3NodeL   = { sRel =  .Scale(.Data.Thorax.Left.LTptT5L5Via3Node_pos);};
      AnyRefNode LTptT6S1Via2NodeL   = { sRel =  .Scale(.Data.Thorax.Left.LTptT6S1Via2Node_pos);};
      AnyRefNode LTptT7S2Via1NodeL   = { sRel =  .Scale(.Data.Thorax.Left.LTptT7S2Via1Node_pos);};
      AnyRefNode LTptT8S3NodeL       = { sRel =  .Scale(.Data.Thorax.Left.LTptT8S3Node_pos);};
      AnyRefNode ILptC5SIPSVia3NodeL = { sRel =  .Scale(.Data.Thorax.Left.ILptC5SIPSVia3Node_pos);};
      AnyRefNode ILptC6SIPSVia2NodeL = { sRel =  .Scale(.Data.Thorax.Left.ILptC6SIPSVia2Node_pos);};
      AnyRefNode ObliquusExternusNode        = { sRel =  .Scale(.Data.Thorax.Left.OEC8_RSNode_pos);};
      AnyRefNode ITR2R8NodeLIns      = { sRel =  .Scale(.Data.R8.Left.ITR2R8Node_posIns);};
      AnyRefNode ITR3R9Via5NodeL     = { sRel =  .Scale(.Data.R8.Left.ITR3R9Via5Node_pos);};
      AnyRefNode ITR4R10Via4NodeL    = { sRel =  .Scale(.Data.R8.Left.ITR4R10Via4Node_pos);};
      AnyRefNode ITR5R11Via3NodeL    = { sRel =  .Scale(.Data.R8.Left.ITR5R11Via3Node_pos);};
      AnyRefNode ITR6R12Via2NodeL    = { sRel =  .Scale(.Data.R8.Left.ITR6R12Via2Node_pos);};
      AnyRefNode TrThR8SNodeLOrg  = { sRel =  .Scale(.Data.R8.Left.TrThR8SNodeOrg_pos);};
      AnyRefNode LCBrT7R8_L_Ins   = { sRel =  .Scale(.Data.R8.Left.LCBrT7R8Ins_pos);};
      AnyRefNode LCLgT6R8_L_Ins   = { sRel =  .Scale(.Data.R8.Left.LCLgT6R8Ins_pos);};
      AnyRefNode SCR5R8_L_Ins     = { sRel =  .Scale(.Data.R8.Left.SCR5R8Ins_pos);};
      AnyRefNode SCR6R8_L_Ins     = { sRel =  .Scale(.Data.R8.Left.SCR6R8Ins_pos);};
      AnyRefNode SCR8R10_L_Org    = { sRel =  .Scale(.Data.R8.Left.SCR8R10Org_pos);};
      AnyRefNode SCR8R11_L_Ins    = { sRel =  .Scale(.Data.R8.Left.SCR8R11Ins_pos); };
      AnyRefNode O_serratus_anterior_1L = {sRel = .Scale(.Data.R8.Left.O_serratus_anterior_pos); };
      AnyRefNode IC_Int_R7R8_elem_sternum = {sRel = .Scale(.Data.R8.Left.IC_Int_R7R8_elem_sternum_pos); };
      AnyFolder &DataRib =Data.R8.Left;
      #if BM_TRUNK_THORACIC_MODEL == _THORACIC_MODEL_FLEXIBLE_
      #include "ICPoints.any"  //create points for inter costal muscles
      #endif
 };

    R9Seg= {
      AnyRefNode ILptC7CIVia2NodeL   = { sRel =  .Scale(.Data.Thorax.Left.ILptC7CIVia2Node_pos);};
      AnyRefNode ILptC8CIVia1NodeL   = { sRel =  .Scale(.Data.Thorax.Left.ILptC8CIVia1Node_pos);};
      AnyRefNode ILptC9CINodeL       = { sRel =  .Scale(.Data.Thorax.Left.ILptC9CINode_pos);};
      AnyRefNode LTptT3L3Via6NodeL   = { sRel =  .Scale(.Data.Thorax.Left.LTptT3L3Via6Node_pos);};
      AnyRefNode LTptT4L4Via5NodeL   = { sRel =  .Scale(.Data.Thorax.Left.LTptT4L4Via5Node_pos);};
      AnyRefNode LTptT5L5Via4NodeL   = { sRel =  .Scale(.Data.Thorax.Left.LTptT5L5Via4Node_pos);};
      AnyRefNode LTptT6S1Via3NodeL   = { sRel =  .Scale(.Data.Thorax.Left.LTptT6S1Via3Node_pos);};
      AnyRefNode LTptT7S2Via2NodeL   = { sRel =  .Scale(.Data.Thorax.Left.LTptT7S2Via2Node_pos);};
      AnyRefNode LTptT8S3Via1NodeL   = { sRel =  .Scale(.Data.Thorax.Left.LTptT8S3Via1Node_pos);};
      AnyRefNode LTptT9S4NodeL       = { sRel =  .Scale(.Data.Thorax.Left.LTptT9S4Node_pos);};
      AnyRefNode ILptC5SIPSVia4NodeL = { sRel =  .Scale(.Data.Thorax.Left.ILptC5SIPSVia4Node_pos);};
      AnyRefNode ILptC6SIPSVia3NodeL = { sRel =  .Scale(.Data.Thorax.Left.ILptC6SIPSVia3Node_pos);};
      AnyRefNode ObliquusExternusNode        = { sRel =  .Scale(.Data.Thorax.Left.OEC9_RSNode_pos);};
      AnyRefNode ObliquusExternusNode_1        = { sRel =  .Scale(.Data.Thorax.Left.OEC9_RSNode_1_pos);};
      AnyRefNode ITR3R9NodeLIns      = { sRel =  .Scale(.Data.R9.Left.ITR3R9Node_posIns);};
      AnyRefNode ITR4R10Via5NodeL    = { sRel =  .Scale(.Data.R9.Left.ITR4R10Via5Node_pos);};
      AnyRefNode ITR5R11Via4NodeL    = { sRel =  .Scale(.Data.R9.Left.ITR5R11Via4Node_pos);};
      AnyRefNode ITR6R12Via3NodeL    = { sRel =  .Scale(.Data.R9.Left.ITR6R12Via3Node_pos);};
      AnyRefNode TrThR9SNodeLOrg  = { sRel =  .Scale(.Data.R9.Left.TrThR9SNodeOrg_pos);};
      AnyRefNode LCBrT8R9_L_Ins   = { sRel =  .Scale(.Data.R9.Left.LCBrT8R9Ins_pos);};
      AnyRefNode LCLgT7R9_L_Ins   = { sRel =  .Scale(.Data.R9.Left.LCLgT7R9Ins_pos);};
      AnyRefNode SCR6R9_L_Ins     = { sRel =  .Scale(.Data.R9.Left.SCR6R9Ins_pos);};
      AnyRefNode SCR7R9_L_Ins     = { sRel =  .Scale(.Data.R9.Left.SCR7R9Ins_pos);};
      AnyRefNode SCR9R11_L_Ins   = { sRel =  .Scale(.Data.R9.Left.SCR9R11Ins_pos); };
      AnyRefNode O_serratus_posterior_inferior_R9L = {sRel = .Scale(.Data.R9.Left.O_serratus_posterior_inferior_pos); };
      AnyRefNode IC_Int_R8R9_elem_sternum = {sRel = .Scale(.Data.R9.Left.IC_Int_R8R9_elem_sternum_pos); };
      AnyFolder &DataRib =Data.R9.Left;
      #if BM_TRUNK_THORACIC_MODEL == _THORACIC_MODEL_FLEXIBLE_
      #include "ICPoints.any"  //create points for inter costal muscles
      #endif
  };

    R10Seg= {
      AnyRefNode ILptC7CIVia3NodeL   = { sRel =  .Scale(.Data.Thorax.Left.ILptC7CIVia3Node_pos);};
      AnyRefNode ILptC8CIVia2NodeL   = { sRel =  .Scale(.Data.Thorax.Left.ILptC8CIVia2Node_pos);};
      AnyRefNode ILptC9CIVia1NodeL   = { sRel =  .Scale(.Data.Thorax.Left.ILptC9CIVia1Node_pos);};
      AnyRefNode ILptC10CINodeL      = { sRel =  .Scale(.Data.Thorax.Left.ILptC10CINode_pos);};
      AnyRefNode LTptT3L3Via7NodeL   = { sRel =  .Scale(.Data.Thorax.Left.LTptT3L3Via7Node_pos);};
      AnyRefNode LTptT4L4Via6NodeL   = { sRel =  .Scale(.Data.Thorax.Left.LTptT4L4Via6Node_pos);};
      AnyRefNode LTptT5L5Via5NodeL   = { sRel =  .Scale(.Data.Thorax.Left.LTptT5L5Via5Node_pos);};
      AnyRefNode LTptT6S1Via4NodeL   = { sRel =  .Scale(.Data.Thorax.Left.LTptT6S1Via4Node_pos);};
      AnyRefNode LTptT7S2Via3NodeL   = { sRel =  .Scale(.Data.Thorax.Left.LTptT7S2Via3Node_pos);};
      AnyRefNode LTptT8S3Via2NodeL   = { sRel =  .Scale(.Data.Thorax.Left.LTptT8S3Via2Node_pos);};
      AnyRefNode LTptT9S4Via1NodeL   = { sRel =  .Scale(.Data.Thorax.Left.LTptT9S4Via1Node_pos);};
      AnyRefNode LTptT10SacrumNodeL  = { sRel =  .Scale(.Data.Thorax.Left.LTptT10SacrumNode_pos);};
      AnyRefNode ILptC5SIPSVia5NodeL = { sRel =  .Scale(.Data.Thorax.Left.ILptC5SIPSVia5Node_pos);};
      AnyRefNode ILptC6SIPSVia4NodeL = { sRel =  .Scale(.Data.Thorax.Left.ILptC6SIPSVia4Node_pos);};

      AnyRefNode ObliquusExternusNode_00       = { sRel =  .Scale(.Data.Thorax.Left.OEC6_1_RSNode_pos);};
      AnyRefNode ObliquusExternusNode_0       = { sRel =  .Scale(.Data.Thorax.Left.OEC6_2_RSNode_pos);};
      AnyRefNode ObliquusExternusNode_1       = { sRel =  .Scale(.Data.Thorax.Left.OEC10_RSNode_pos);};
      AnyRefNode ObliquusExternusNode_2       = { sRel =  .Scale(.Data.R10.Left.OEC10a_CINode_pos);};
      AnyRefNode ObliquusInternusNode_1       = { sRel =  .Scale(.Data.Thorax.Left.OICI_C10Node_pos);};
      AnyRefNode ObliquusInternusNode_2       = { sRel =  .Scale(.Data.Thorax.Left.OICI_C10aNode_pos);};


      AnyRefNode ITR4R10NodeLIns     = { sRel =  .Scale(.Data.R10.Left.ITR4R10Node_posIns);};
      AnyRefNode ITR5R11Via5NodeL    = { sRel =  .Scale(.Data.R10.Left.ITR5R11Via5Node_pos);};
      AnyRefNode ITR6R12Via4NodeL    = { sRel =  .Scale(.Data.R10.Left.ITR6R12Via4Node_pos);};
      AnyRefNode TrThR10SNodeLOrg = { sRel =  .Scale(.Data.R10.Left.TrThR10SNodeOrg_pos);};
      AnyRefNode LCBrT9R10_L_Ins  = { sRel =  .Scale(.Data.R10.Left.LCBrT9R10Ins_pos);};
      AnyRefNode LCLgT8R10_L_Ins  = { sRel =  .Scale(.Data.R10.Left.LCLgT8R10Ins_pos);};
      AnyRefNode SCR7R10_L_Ins    = { sRel =  .Scale(.Data.R10.Left.SCR7R10Ins_pos);};
      AnyRefNode SCR8R10_L_Ins    = { sRel =  .Scale(.Data.R10.Left.SCR8R10Ins_pos);};
      AnyRefNode O_serratus_posterior_inferior_R10L = {sRel = .Scale(.Data.R10.Left.O_serratus_posterior_inferior_pos); };
      AnyRefNode R10_DiaphragmNode1L = {sRel = .Scale(.Data.R10.Left.R10_DiaphragmNode1_pos); };
      AnyRefNode R10_DiaphragmNode2L = {sRel = .Scale(.Data.R10.Left.R10_DiaphragmNode2_pos); };
      AnyRefNode R10_DiaphragmNode3L = {sRel = .Scale(.Data.R10.Left.R10_DiaphragmNode3_pos); };
      AnyRefNode IC_Int_R9R10_elem_sternum = {sRel = .Scale(.Data.R10.Left.IC_Int_R9R10_elem_sternum_pos); };
      AnyRefNode CCNodeR11 ={ sRel = .Scale(.Data.Thorax.Left.OEC11_CINode_pos);};
      AnyRefNode MidNode        = { sRel =  .Scale(.Data.R10.Left.MidNode_pos); };
      AnyFolder &DataRib =Data.R10.Left;
      #if BM_TRUNK_THORACIC_MODEL == _THORACIC_MODEL_FLEXIBLE_
      #include "ICPoints.any"  //create points for inter costal muscles
      #endif
 };

    R11Seg = {
      AnyRefNode ObliquusExternusNode       = { sRel =  .Scale(.Data.Thorax.Left.OEC11_CINode_pos);};
      AnyRefNode ObliquusInternusNode       = { sRel =  .Scale(.Data.Thorax.Left.OICI_C11Node_pos);};
      AnyRefNode ObliquusExternusNode1       = { sRel =  .Scale(.Data.Thorax.Left.OEC11_CINode1_pos);};
      AnyRefNode ObliquusInternusNode1       = { sRel =  .Scale(.Data.R12.Left.OEC12_CINode1_pos);};

      AnyRefNode O_serratus_posterior_inferior_R11L = {sRel = .Scale(.Data.R11.Left.O_serratus_posterior_inferior_pos);};
      AnyRefNode LTptT7S2Via4NodeL      = {sRel = .Scale(.Data.Thorax.Left.LTptT7S2Via4Node_pos); };
      AnyRefNode LTptT8S3Via3NodeL      = {sRel = .Scale(.Data.Thorax.Left.LTptT8S3Via3Node_pos); };
      AnyRefNode LTptT9S4Via2NodeL      = {sRel = .Scale(.Data.Thorax.Left.LTptT9S4Via2Node_pos); };
      AnyRefNode ITR5R11NodeLIns     = {sRel =  .Scale(.Data.T11.Left.ITR5R11Node_pos); };
      AnyRefNode LTptT10SacrumVia1NodeL = {sRel = .Scale(.Data.Thorax.Left.LTptT10SacrumVia1Node_pos); };
      AnyRefNode ITR6R12Via5NodeL = {sRel =  .Scale(.Data.T11.Left.ITR6R12Via5Node_pos); };
      AnyRefNode LTptT11SacrumNodeL     = {sRel = .Scale(.Data.Thorax.Left.LTptT11SacrumNode_pos); };
      AnyRefNode LTptC11SacrumNodeL     = {sRel = .Scale(.Data.Thorax.Left.LTptC11SacrumNode_pos); };
      AnyRefNode ILptC11CINodeL = {sRel = .Scale(.Data.Thorax.Left.ILptC11CINode_pos); };
      AnyRefNode LCBrT10R11_L_Ins  = { sRel =  .Scale(.Data.R11.Left.LCBrT10R11Ins_pos);};
      AnyRefNode LCLgT9R11_L_Ins  = { sRel =  .Scale(.Data.R11.Left.LCLgT9R11Ins_pos);};
      AnyRefNode SCR8R11_L_Org = { sRel =  .Scale(.Data.T11.Left.SCR8R11_Org_pos);};
      AnyRefNode SCR9R11_L_Org = { sRel =  .Scale(.Data.T11.Left.SCR9R11_Org_pos);};
      AnyRefNode R11_DiaphragmNode1L = {sRel = .Scale(.Data.R11.Left.R11_DiaphragmNode1_pos); };
      AnyRefNode R11_DiaphragmNode2L = {sRel = .Scale(.Data.R11.Left.R11_DiaphragmNode2_pos); };
      AnyRefNode R11_DiaphragmNode3L = {sRel = .Scale(.Data.R11.Left.R11_DiaphragmNode3_pos); };
      AnyRefNode CCTangetNodeR11 ={ sRel = .Scale(.Data.R11.Left.CC_AlignmentNode); };
      AnyRefNode CCTangetNodeR11R10 ={ sRel = .Scale(.Data.R11.Left.CCTangetNodeR11R10); };
      AnyRefNode CCNodeR11 ={ sRel = .Scale(.Data.Thorax.Left.OEC11_CINode_pos);AnyRefNode RotNode ={ ARel=RotMat(.sRel,..CCTangetNodeR11.sRel,..CCTangetNodeR11R10.sRel);};};
      AnyRefNode CCNodeR12 ={ sRel = .Scale(.Data.R12.Left.OEC12_CINode_pos);};
      AnyFolder &DataRib =Data.R11.Left;
      #if BM_TRUNK_THORACIC_MODEL == _THORACIC_MODEL_FLEXIBLE_
      #include "ICPoints.any"  //create points for inter costal muscles
      #endif
 };

    R12Seg = {
     AnyRefNode ObliquusExternusNode       = { sRel =  .Scale(.Data.R12.Left.OEC12_CINode_pos);};

      AnyRefNode ITR6R12NodeLIns = {sRel =  .Scale(.Data.R12.Left.ITR6R12Node_pos); };
      AnyRefNode LTptT8S3Via4NodeL      = {sRel = .Scale(.Data.R12.Left.LTptT8S3Via4Node_pos);};
      AnyRefNode LTptT9S4Via3NodeL      = {sRel = .Scale(.Data.R12.Left.LTptT9S4Via3Node_pos);};
      AnyRefNode LTptT10SacrumVia2NodeL = {sRel = .Scale(.Data.R12.Left.LTptT10SacrumVia2Node_pos); };
      AnyRefNode LTptC11SacrumVia1NodeL = {sRel = .Scale(.Data.R12.Left.LTptC11SacrumVia1Node_pos); };
      AnyRefNode LTptC12SacrumNodeL     = {sRel = .Scale(.Data.R12.Left.LTptC12SacrumNode_pos); };
      AnyRefNode QLC12Lat_CINode1L =    {sRel = .Scale(.Data.R12.Left.QLC12Lat_CINode1_pos); };
      AnyRefNode QLC12Lat_CINode2L =    {sRel = .Scale(.Data.R12.Left.QLC12Lat_CINode2_pos); };
      AnyRefNode QLC12Lat_CINode3L =    {sRel = .Scale(.Data.R12.Left.QLC12Lat_CINode3_pos); };
      AnyRefNode QLC12Lat_CINode4L =    {sRel = .Scale(.Data.R12.Left.QLC12Lat_CINode4_pos); };
      AnyRefNode QLC12Lat_CINode5L =    {sRel = .Scale(.Data.R12.Left.QLC12Lat_CINode5_pos); };
      AnyRefNode QLC12InterMedian_CINode1L = {sRel = .Scale(.Data.R12.Left.QLC12InterMedian_CINode1_pos); };
      AnyRefNode QLC12InterMedian_CINode2L = {sRel = .Scale(.Data.R12.Left.QLC12InterMedian_CINode2_pos); };
      AnyRefNode QLC12InterMedian_CINode3L = {sRel = .Scale(.Data.R12.Left.QLC12InterMedian_CINode3_pos); };
      AnyRefNode QLC12InterMedian_CINode4L = {sRel = .Scale(.Data.R12.Left.QLC12InterMedian_CINode4_pos); };
      AnyRefNode QLC12InterMedian_CINode5L = {sRel = .Scale(.Data.R12.Left.QLC12InterMedian_CINode5_pos); };
      AnyRefNode QLC12Median_CINode1L =    {sRel = .Scale(.Data.R12.Left.QLC12Median_CINode1_pos); };
      AnyRefNode QLC12Median_CINode2L =    {sRel = .Scale(.Data.R12.Left.QLC12Median_CINode2_pos); };
      AnyRefNode QLC12Median_CINode3L =    {sRel = .Scale(.Data.R12.Left.QLC12Median_CINode3_pos); };
      AnyRefNode QLC12Median_CINode4L =    {sRel = .Scale(.Data.R12.Left.QLC12Median_CINode4_pos); };
      AnyRefNode ILptC12CINodeL      = {sRel = .Scale(.Data.R12.Left.ILptC12CINode_pos );};
      AnyRefNode ILptC10CIVia1NodeL  = {sRel = .Scale(.Data.R12.Left.ILptC10CIVia1Node_pos );};
      AnyRefNode ILptC9CIVia2NodeL   = {sRel = .Scale(.Data.R12.Left.ILptC9CIVia2Node_pos );};
      AnyRefNode ILptC8CIVia3NodeL   = {sRel = .Scale(.Data.R12.Left.ILptC8CIVia3Node_pos );};
      AnyRefNode ILptC7CIVia4NodeL   = {sRel = .Scale(.Data.R12.Left.ILptC7CIVia4Node_pos );};
      AnyRefNode ILptC6SIPSVia5NodeL = {sRel = .Scale(.Data.R12.Left.ILptC6SIPSVia5Node_pos );};
      AnyRefNode ILptC5SIPSVia6NodeL = {sRel = .Scale(.Data.R12.Left.ILptC5SIPSVia6Node_pos );};
      AnyRefNode LCBrT11R12_L_Ins  = { sRel =  .Scale(.Data.R12.Left.LCBrT11R12Ins_pos);};
      AnyRefNode LCLgT10R12_L_Ins  = { sRel =  .Scale(.Data.R12.Left.LCLgT10R12Ins_pos);};
      AnyRefNode O_serratus_posterior_inferior_R12L = {sRel = .Scale(.Data.R12.Left.O_serratus_posterior_inferior_pos);};
      AnyRefNode R12_DiaphragmNode1L = {sRel = .Scale(.Data.R12.Left.R12_DiaphragmNode1_pos); };
      AnyRefNode R12_DiaphragmNode2L = {sRel = .Scale(.Data.R12.Left.R12_DiaphragmNode2_pos); };
      AnyRefNode CCTangetNodeR12 ={ sRel = .Scale(.Data.R12.Left.CC_AlignmentNode); };
      AnyRefNode CCTangetNodeR12R11 ={ sRel = .Scale(.Data.R12.Left.CCTangetNodeR12R11); };
      AnyRefNode CCNodeR12 ={ sRel = .Scale(.Data.R12.Left.OEC12_CINode_pos);
      AnyRefNode RotNode ={ ARel=RotMat(.sRel,..CCTangetNodeR12.sRel,..CCTangetNodeR12R11.sRel);};};
      AnyFolder &DataRib =Data.R12.Left;
      #if BM_TRUNK_THORACIC_MODEL == _THORACIC_MODEL_FLEXIBLE_
      #include "ICPoints.any"  //create points for inter costal muscles
      #endif
  };

    #if BM_TRUNK_THORACIC_STERNUM_TOPOLOGY == 4
      CostalCartilageSeg = {

        AnyRefNode Mid                ={ sRel =.Scale (.Data.Sternum.MidNode_pos);};
        //----------------------------------------------CS Nodes-----------------------------------------------
        AnyRefNode CS7NodeL     ={ sRel =.Scale (.Data.Sternum.Left.CS7Node_pos);};
        AnyRefNode CS8NodeL     ={ sRel =.Scale (.Data.Sternum.Left.CS8Node_pos);};
        AnyRefNode CS9NodeL     ={ sRel =.Scale (.Data.Sternum.Left.CS9Node_pos);};
        AnyRefNode CS10NodeL    ={ sRel =.Scale (.Data.Sternum.Left.CS10Node_pos);};


        //----------------------------------------------IC Nodes-----------------------------------------------
        AnyRefNode IC3NodeL     ={ sRel =.Scale (.Data.Sternum.Left.IC3Node_pos);};
        AnyRefNode IC7NodeL     ={ sRel =.Scale (.Data.Sternum.Left.IC7Node_pos);};
        AnyRefNode IC8NodeL     ={ sRel =.Scale (.Data.Sternum.Left.IC8Node_pos);};
        AnyRefNode IC9NodeL     ={ sRel =.Scale (.Data.Sternum.Left.IC9Node_pos);};
        AnyRefNode IC10NodeL    ={ sRel =.Scale (.Data.Sternum.Left.IC10Node_pos);};

        AnyRefNode CCTangetNodeR7L       ={ sRel =.Scale (.Data.R7.Left.CC_AlignmentNode);};
        AnyRefNode CCTangetNodeR8L       ={ sRel =.Scale (.Data.R8.Left.CC_AlignmentNode);};
        AnyRefNode CCTangetNodeR9L       ={ sRel =.Scale (.Data.R9.Left.CC_AlignmentNode);};
        AnyRefNode CCTangetNodeR10L       ={ sRel =.Scale (.Data.R10.Left.CC_AlignmentNode);};


        //----------------------------------------------CC Nodes------------------------------------------------
        AnyRefNode R7NodeL     ={ sRel =.Scale (.Data.Sternum.Left.R7Node_pos);AnyRefNode RotNode ={ ARel=RotMat(.sRel,..CCTangetNodeR7L.sRel,sRel+{0.10,0,0})*RotMat(-pi/2,y)*RotMat(-pi,z);};};
        AnyRefNode R8NodeL     ={ sRel =.Scale (.Data.Sternum.Left.R8Node_pos);AnyRefNode RotNode ={ ARel=RotMat(.sRel,..CCTangetNodeR8L.sRel,sRel+{0.10,0,0})*RotMat(-pi/2,y)*RotMat(-pi,z);};};
        AnyRefNode R9NodeL     ={ sRel =.Scale (.Data.Sternum.Left.R9Node_pos);AnyRefNode RotNode ={ ARel=RotMat(.sRel,..CCTangetNodeR9L.sRel,sRel+{0.10,0,0})*RotMat(-pi/2,y)*RotMat(-pi,z);};};
        AnyRefNode R10NodeL   ={ sRel =.Scale (.Data.Sternum.Left.R10Node_pos);AnyRefNode RotNode ={ ARel=RotMat(.sRel,..CCTangetNodeR10L.sRel,sRel+{0.10,0,0})*RotMat(-pi/2,y)*RotMat(-pi,z);};};


        AnyRefNode R7NodeLsup     ={ sRel =.Scale (.Data.Sternum.Left.R7Node_pos + {0, .Data.AllRibs.CCOffset[3],0});  };
        AnyRefNode R7NodeLinf     ={ sRel =.Scale (.Data.Sternum.Left.R7Node_pos + {0,-.Data.AllRibs.CCOffset[3],0});  };
        AnyRefNode R7NodeLpos     ={ sRel =.Scale (.Data.Sternum.Left.R7Node_pos + {-.Data.AllRibs.CCOffset[3],0,0});  };
        AnyRefNode R7NodeLant     ={ sRel =.Scale (.Data.Sternum.Left.R7Node_pos + {.Data.AllRibs.CCOffset[3],0,0});  };
        AnyRefNode R8NodeLsup     ={ sRel =.Scale (.Data.Sternum.Left.R8Node_pos + {0, .Data.AllRibs.CCOffset[2],0});  };
        AnyRefNode R8NodeLinf     ={ sRel =.Scale (.Data.Sternum.Left.R8Node_pos + {0,-.Data.AllRibs.CCOffset[2],0});  };
        AnyRefNode R8NodeLpos     ={ sRel =.Scale (.Data.Sternum.Left.R8Node_pos + {-.Data.AllRibs.CCOffset[2],0,0});  };
        AnyRefNode R8NodeLant     ={ sRel =.Scale (.Data.Sternum.Left.R8Node_pos + {.Data.AllRibs.CCOffset[2],0,0});  };
        AnyRefNode R9NodeLsup     ={ sRel =.Scale (.Data.Sternum.Left.R9Node_pos + {0, .Data.AllRibs.CCOffset[1],0});  };
        AnyRefNode R9NodeLinf     ={ sRel =.Scale (.Data.Sternum.Left.R9Node_pos + {0,-.Data.AllRibs.CCOffset[1],0});  };
        AnyRefNode R9NodeLpos     ={ sRel =.Scale (.Data.Sternum.Left.R9Node_pos + {-.Data.AllRibs.CCOffset[1],0,0});  };
        AnyRefNode R9NodeLant     ={ sRel =.Scale (.Data.Sternum.Left.R9Node_pos + {.Data.AllRibs.CCOffset[1],0,0});  };
        AnyRefNode R10NodeLsup     ={ sRel =.Scale (.Data.Sternum.Left.R10Node_pos + {0, .Data.AllRibs.CCOffset[0],0});  };
        AnyRefNode R10NodeLinf     ={ sRel =.Scale (.Data.Sternum.Left.R10Node_pos + {0,-.Data.AllRibs.CCOffset[0],0});  };
        AnyRefNode R10NodeLpos     ={ sRel =.Scale (.Data.Sternum.Left.R10Node_pos + {-.Data.AllRibs.CCOffset[0],0,0});  };
        AnyRefNode R10NodeLant     ={ sRel =.Scale (.Data.Sternum.Left.R10Node_pos + {.Data.AllRibs.CCOffset[0],0,0});  };


        AnyRefNode RACP_CO6Node= {sRel = .Scale(.Data.Sternum.RACP_CO6Node_pos);};


        AnyRefNode TrThR2SNodeLIns         = {sRel = .Scale(.Data.Sternum.Left.TrThR2SNode_pos);};
        AnyRefNode TrThR3SNodeLIns         = {sRel = .Scale(.Data.Sternum.Left.TrThR3SNode_pos);};
        AnyRefNode TrThR4SNodeLIns         = {sRel = .Scale(.Data.Sternum.Left.TrThR4SNode_pos);};
        AnyRefNode TrThR5SNodeLIns         = {sRel = .Scale(.Data.Sternum.Left.TrThR5SNode_pos);};
        AnyRefNode TrThR6SNodeLIns         = {sRel = .Scale(.Data.Sternum.Left.TrThR6SNode_pos);};
        AnyRefNode TrThNodeLIns= {sRel = .Scale(.Data.Sternum.Left.TrThNode_pos);};

        AnyRefNode ObliquusInternus_1 = {sRel = .Scale(.Data.Sternum.Left.OICI_C9Node_pos);};
        AnyRefNode ObliquusInternus_2 = {sRel = .Scale(.Data.Sternum.Left.OICI_C8Node_pos);};


        AnyRefNode Xiphoid_DiaphragmNodeL = {sRel = .Scale(.Data.Sternum.Left.Xiphoid_DiaphragmNode_pos); };
        AnyRefNode CC_DiaphragmNode1L = {sRel = .Scale(.Data.Sternum.Left.CC_DiaphragmNode1_pos); };
        AnyRefNode CC_DiaphragmNode2L = {sRel = .Scale(.Data.Sternum.Left.CC_DiaphragmNode2_pos); };
        AnyRefNode CC_DiaphragmNode3L = {sRel = .Scale(.Data.Sternum.Left.CC_DiaphragmNode3_pos); };
        AnyRefNode CC_DiaphragmNode4L = {sRel = .Scale(.Data.Sternum.Left.CC_DiaphragmNode4_pos); };
        AnyRefNode CC_DiaphragmNode5L = {sRel = .Scale(.Data.Sternum.Left.CC_DiaphragmNode5_pos); };
        AnyRefNode CC_DiaphragmNode6L = {sRel = .Scale(.Data.Sternum.Left.CC_DiaphragmNode6_pos); };
        AnyRefNode CC_DiaphragmNode7L = {sRel = .Scale(.Data.Sternum.Left.CC_DiaphragmNode7_pos); };


        AnyRefNode Left_IC_Int_R6R7_elem_sternum = {sRel = .Scale(.Data.Sternum.Left.IC_Int_R6R7_elem_sternum_pos); };
        AnyRefNode Left_IC_Int_R7R8_elem_sternum = {sRel = .Scale(.Data.Sternum.Left.IC_Int_R7R8_elem_sternum_pos); };
        AnyRefNode Left_IC_Int_R8R9_elem_sternum = {sRel = .Scale(.Data.Sternum.Left.IC_Int_R8R9_elem_sternum_pos); };
        AnyRefNode Left_IC_Int_R9R10_elem_sternum = {sRel = .Scale(.Data.Sternum.Left.IC_Int_R9R10_elem_sternum_pos); };
      };
    #endif
  };
};
