//# Defintions for the python test framwork
//define = [
//  {'BM_LEG_MODEL':'_LEG_MODEL_TLEM1_'},
//  {'BM_LEG_MODEL':'_LEG_MODEL_TLEM2_'},
//]
//ignore_errors = ['FileReader.FileName']

#include "../libdef.any"

#path MOCAP_PATH_MAINFILEDIR  "<ANYMOCAP_EXAMPLES>/Plug-in-gait_Squat_StandingRefScaling/Trials/FlywheelSquat_1/"
#path MOCAP_PATH_MAINFILE "<MOCAP_PATH_MAINFILEDIR>/Main.any"
#define MOCAP_NAME_MAINFILEDIR "FlywheelSquat_1"


#ifdef TEST_NAME
#define  MOCAP_TEST_FILENAME_PREFIX  "Test_"
#else
#define  MOCAP_TEST_FILENAME_PREFIX  "GUI_"
#define BM_LEG_MODEL _LEG_MODEL_TLEM2_
#endif


// Run Analysis with a reduced number of time steps
// to make test go faster.
#define N_STEP 30


#include "<MOCAP_PATH_MAINFILE>"

Main =
{

  AnyOperation& RunTest = Main.RunParameterIdentification;

};
