#include "../libdef.any"

#include "../../Application/Examples/BenchPress/BenchPress.Main.any"

Main =
{
  AnyOperationSequence RunTest =
  {
     AnyOperation& Calibration = Main.RunApplication.CalibrationAnal;
     AnyOperation& Inv = Main.TestStudy.InverseDynamics;
  };

  AnyBodyStudy TestStudy = {
    AnyFolder &Model = .Model;
    tEnd = 10.0;
    Gravity = {0.0, -9.81, 0.0};
    nStep = 10;
  }; // End of study

};
