//define = [
//    {'BM_LEG_MODEL': '_LEG_MODEL_Leg_',
//     'BM_ARM_LEFT':'OFF','BM_ARM_RIGHT':'OFF'},
//    {'BM_LEG_MODEL': '_LEG_MODEL_TLEM_',
//     'BM_ARM_LEFT':'OFF','BM_ARM_RIGHT':'OFF'},
//    {'BM_LEG_MODEL': '_LEG_MODEL_TLEM2_',
//     'BM_ARM_LEFT':'OFF','BM_ARM_RIGHT':'OFF'},
//    {'BM_LEG_MODEL': 'OFF',
//     'BM_ARM_LEFT':'ON','BM_ARM_RIGHT':'ON'}
//]

#include "../libdef.any"

#ifndef TEST_NAME
  #define BM_LEG_RIGHT 0
  #define BM_LEG_LEFT 0
  #define BM_ARM_LEFT 1
  #define BM_ARM_RIGHT 1
#endif

#include "../../Application/Validation/EvaluateMomentArms/EvaluateMomentArms.main.any"

Main =
{
#ifndef CREATE_IMAGE
  AnyOperation& RunTest = Main.RunApplication;
#else
  #include "../Cameras.any"
  AnyOperation& CameraInitPos = Main.HumanModel.EvaluateMomentArms.Right.Arm.GHFlexion.Study.InitialConditions;
  LoadTimeCam.CameraLookAtPoint = {0,1,0};
  LoadTimeCam.CameraFieldOfView = DesignVar(2);
  LoadTimeCam.CameraDirection  = {0,0,1};
#endif
};
