//# Note. Since these tests include main files from other
//# applications they alter the ANYBODY_PATH_MAINFILEDIR and
//# ANYBODY_PATH_MAINFILE preprocessor flags.
//#
//# If these flags are important to the model they must be mocked by the
//# test framework. This can be done by adding the following test directives.
//# path = {'ANYBODY_PATH_MAINFILEDIR':'../../Application/Examples/MoCapModel-Runner',
//#         'ANYBODY_PATH_MAINFILE':'../../Application/Examples/MoCapModel-Runner/MoCap_Runner.main.any' }
//#
//define = [
//  {'MotionAndParameterOptimizationModel':'1',
//   'InverseDynamicModel':'0',
//   '_MACRO_':"Main.RunMotionAndParameterOptimizationSequence",
//   'OutputFileNamePrefix':'"TEMP_TEST_LowerBody-"'},
//  {'MotionAndParameterOptimizationModel':'0',
//   'InverseDynamicModel':'1',
//   '_MACRO_':"Main.InverseDynamicAnalysisSequence"},
//]

#include "../libdef.any"

#include "../../Application/Examples/Deprecated/MoCapModel-Runner/MoCap_Runner.main.any"

Main =
{
  #ifndef _MACRO_
  #define _MACRO_ InverseDynamicAnalysisSequence
  #endif

  AnyOperation& RunTest = _MACRO_;
};
