#include "../libdef.any"

#include "../../Application/Examples/SpineFixationWithForceDepKinematics/SpineFixationWithForceDependentKinematics.main.any"

Main =
{
  AnyOperationSequence TestRunApplication = {
    AnyOperation& t1 = Main.RunApplication.CalibrationAnal;
    AnyOperation& t2 = Main.Study.Kinematics;
  };


#ifndef CREATE_IMAGE
  AnyOperation& RunTest = Main.TestRunApplication;
#else
  #include "../Cameras.any"
  AnyOperation& CameraInitPos = Main.Study.InitialConditions;
  LoadTimeCam.CameraLookAtPoint = {0.05,0.25,0};
  LoadTimeCam.CameraFieldOfView = DesignVar(0.9);
  LoadTimeCam.CameraDirection  = {0,0,1};
#endif


};
