//define = (
//  [
//    {'BM_ARM_MUSCLES_LEFT': 'CONST_MUSCLES_NONE'},
//    {'BM_ARM_MUSCLES_LEFT': 'CONST_MUSCLES_SIMPLE'},
//    {'BM_ARM_MUSCLES_LEFT': 'CONST_MUSCLES_3E_HILL'},
//  ],
//  [
//    {'BM_ARM_MUSCLES_RIGHT': 'CONST_MUSCLES_NONE'},
//    {'BM_ARM_MUSCLES_RIGHT': 'CONST_MUSCLES_SIMPLE'},
//    {'BM_ARM_MUSCLES_RIGHT': 'CONST_MUSCLES_3E_HILL'},
//  ],
//  [
//    {'BM_TRUNK_MUSCLES': 'CONST_MUSCLES_NONE'},
//    {'BM_TRUNK_MUSCLES': 'CONST_MUSCLES_SIMPLE'},
//  ],
//  [
//    {'BM_TRUNK_NECK': 'OFF'},
//    {'BM_TRUNK_NECK': 'ON', 'BM_TRUNK_NECK_MUSCLES': 'CONST_MUSCLES_NONE'},
//    {'BM_TRUNK_NECK': 'ON', 'BM_TRUNK_NECK_MUSCLES': 'CONST_MUSCLES_SIMPLE'},
//    {'BM_TRUNK_NECK': 'ON', 'BM_TRUNK_NECK_MUSCLES': 'CONST_MUSCLES_SIMPLE',
//     'BM_TRUNK_NECK_SIMPLE_MUSCLES_ONLY_ON_NECK': 'ON'},
//  ],
//)
//ignore_errors = ['BodyModel.UnhallowedCombination','Model loading skipped']
//

#path ANYBODY_PATH_OUTPUT "."
#include "libdef.any"

Main =
{
  // #include "<ANYBODY_PATH_BODY>\Documentation\BodyModel.parameters.any"
  #include "<ANYBODY_PATH_BODY>\HumanModel.any"

  AnyOperationDummy RunApplication = {};
};
