//define = (
//  [
//    {'BM_LEG_LEFT': '_LEG_MODEL_TLEM_',
//     'BM_LEG_RIGHT': '_LEG_MODEL_TLEM_',
//     'TLEM_VERSION':'"2.0"'},
//    {'BM_LEG_LEFT': '_LEG_MODEL_TLEM_',
//     'BM_LEG_RIGHT': '_LEG_MODEL_TLEM_',
//     'TLEM_VERSION':'"1.1"'},
//    {'BM_LEG_LEFT': '_LEG_MODEL_Leg_',
//     'BM_LEG_RIGHT': '_LEG_MODEL_Leg_'},
//  ],
//  [
//    {'BM_LEG_MUSCLES_LEFT': '_MUSCLES_NONE_'},
//    {'BM_LEG_MUSCLES_LEFT': '_MUSCLES_SIMPLE_'},
//    {'BM_LEG_MUSCLES_LEFT': '_MUSCLES_3E_HILL_'},
//  ],
//  [
//    {'BM_LEG_MUSCLES_RIGHT': '_MUSCLES_NONE_'},
//    {'BM_LEG_MUSCLES_RIGHT': '_MUSCLES_SIMPLE_'},
//    {'BM_LEG_MUSCLES_RIGHT': '_MUSCLES_3E_HILL_'},
//  ],
//  [
//    {'BM_TRUNK_MUSCLES': '_MUSCLES_NONE_'},
//    {'BM_TRUNK_MUSCLES': '_MUSCLES_SIMPLE_'},
//  ],
//)
//ignore_errors = ['BodyModel.UnhallowedCombination','Model loading skipped']
//

#path ANYBODY_PATH_OUTPUT "."
#include "libdef.any"

Main =
{
  // #include "<ANYBODY_PATH_BODY>\Documentation\BodyModel.parameters.any"
  #include "<ANYBODY_PATH_BODY>\HumanModel.any"

  AnyOperationDummy RunApplication = {};
};
