//define = (
//   [
//    {'BM_ARM_SHOULDER_RHYTHM':'ON'},
//    {'BM_ARM_SHOULDER_RHYTHM':'OFF'},
//   ],
//   [
//    {'BM_ARM_SHOULDER_RHYTHM':'ON'},
//    {'BM_ARM_SHOULDER_RHYTHM':'OFF'},
//   ],
//   [
//    {'BM_CALIBRATION_TYPE':'1'},
//    {'BM_CALIBRATION_TYPE':'2'},
//   ]
//)
//ignore_errors = ['Currently, no room for tendon']

#include "libdef.any"

#ifndef TEST_NAME
   #define BM_CALIBRATION_TYPE 2
   #define BM_LEG_MODEL _LEG_MODEL_TLEM2_
   #define TEST_NAME "GUI"
#endif


#define BM_ARM_MUSCLES_BOTH CONST_MUSCLES_3E_HILL

#define BM_LEG_LEFT OFF
#define BM_LEG_RIGHT OFF
#define BM_ARM_LEFT OFF


Main =
{

  #include "<ANYBODY_PATH_BODY>/HumanModel.any"

  AnyOperation& RunTest = Main.HumanModel.Calibration.CalibrationSequence;
};


/*

# Test Documentation:

The test framework pytest is used to run tests.

Test files are identified by prefixing `test_` to the file names. Such files
will be collected automatically by the Pytest framework.

To run the test type the following at the command prompt:

> pytest


## Test specifications

The first part of the `test_xxx.any` can include specifications for the test framework.
Things such as define and part statements or certain errors to ignore.

The specification section must be commented with //. The test will execute that part of
the file as python code. So the code must be valid python code except for the leading //


### Specifying define statements:

The following specifications are supported:

* define
* path
* expected_errors
* ignore_errors
* expect_errors


// Note. Since this test example include a main file from another
// application it also alters the ANYBODY_PATH_MAINFILEDIR and
// ANYBODY_PATH_MAINFILE preprocessor flags.
//
// If these flags are important to the model they must be mocked by the
// test framework. This can be done by adding the following test directives
// to the top of the test file.


##

//path = {'ANYBODY_PATH_MAINFILEDIR':'../Application/Examples/StandingModel',
//        'ANYBODY_PATH_MAINFILE':'../Application/Examples/StandingModel/StandingModel.Main.any' }
//

*/
