#include "libdef.any"

Main =
{

   DEFAULT_PARAMETER_FOLDER Settings(
       NPARAM = 3,
       PARAM_1 = TrialNumber,
       PARAM_2 = Rotation, PARAM_2_TYPE = AnyMat33,
       PARAM_3 = Name, PARAM_3_TYPE = AnyString
   ) = {
       Default.TrialNumber = 2;
       Default.Rotation = RotMat(pi/2,y);
       Default.Name = "Subject2";
   };


   // Parameters can now be overridden
   Settings.Rotation = RotMat(pi,y);
   Settings.Name = "Subject2_test";


   AnyFolder Test_MESHGRID = {
      AnyVector x_ = {0.0,1,2,3};
      AnyVector y_ = {10.0, 20.0, 30.0};
      AnyVector z_ = {100.0, 200.0};

      AnyFloat meshgrid = MESHGRID(x_,y_,z_);
      // Note the dimension is supposed to flip x and y in dimensions. See indexing option for meshgrid in the
      // numpy documentation.
      AnyInt test_meshgrid_dim = expect(eqfun(SizesOf(meshgrid), {3,3,4,2}));

      AnyInt test_xx = expect(eqfun(flatten(meshgrid[0]), {0, 0, 1, 1, 2, 2, 3, 3, 0, 0, 1, 1, 2, 2, 3, 3, 0, 0, 1, 1, 2, 2, 3, 3} ));
      AnyInt test_yy = expect(eqfun(flatten(meshgrid[1]), {10, 10, 10, 10, 10, 10, 10, 10, 20, 20, 20, 20, 20, 20, 20, 20, 30, 30, 30, 30, 30, 30, 30, 30} ));
      AnyInt test_zz = expect(eqfun(flatten(meshgrid[2]), {100, 200, 100, 200, 100, 200, 100, 200, 100, 200, 100, 200, 100, 200, 100, 200, 100, 200, 100, 200, 100, 200, 100, 200} ));

      AnyMatrix meshtripels = MESHTRIPLES(x_,y_,z_);
      AnyInt test_meshtriples_dim = expect(eqfun(SizesOf(meshtripels), {24,3}));


 };

  AnyFolder Test_NON_UNIQUE = {
    AnyIntArray A = {1,1,3,3,5};
    AnyIntArray B = {1,2,3,3,4};
    AnyIntArray C = {0,1,1};

    AnyObjectPtrArray P1 = {&A, &A, &B, &B};
    AnyObjectPtrArray P2 = {&A, &B, &B, &A};
    AnyObjectPtrArray P3 = {&A, &B, &B};
    AnyObjectPtrArray P4 = {&A, &B, &C, &C};

    // Tests
    AnyIntArray test_01 = assert(eqfun(NON_UNIQUE_VALUES(A), {1, 3}));
    AnyInt test_02 = assert(eqfun(NON_UNIQUE_VALUES(B)[0], 3));
    AnyInt test_03 = assert(eqfun(NON_UNIQUE_VALUES(C), {1}));

    AnyIntArray test_04 = assert(eqfun(NON_UNIQUE_POINTERS(P1), {&A, &B}));
    AnyIntArray test_05 = assert(eqfun(NON_UNIQUE_POINTERS(P2), {&A, &B}));
    AnyIntArray test_06 = assert(eqfun(NON_UNIQUE_POINTERS(P3), {&B}));
    AnyIntArray test_07 = assert(eqfun(NON_UNIQUE_POINTERS(P4), {&C}));
  };


  AnyInt test_tri = assert(eqfun({{1,0,0},{1,1,0},{1,1,1}}, TRI(3)));
  AnyInt test_tri_upper = assert(eqfun({{1,0,0},{1,1,0},{1,1,1}}', TRI(3)'));

  AnyFolder test_cumsum = {
    AnyFloat vec = {1,2,3,4,5,6};
    AnyInt test_cumsum = assert(eqfun({1,3,6,10,15,21}, CUMSUM(vec)));
    AnyFloat vec2 = {1,-5,6};
    AnyInt test_cumsum_with_negatives = assert(eqfun({1,-4,2},CUMSUM(vec2)));
  };
};
