// This file creates a BodyModel folder in Main.HumanModel which doesn't have
// muscles.


HumanModel = {
  AnyFolder BodyModelWithoutMuscles = {

    AnyFolder& SelectedOutput= .BodyModel.SelectedOutput;

    AnyFolder Trunk = {
      AnyFolder &SegmentsLumbar = ..BodyModel.Trunk.SegmentsLumbar;
      AnyFolder &SegmentsThorax = ..BodyModel.Trunk.SegmentsThorax ;
      AnyFolder &SegmentsCervicalSpine = ..BodyModel.Trunk.SegmentsCervicalSpine ;
      AnyFolder &JointsLumbar = ..BodyModel.Trunk.JointsLumbar;
      AnyFolder &JointsCervicalSpine = ..BodyModel.Trunk.JointsCervicalSpine;
    };

    AnyFolder Right = {
      #if BM_ARM_RIGHT
      AnyFolder ShoulderArm = {
        AnyFolder &Seg = ...BodyModel.Right.ShoulderArm.Seg;
        AnyFolder &Jnt = ...BodyModel.Right.ShoulderArm.Jnt;
        #if BM_ARM_DELTOID_WRAPPING == _DELTOID_WRAPPING_RAKE_
        AnyFolder &rake = ...BodyModel.Right.ShoulderArm.Mus.ArtificialRake;
        #else
        AnyFolder &DeltoidWrappingPosteriorRef = ...BodyModel.Right.ShoulderArm.Mus.DeltoidWrappingPosterior;
        AnyFolder &DeltoidWrappingLateralRef = ...BodyModel.Right.ShoulderArm.Mus.DeltoidWrappingLateral;
        AnyFolder &DeltoidWrappingAnteriorRef = ...BodyModel.Right.ShoulderArm.Mus.DeltoidWrappingAnterior;
        #endif
      };
      #endif
      #if BM_LEG_RIGHT
      AnyFolder Leg = {
        AnyFolder &Seg = ...BodyModel.Right.Leg.Seg;
        AnyFolder &Jnt = ...BodyModel.Right.Leg.Jnt;
      };
      #endif
    };
    AnyFolder Left = {
      #if BM_ARM_LEFT
      AnyFolder ShoulderArm = {
        AnyFolder &Seg = ...BodyModel.Left.ShoulderArm.Seg;
        AnyFolder &Jnt = ...BodyModel.Left.ShoulderArm.Jnt;
        #if BM_ARM_DELTOID_WRAPPING == _DELTOID_WRAPPING_RAKE_
        AnyFolder &rake = ...BodyModel.Left.ShoulderArm.Mus.ArtificialRake;
        #else
        AnyFolder &DeltoidWrappingPosteriorRef = ...BodyModel.Left.ShoulderArm.Mus.DeltoidWrappingPosterior;
        AnyFolder &DeltoidWrappingLateralRef = ...BodyModel.Left.ShoulderArm.Mus.DeltoidWrappingLateral;
        AnyFolder &DeltoidWrappingAnteriorRef = ...BodyModel.Left.ShoulderArm.Mus.DeltoidWrappingAnterior;
        #endif
      };
      #endif
      #if BM_LEG_LEFT
      AnyFolder Leg = {
        AnyFolder &Seg = ...BodyModel.Left.Leg.Seg;
        AnyFolder &Jnt = ...BodyModel.Left.Leg.Jnt;
      };
      #endif
    };

    AnyFolder& MannequinValuesFromModel = .BodyModel.MannequinValuesFromModel;
    AnyFolder &Interface = .BodyModel.Interface;
    AnyFolder& IndividualMasses= .BodyModel.IndividualMasses;
    AnyFolder& ScalingRef = .Scaling;
    AnyVar TotalBodyMass = .BodyModel.TotalBodyMass;

  };

};
