AnyFolder JointAngleOutputs = {


  AnyOutputFile OutputFile_TrunkFull = {
    FileName = TEMP_PATH+"/"+ MOCAP_TEST_FILENAME_PREFIX + MOCAP_OUTPUT_FILENAME_PREFIX + Main.ModelSetup.TrialSpecificData.TrialFileName + "-euler-trunk-full.txt";
    SepSign = ",";
    SepSpaceAutoOnOff = Off;
    Header.TitleSectionOnOff = Off;
    Header.ConstSectionOnOff = Off;
    Header.ConstSectionSaveOptionsOnOff = Off;
    Header.VarSectionOnOff = Off;

    AnyVector PelvisPosX = ..BodyModel.Interface.Trunk.PelvisPosX.Pos;
    AnyVector PelvisPosY = ..BodyModel.Interface.Trunk.PelvisPosY.Pos;
    AnyVector PelvisPosZ = ..BodyModel.Interface.Trunk.PelvisPosZ.Pos;
    AnyVector PelvisRotX = ..BodyModel.Interface.Trunk.PelvisRotX.Pos;
    AnyVector PelvisRotY = ..BodyModel.Interface.Trunk.PelvisRotY.Pos;
    AnyVector PelvisRotZ = ..BodyModel.Interface.Trunk.PelvisRotZ.Pos;

    AnyVector SacrumPelvis = ..BodyModel.Interface.Trunk.Spine.SacrumPelvis.Pos;
    AnyVector L5Sacrum =..BodyModel.Interface.Trunk.Spine.L5Sacrum.Pos;
    AnyVector L4L5 =..BodyModel.Interface.Trunk.Spine.L4L5.Pos;
    AnyVector L3L4 =..BodyModel.Interface.Trunk.Spine.L3L4.Pos;
    AnyVector L2L3 =..BodyModel.Interface.Trunk.Spine.L2L3.Pos;
    AnyVector L1L2 =..BodyModel.Interface.Trunk.Spine.L1L2.Pos;
    AnyVector T12L1 =..BodyModel.Interface.Trunk.Spine.T12L1.Pos;
    AnyVector T1C7 =..BodyModel.Interface.Trunk.Spine.T1C7.Pos;
    AnyVector C7C6 =..BodyModel.Interface.Trunk.Spine.C7C6.Pos;
    AnyVector C6C5 =..BodyModel.Interface.Trunk.Spine.C6C5.Pos;
    AnyVector C5C4 =..BodyModel.Interface.Trunk.Spine.C5C4.Pos;
    AnyVector C4C3 =..BodyModel.Interface.Trunk.Spine.C4C3.Pos;
    AnyVector C3C2 =..BodyModel.Interface.Trunk.Spine.C3C2.Pos;
    AnyVector C2C1 =..BodyModel.Interface.Trunk.Spine.C2C1.Pos;
    AnyVector C1C0 =..BodyModel.Interface.Trunk.Spine.C1C0.Pos;

  };


#if BM_LEG_LEFT & (BM_LEG_MODEL == _LEG_MODEL_TLEM1_ |  BM_LEG_MODEL == _LEG_MODEL_TLEM2_)
  AnyOutputFile OutputFile_LeftLeg = {
    FileName = TEMP_PATH+"/"+ MOCAP_TEST_FILENAME_PREFIX + MOCAP_OUTPUT_FILENAME_PREFIX + Main.ModelSetup.TrialSpecificData.TrialFileName + "-euler-left_leg_tlem.txt";
    SepSign = ",";
    SepSpaceAutoOnOff = Off;
    Header.TitleSectionOnOff = Off;
    Header.ConstSectionOnOff = Off;
    Header.ConstSectionSaveOptionsOnOff = Off;
    Header.VarSectionOnOff = Off;


    AnyVector HipFlexion = ..BodyModel.Interface.Left.HipFlexion.Pos;
    AnyVector HipAbduction = ..BodyModel.Interface.Left.HipAbduction.Pos;
    AnyVector HipExternalRotation = ..BodyModel.Interface.Left.HipExternalRotation.Pos;
    AnyVector KneeFlexion = ..BodyModel.Interface.Left.KneeFlexion.Pos;
    AnyVector AnklePlantarFlexion = ..BodyModel.Interface.Left.AnklePlantarFlexion.Pos;
    AnyVector SubTalarEversion = ..BodyModel.Interface.Left.SubTalarEversion.Pos;
  };
#endif


#if BM_LEG_RIGHT & (BM_LEG_MODEL == _LEG_MODEL_TLEM1_ |  BM_LEG_MODEL == _LEG_MODEL_TLEM2_)
  AnyOutputFile OutputFile_RightLeg = {
    FileName = TEMP_PATH+"/"+ MOCAP_TEST_FILENAME_PREFIX + MOCAP_OUTPUT_FILENAME_PREFIX + Main.ModelSetup.TrialSpecificData.TrialFileName + "-euler-right_leg_tlem.txt";
    SepSign = ",";
    SepSpaceAutoOnOff = Off;
    Header.TitleSectionOnOff = Off;
    Header.ConstSectionOnOff = Off;
    Header.ConstSectionSaveOptionsOnOff = Off;
    Header.VarSectionOnOff = Off;

    AnyVector HipFlexion = ..BodyModel.Interface.Right.HipFlexion.Pos;
    AnyVector HipAbduction = ..BodyModel.Interface.Right.HipAbduction.Pos;
    AnyVector HipExternalRotation = ..BodyModel.Interface.Right.HipExternalRotation.Pos;
    AnyVector KneeFlexion = ..BodyModel.Interface.Right.KneeFlexion.Pos;
    AnyVector AnklePlantarFlexion = ..BodyModel.Interface.Right.AnklePlantarFlexion.Pos;
    AnyVector SubTalarEversion = ..BodyModel.Interface.Right.SubTalarEversion.Pos;
  };
#endif


#if BM_LEG_LEFT & (BM_LEG_MODEL == _LEG_MODEL_LEG_)
  AnyOutputFile OutputFile_LeftLeg = {
    FileName = TEMP_PATH+"/"+ MOCAP_TEST_FILENAME_PREFIX + MOCAP_OUTPUT_FILENAME_PREFIX + Main.ModelSetup.TrialSpecificData.TrialFileName + "-euler-left_leg.txt";
    SepSign = ",";
    SepSpaceAutoOnOff = Off;
    Header.TitleSectionOnOff = Off;
    Header.ConstSectionOnOff = Off;
    Header.ConstSectionSaveOptionsOnOff = Off;
    Header.VarSectionOnOff = Off;

    AnyVector HipFlexion = ..BodyModel.Interface.Left.HipFlexion.Pos;
    AnyVector HipAbduction = ..BodyModel.Interface.Left.HipAbduction.Pos;
    AnyVector HipExternalRotation = ..BodyModel.Interface.Left.HipExternalRotation.Pos;
    AnyVector KneeFlexion = ..BodyModel.Interface.Left.KneeFlexion.Pos;
    AnyVector AnklePlantarFlexion = ..BodyModel.Interface.Left.AnklePlantarFlexion.Pos;
    AnyVector AnkleEversion = ..BodyModel.Interface.Left.AnkleEversion.Pos;
  };
#endif


#if BM_LEG_RIGHT & (BM_LEG_MODEL == _LEG_MODEL_LEG_)
  AnyOutputFile OutputFile_RightLeg = {
    FileName = TEMP_PATH+"/"+ MOCAP_TEST_FILENAME_PREFIX + MOCAP_OUTPUT_FILENAME_PREFIX + Main.ModelSetup.TrialSpecificData.TrialFileName + "-euler-right_leg.txt";
    SepSign = ",";
    SepSpaceAutoOnOff = Off;
    Header.TitleSectionOnOff = Off;
    Header.ConstSectionOnOff = Off;
    Header.ConstSectionSaveOptionsOnOff = Off;
    Header.VarSectionOnOff = Off;

    AnyVector HipFlexion = ..BodyModel.Interface.Right.HipFlexion.Pos;
    AnyVector HipAbduction = ..BodyModel.Interface.Right.HipAbduction.Pos;
    AnyVector HipExternalRotation = ..BodyModel.Interface.Right.HipExternalRotation.Pos;
    AnyVector KneeFlexion = ..BodyModel.Interface.Right.KneeFlexion.Pos;
    AnyVector AnklePlantarFlexion = ..BodyModel.Interface.Right.AnklePlantarFlexion.Pos;
    AnyVector AnkleEversion = ..BodyModel.Interface.Right.AnkleEversion.Pos;
  };
#endif


#if BM_ARM_LEFT == ON


  AnyOutputFile OutputFile_LeftArm = {
    FileName = TEMP_PATH+"/"+ MOCAP_TEST_FILENAME_PREFIX +MOCAP_OUTPUT_FILENAME_PREFIX + Main.ModelSetup.TrialSpecificData.TrialFileName + "-rotvec-left_arm_shoulder.txt";
    SepSign = ",";
    SepSpaceAutoOnOff = Off;
    Header.TitleSectionOnOff = Off;
    Header.ConstSectionOnOff = Off;
    Header.ConstSectionSaveOptionsOnOff = Off;
    Header.VarSectionOnOff = Off;

    AnyVector ThoraxClavicula =..BodyModel.Interface.Left.RotVectorMeasures.ThoraxClavicula.Pos;
    AnyVector ClaviculaScapula =..BodyModel.Interface.Left.RotVectorMeasures.ClaviculaScapula.Pos;
    AnyVector ScapulaHumerus =..BodyModel.Interface.Left.RotVectorMeasures.ScapulaHumerus.Pos;
    AnyVector HumerusUlna =..BodyModel.Interface.Left.RotVectorMeasures.HumerusUlna.Pos;
    AnyVector UlnaRadius =..BodyModel.Interface.Left.RotVectorMeasures.UlnaRadius.Pos;
    AnyVector RadiusWrist =..BodyModel.Interface.Left.RotVectorMeasures.RadiusWrist.Pos;
    AnyVector WristHand =..BodyModel.Interface.Left.RotVectorMeasures.WristHand.Pos;

  };


  #if BM_HAND_MODEL == _HAND_MODEL_ANYBODY_ | BM_HAND_MODEL == _HAND_MODEL_RUHM_
  AnyOutputFile OutputFile_LeftDetailedHand = {
    FileName = TEMP_PATH+"/"+ MOCAP_TEST_FILENAME_PREFIX + MOCAP_OUTPUT_FILENAME_PREFIX + Main.ModelSetup.TrialSpecificData.TrialFileName + "-euler-left_detailed_hand.txt";
    SepSign = ",";
    SepSpaceAutoOnOff = Off;
    Header.TitleSectionOnOff = Off;
    Header.ConstSectionOnOff = Off;
    Header.ConstSectionSaveOptionsOnOff = Off;
    Header.VarSectionOnOff = Off;

    AnyVector CMC1Flexion = ..BodyModel.Interface.Left.Hand.Finger1.CMCFlexion.Pos;
    AnyVector CMC1Abduction = ..BodyModel.Interface.Left.Hand.Finger1.CMCAbduction.Pos;
    AnyVector MCP1Flexion = ..BodyModel.Interface.Left.Hand.Finger1.MCPFlexion.Pos;
    AnyVector MCP1Abduction = ..BodyModel.Interface.Left.Hand.Finger1.MCPAbduction.Pos;
    AnyVector DIPFlexion1 = ..BodyModel.Interface.Left.Hand.Finger1.DIPFlexion.Pos;

    AnyVector CMC2Flexion = ..BodyModel.Interface.Left.Hand.Finger2.CMCFlexion.Pos;
    AnyVector CMC2Abduction = ..BodyModel.Interface.Left.Hand.Finger2.CMCAbduction.Pos;
    AnyVector MCP2Flexion = ..BodyModel.Interface.Left.Hand.Finger2.MCPFlexion.Pos;
    AnyVector MCP2Abduction = ..BodyModel.Interface.Left.Hand.Finger2.MCPAbduction.Pos;
    AnyVector PIP2Flexion = ..BodyModel.Interface.Left.Hand.Finger2.PIPFlexion.Pos;
    AnyVector DIP2Flexion = ..BodyModel.Interface.Left.Hand.Finger3.DIPFlexion.Pos;

    AnyVector CMC3Flexion = ..BodyModel.Interface.Left.Hand.Finger3.CMCFlexion.Pos;
    AnyVector CMC3Abduction = ..BodyModel.Interface.Left.Hand.Finger3.CMCAbduction.Pos;
    AnyVector MCP3Flexion = ..BodyModel.Interface.Left.Hand.Finger3.MCPFlexion.Pos;
    AnyVector MCP3Abduction = ..BodyModel.Interface.Left.Hand.Finger3.MCPAbduction.Pos;
    AnyVector PIP3Flexion = ..BodyModel.Interface.Left.Hand.Finger3.PIPFlexion.Pos;
    AnyVector DIP3Flexion = ..BodyModel.Interface.Left.Hand.Finger3.DIPFlexion.Pos;

    AnyVector CMC4Flexion = ..BodyModel.Interface.Left.Hand.Finger4.CMCFlexion.Pos;
    AnyVector CMC4Abduction = ..BodyModel.Interface.Left.Hand.Finger4.CMCAbduction.Pos;
    AnyVector MCP4Flexion = ..BodyModel.Interface.Left.Hand.Finger4.MCPFlexion.Pos;
    AnyVector MCP4Abduction = ..BodyModel.Interface.Left.Hand.Finger4.MCPAbduction.Pos;
    AnyVector PIP4Flexion = ..BodyModel.Interface.Left.Hand.Finger4.PIPFlexion.Pos;
    AnyVector DIP4Flexion = ..BodyModel.Interface.Left.Hand.Finger4.DIPFlexion.Pos;

    AnyVector CMC5Flexion = ..BodyModel.Interface.Left.Hand.Finger5.CMCFlexion.Pos;
    AnyVector CMC5Abduction = ..BodyModel.Interface.Left.Hand.Finger5.CMCAbduction.Pos;
    AnyVector MCP5Flexion = ..BodyModel.Interface.Left.Hand.Finger5.MCPFlexion.Pos;
    AnyVector MCP5Abduction = ..BodyModel.Interface.Left.Hand.Finger5.MCPAbduction.Pos;
    AnyVector PIP5Flexion = ..BodyModel.Interface.Left.Hand.Finger5.PIPFlexion.Pos;
    AnyVector DIP5Flexion = ..BodyModel.Interface.Left.Hand.Finger5.DIPFlexion.Pos;
  };
  #endif

#endif


#if BM_ARM_RIGHT == ON

  AnyOutputFile OutputFile_RightArm = {
    FileName = TEMP_PATH+"/"+ MOCAP_TEST_FILENAME_PREFIX + MOCAP_OUTPUT_FILENAME_PREFIX + Main.ModelSetup.TrialSpecificData.TrialFileName + "-rotvec-right_arm_shoulder.txt";
    SepSign = ",";
    SepSpaceAutoOnOff = Off;
    Header.TitleSectionOnOff = Off;
    Header.ConstSectionOnOff = Off;
    Header.ConstSectionSaveOptionsOnOff = Off;
    Header.VarSectionOnOff = Off;

    AnyVector ThoraxClavicula =..BodyModel.Interface.Right.RotVectorMeasures.ThoraxClavicula.Pos;
    AnyVector ClaviculaScapula =..BodyModel.Interface.Right.RotVectorMeasures.ClaviculaScapula.Pos;
    AnyVector ScapulaHumerus =..BodyModel.Interface.Right.RotVectorMeasures.ScapulaHumerus.Pos;
    AnyVector HumerusUlna =..BodyModel.Interface.Right.RotVectorMeasures.HumerusUlna.Pos;
    AnyVector UlnaRadius =..BodyModel.Interface.Right.RotVectorMeasures.UlnaRadius.Pos;
    AnyVector RadiusWrist =..BodyModel.Interface.Right.RotVectorMeasures.RadiusWrist.Pos;
    AnyVector WristHand =..BodyModel.Interface.Right.RotVectorMeasures.WristHand.Pos;
  };


  #if BM_HAND_MODEL == _HAND_MODEL_ANYBODY_
  AnyOutputFile OutputFile_RightDetailedHand = {
    FileName = TEMP_PATH+"/"+ MOCAP_TEST_FILENAME_PREFIX + MOCAP_OUTPUT_FILENAME_PREFIX + Main.ModelSetup.TrialSpecificData.TrialFileName + "-euler-right_detailed_hand.txt";
    SepSign = ",";
    SepSpaceAutoOnOff = Off;
    Header.TitleSectionOnOff = Off;
    Header.ConstSectionOnOff = Off;
    Header.ConstSectionSaveOptionsOnOff = Off;
    Header.VarSectionOnOff = Off;

    AnyVector CMC1Flexion = ..BodyModel.Interface.Right.Hand.Finger1.CMCFlexion.Pos;
    AnyVector CMC1Abduction = ..BodyModel.Interface.Right.Hand.Finger1.CMCAbduction.Pos;
    AnyVector MCP1Flexion = ..BodyModel.Interface.Right.Hand.Finger1.MCPFlexion.Pos;
    AnyVector MCP1Abduction = ..BodyModel.Interface.Right.Hand.Finger1.MCPAbduction.Pos;
    AnyVector DIPFlexion1 = ..BodyModel.Interface.Right.Hand.Finger1.DIPFlexion.Pos;

    AnyVector CMC2Flexion = ..BodyModel.Interface.Right.Hand.Finger2.CMCFlexion.Pos;
    AnyVector CMC2Abduction = ..BodyModel.Interface.Right.Hand.Finger2.CMCAbduction.Pos;
    AnyVector MCP2Flexion = ..BodyModel.Interface.Right.Hand.Finger2.MCPFlexion.Pos;
    AnyVector MCP2Abduction = ..BodyModel.Interface.Right.Hand.Finger2.MCPAbduction.Pos;
    AnyVector PIP2Flexion = ..BodyModel.Interface.Right.Hand.Finger2.PIPFlexion.Pos;
    AnyVector DIP2Flexion = ..BodyModel.Interface.Right.Hand.Finger3.DIPFlexion.Pos;

    AnyVector CMC3Flexion = ..BodyModel.Interface.Right.Hand.Finger3.CMCFlexion.Pos;
    AnyVector CMC3Abduction = ..BodyModel.Interface.Right.Hand.Finger3.CMCAbduction.Pos;
    AnyVector MCP3Flexion = ..BodyModel.Interface.Right.Hand.Finger3.MCPFlexion.Pos;
    AnyVector MCP3Abduction = ..BodyModel.Interface.Right.Hand.Finger3.MCPAbduction.Pos;
    AnyVector PIP3Flexion = ..BodyModel.Interface.Right.Hand.Finger3.PIPFlexion.Pos;
    AnyVector DIP3Flexion = ..BodyModel.Interface.Right.Hand.Finger3.DIPFlexion.Pos;

    AnyVector CMC4Flexion = ..BodyModel.Interface.Right.Hand.Finger4.CMCFlexion.Pos;
    AnyVector CMC4Abduction = ..BodyModel.Interface.Right.Hand.Finger4.CMCAbduction.Pos;
    AnyVector MCP4Flexion = ..BodyModel.Interface.Right.Hand.Finger4.MCPFlexion.Pos;
    AnyVector MCP4Abduction = ..BodyModel.Interface.Right.Hand.Finger4.MCPAbduction.Pos;
    AnyVector PIP4Flexion = ..BodyModel.Interface.Right.Hand.Finger4.PIPFlexion.Pos;
    AnyVector DIP4Flexion = ..BodyModel.Interface.Right.Hand.Finger4.DIPFlexion.Pos;

    AnyVector CMC5Flexion = ..BodyModel.Interface.Right.Hand.Finger5.CMCFlexion.Pos;
    AnyVector CMC5Abduction = ..BodyModel.Interface.Right.Hand.Finger5.CMCAbduction.Pos;
    AnyVector MCP5Flexion = ..BodyModel.Interface.Right.Hand.Finger5.MCPFlexion.Pos;
    AnyVector MCP5Abduction = ..BodyModel.Interface.Right.Hand.Finger5.MCPAbduction.Pos;
    AnyVector PIP5Flexion = ..BodyModel.Interface.Right.Hand.Finger5.PIPFlexion.Pos;
    AnyVector DIP5Flexion = ..BodyModel.Interface.Right.Hand.Finger5.DIPFlexion.Pos;
  };
  #endif

#endif


}; //JointAngleOutputs
