AnyFolder JointsAndDrivers = {


AnyKinDriver JntDriverTrunkFull = {

  #include "InterpolateJointAngleData.any"
  FileReader.FileName = TEMP_PATH + "/" + MOCAP_TEST_FILENAME_PREFIX + MOCAP_OUTPUT_FILENAME_PREFIX + Main.ModelSetup.TrialSpecificData.TrialFileName + "-euler-trunk-full.txt";

  /// The default data if no joint angles files have been generated.
  FileReader.Data0 = repmat(
    1, FileReader.Length0,
    arrcat({Main.HumanModel.Mannequin.Posture.PelvisPosX,
            Main.HumanModel.Mannequin.Posture.PelvisPosY,
            Main.HumanModel.Mannequin.Posture.PelvisPosZ,
            Main.HumanModel.Mannequin.Posture.PelvisRotX*pi/180,
            Main.HumanModel.Mannequin.Posture.PelvisRotY*pi/180,
            Main.HumanModel.Mannequin.Posture.PelvisRotZ*pi/180
           },repmat(nDim-6,0.0)
    )
  );
  AnyKinMeasure& PelvisPosX = ...BodyModel.Interface.Trunk.PelvisPosX;
  AnyKinMeasure& PelvisPosY = ...BodyModel.Interface.Trunk.PelvisPosY;
  AnyKinMeasure& PelvisPosZ = ...BodyModel.Interface.Trunk.PelvisPosZ;
  AnyKinMeasure& PelvisRotX = ...BodyModel.Interface.Trunk.PelvisRotX;
  AnyKinMeasure& PelvisRotY = ...BodyModel.Interface.Trunk.PelvisRotY;
  AnyKinMeasure& PelvisRotZ = ...BodyModel.Interface.Trunk.PelvisRotZ;

  AnyKinMeasureOrg& SacrumPelvis = ...BodyModel.Interface.Trunk.Spine.SacrumPelvis;
  AnyKinMeasureOrg& L5Sacrum =...BodyModel.Interface.Trunk.Spine.L5Sacrum;
  AnyKinMeasureOrg& L4L5 =...BodyModel.Interface.Trunk.Spine.L4L5;
  AnyKinMeasureOrg& L3L4 =...BodyModel.Interface.Trunk.Spine.L3L4;
  AnyKinMeasureOrg& L2L3 =...BodyModel.Interface.Trunk.Spine.L2L3;
  AnyKinMeasureOrg& L1L2 =...BodyModel.Interface.Trunk.Spine.L1L2;
  AnyKinMeasureOrg& T12L1 =...BodyModel.Interface.Trunk.Spine.T12L1;
  AnyKinMeasureOrg& T1C7 =...BodyModel.Interface.Trunk.Spine.T1C7;
  AnyKinMeasureOrg& C7C6 =...BodyModel.Interface.Trunk.Spine.C7C6;
  AnyKinMeasureOrg& C6C5 =...BodyModel.Interface.Trunk.Spine.C6C5;
  AnyKinMeasureOrg& C5C4 =...BodyModel.Interface.Trunk.Spine.C5C4;
  AnyKinMeasureOrg& C4C3 =...BodyModel.Interface.Trunk.Spine.C4C3;
  AnyKinMeasureOrg& C3C2 =...BodyModel.Interface.Trunk.Spine.C3C2;
  AnyKinMeasureOrg& C2C1 =...BodyModel.Interface.Trunk.Spine.C2C1;
  AnyKinMeasureOrg& C1C0 =...BodyModel.Interface.Trunk.Spine.C1C0;

  Reaction.Type = repmat(nDim, Off);
};


  #if BM_LEG_LEFT & (BM_LEG_MODEL == _LEG_MODEL_TLEM_ | BM_LEG_MODEL == _LEG_MODEL_TLEM2_)
  AnyKinDriver JntDriverLeftLegTD = {

    #include "InterpolateJointAngleData.any"
    FileReader.FileName = TEMP_PATH + "/" + MOCAP_TEST_FILENAME_PREFIX +MOCAP_OUTPUT_FILENAME_PREFIX + Main.ModelSetup.TrialSpecificData.TrialFileName + "-euler-left_leg_tlem.txt";
    FileReader.Data0 = zeros(nDim, FileReader.Length0 );

    AnyKinMeasure& HipFlexion = ...BodyModel.Interface.Left.HipFlexion;
    AnyKinMeasure& HipAbduction = ...BodyModel.Interface.Left.HipAbduction;
    AnyKinMeasure& HipExternalRotation = ...BodyModel.Interface.Left.HipExternalRotation;
    AnyKinMeasure& KneeFlexion = ...BodyModel.Interface.Left.KneeFlexion;
    AnyKinMeasure& AnklePlantarFlexion = ...BodyModel.Interface.Left.AnklePlantarFlexion;
    AnyKinMeasure& SubTalarEversion = ...BodyModel.Interface.Left.SubTalarEversion;
    Reaction.Type = repmat(nDim, Off);
  };
  #endif


  #if BM_LEG_RIGHT & (BM_LEG_MODEL == _LEG_MODEL_TLEM_ | BM_LEG_MODEL == _LEG_MODEL_TLEM2_)
  AnyKinDriver JntDriverRightLegTD = {
    #include "InterpolateJointAngleData.any"
    FileReader.FileName = TEMP_PATH + "/" + MOCAP_TEST_FILENAME_PREFIX +  MOCAP_OUTPUT_FILENAME_PREFIX + Main.ModelSetup.TrialSpecificData.TrialFileName + "-euler-right_leg_tlem.txt";
    FileReader.Data0 = zeros(nDim, FileReader.Length0 );

    AnyKinMeasure& HipFlexion = ...BodyModel.Interface.Right.HipFlexion;
    AnyKinMeasure& HipAbduction = ...BodyModel.Interface.Right.HipAbduction;
    AnyKinMeasure& HipExternalRotation = ...BodyModel.Interface.Right.HipExternalRotation;
    AnyKinMeasure& KneeFlexion = ...BodyModel.Interface.Right.KneeFlexion;
    AnyKinMeasure& AnklePlantarFlexion = ...BodyModel.Interface.Right.AnklePlantarFlexion;
    AnyKinMeasure& SubTalarEversion = ...BodyModel.Interface.Right.SubTalarEversion;
    Reaction.Type = repmat(nDim, Off);
  };
  #endif


  #if BM_LEG_LEFT & BM_LEG_MODEL == _LEG_MODEL_LEG_
  AnyKinDriver JntDriverLeftLeg = {
    #include "InterpolateJointAngleData.any"
    FileReader.FileName = TEMP_PATH + "/" + MOCAP_TEST_FILENAME_PREFIX + MOCAP_OUTPUT_FILENAME_PREFIX + Main.ModelSetup.TrialSpecificData.TrialFileName + "-euler-left_leg.txt";
    FileReader.Data0 = zeros(nDim, FileReader.Length0 );

    AnyKinMeasure& HipFlexion = ...BodyModel.Interface.Left.HipFlexion;
    AnyKinMeasure& HipAbduction = ...BodyModel.Interface.Left.HipAbduction;
    AnyKinMeasure& HipExternalRotation = ...BodyModel.Interface.Left.HipExternalRotation;
    AnyKinMeasure& KneeFlexion = ...BodyModel.Interface.Left.KneeFlexion;
    AnyKinMeasure& AnklePlantarFlexion = ...BodyModel.Interface.Left.AnklePlantarFlexion;
    AnyKinMeasure& AnkleEversion = ...BodyModel.Interface.Left.AnkleEversion;
    Reaction.Type = repmat(nDim, Off);
  };
  #endif


  #if BM_LEG_RIGHT & BM_LEG_MODEL == _LEG_MODEL_LEG_
  AnyKinDriver JntDriverRightLeg = {
    #include "InterpolateJointAngleData.any"
    FileReader.FileName = TEMP_PATH + "/" + MOCAP_TEST_FILENAME_PREFIX + MOCAP_OUTPUT_FILENAME_PREFIX + Main.ModelSetup.TrialSpecificData.TrialFileName + "-euler-right_leg.txt";
    FileReader.Data0 = zeros(nDim, FileReader.Length0 );

    AnyKinMeasure& HipFlexion = ...BodyModel.Interface.Right.HipFlexion;
    AnyKinMeasure& HipAbduction = ...BodyModel.Interface.Right.HipAbduction;
    AnyKinMeasure& HipExternalRotation = ...BodyModel.Interface.Right.HipExternalRotation;
    AnyKinMeasure& KneeFlexion = ...BodyModel.Interface.Right.KneeFlexion;
    AnyKinMeasure& AnklePlantarFlexion = ...BodyModel.Interface.Right.AnklePlantarFlexion;
    AnyKinMeasure& AnkleEversion = ...BodyModel.Interface.Right.AnkleEversion;
    Reaction.Type = repmat(nDim, Off);
  };
  #endif

  #if BM_ARM_LEFT == ON
  AnyKinDriver JntDriverLeftArm = {
    #include "InterpolateJointAngleData.any"
    FileReader.FileName = TEMP_PATH + "/" + MOCAP_TEST_FILENAME_PREFIX + MOCAP_OUTPUT_FILENAME_PREFIX + Main.ModelSetup.TrialSpecificData.TrialFileName + "-euler-left_arm_shoulder.txt";
    FileReader.Data0 = zeros(nDim, FileReader.Length0 );

    AnyKinMeasure& SternoClavicularProtraction=...BodyModel.Interface.Left.SternoClavicularProtraction;
    AnyKinMeasure& SternoClavicularElevation=...BodyModel.Interface.Left.SternoClavicularElevation;
    AnyKinMeasure& SternoClavicularAxialRotation=...BodyModel.Interface.Left.SternoClavicularAxialRotation;
    AnyKinMeasure& AcromioClavicularProtraction =...BodyModel.Interface.Left.AcromioClavicular.Protraction;
    AnyKinMeasure& AcromioClavicularMedialRotation =...BodyModel.Interface.Left.AcromioClavicular.MedialRotation;
    AnyKinMeasure& AcromioClavicularPosteriorTilt =...BodyModel.Interface.Left.AcromioClavicular.PosteriorTilt;

    AnyKinMeasure& GlenohumeralFlexion = ...BodyModel.Interface.Left.GlenohumeralFlexion;
    AnyKinMeasure& GlenohumeralExternalRotation = ...BodyModel.Interface.Left.GlenohumeralExternalRotation;
    AnyKinMeasure& GlenohumeralAbduction = ...BodyModel.Interface.Left.GlenohumeralAbduction;
    AnyKinMeasure& ElbowFlexion = ...BodyModel.Interface.Left.ElbowFlexion;
    AnyKinMeasure& ElbowPronation = ...BodyModel.Interface.Left.ElbowPronation;
    AnyKinMeasure& WristFlexion = ...BodyModel.Interface.Left.WristFlexion;
    AnyKinMeasure& WristAbduction = ...BodyModel.Interface.Left.WristAbduction;
    Reaction.Type = repmat(nDim, Off);
  };

  #if BM_ARM_DETAILED_HAND
  AnyKinDriver JntDriverLeftDetailedHand = {
    #include "InterpolateJointAngleData.any"
    FileReader.FileName = TEMP_PATH + "/" + MOCAP_TEST_FILENAME_PREFIX + MOCAP_OUTPUT_FILENAME_PREFIX + Main.ModelSetup.TrialSpecificData.TrialFileName + "-euler-left_detailed_hand.txt";
    FileReader.Data0 = zeros(nDim, FileReader.Length0 );

    AnyKinMeasure& CMC1Flexion = ...BodyModel.Interface.Left.CMCFlexion;
    AnyKinMeasure& CMC1Abduction = ...BodyModel.Interface.Left.CMCAbduction;
    AnyKinMeasure& MCP1Flexion = ...BodyModel.Interface.Left.MCPFlexion;
    AnyKinMeasure& MCP1Abduction = ...BodyModel.Interface.Left.MCPAbduction;
    AnyKinMeasure& DIP1 = ...BodyModel.Interface.Left.DIP;
    AnyKinMeasure& MCP2 = ...BodyModel.Left.ShoulderArm.Seg.Hand.Finger2.Jnt.MCP;
    AnyKinMeasure& PIP2 = ...BodyModel.Left.ShoulderArm.Seg.Hand.Finger2.Jnt.PIP;
    AnyKinMeasure& DIP2 = ...BodyModel.Left.ShoulderArm.Seg.Hand.Finger2.Jnt.DIP;
    AnyKinMeasure& MCP3 = ...BodyModel.Left.ShoulderArm.Seg.Hand.Finger3.Jnt.MCP;
    AnyKinMeasure& PIP3 = ...BodyModel.Left.ShoulderArm.Seg.Hand.Finger3.Jnt.PIP;
    AnyKinMeasure& DIP3 = ...BodyModel.Left.ShoulderArm.Seg.Hand.Finger3.Jnt.DIP;
    AnyKinMeasure& MCP4 = ...BodyModel.Left.ShoulderArm.Seg.Hand.Finger4.Jnt.MCP;
    AnyKinMeasure& PIP4 = ...BodyModel.Left.ShoulderArm.Seg.Hand.Finger4.Jnt.PIP;
    AnyKinMeasure& DIP4 = ...BodyModel.Left.ShoulderArm.Seg.Hand.Finger4.Jnt.DIP;
    AnyKinMeasure& MCP5 = ...BodyModel.Left.ShoulderArm.Seg.Hand.Finger5.Jnt.MCP;
    AnyKinMeasure& PIP5 = ...BodyModel.Left.ShoulderArm.Seg.Hand.Finger5.Jnt.PIP;
    AnyKinMeasure& DIP5 = ...BodyModel.Left.ShoulderArm.Seg.Hand.Finger5.Jnt.DIP;
    Reaction.Type = repmat(nDim, Off);
  };
  #endif


  #endif

  #if BM_ARM_RIGHT == ON
  AnyKinDriver JntDriverRightArm = {
    #include "InterpolateJointAngleData.any"
    FileReader.FileName = TEMP_PATH + "/" + MOCAP_TEST_FILENAME_PREFIX + MOCAP_OUTPUT_FILENAME_PREFIX + Main.ModelSetup.TrialSpecificData.TrialFileName + "-euler-right_arm_shoulder.txt";
    FileReader.Data0 = zeros(nDim, FileReader.Length0 );

    AnyKinMeasure& SternoClavicularProtraction=...BodyModel.Interface.Right.SternoClavicularProtraction;
    AnyKinMeasure& SternoClavicularElevation=...BodyModel.Interface.Right.SternoClavicularElevation;
    AnyKinMeasure& SternoClavicularAxialRotation=...BodyModel.Interface.Right.SternoClavicularAxialRotation;
    AnyKinMeasure& AcromioClavicularProtraction =...BodyModel.Interface.Right.AcromioClavicular.Protraction;
    AnyKinMeasure& AcromioClavicularMedialRotation =...BodyModel.Interface.Right.AcromioClavicular.MedialRotation;
    AnyKinMeasure& AcromioClavicularPosteriorTilt =...BodyModel.Interface.Right.AcromioClavicular.PosteriorTilt;

    AnyKinMeasure& GlenohumeralFlexion = ...BodyModel.Interface.Right.GlenohumeralFlexion;
    AnyKinMeasure& GlenohumeralExternalRotation = ...BodyModel.Interface.Right.GlenohumeralExternalRotation;
    AnyKinMeasure& GlenohumeralAbduction = ...BodyModel.Interface.Right.GlenohumeralAbduction;
    AnyKinMeasure& ElbowFlexion = ...BodyModel.Interface.Right.ElbowFlexion;
    AnyKinMeasure& ElbowPronation = ...BodyModel.Interface.Right.ElbowPronation;
    AnyKinMeasure& WristFlexion = ...BodyModel.Interface.Right.WristFlexion;
    AnyKinMeasure& WristAbduction = ...BodyModel.Interface.Right.WristAbduction;
    Reaction.Type = repmat(nDim, Off);
  };

  #if BM_ARM_DETAILED_HAND
  AnyKinDriver JntDriverRightDetailedHand = {
    #include "InterpolateJointAngleData.any"
    FileReader.FileName = TEMP_PATH + "/" + MOCAP_TEST_FILENAME_PREFIX + MOCAP_OUTPUT_FILENAME_PREFIX + Main.ModelSetup.TrialSpecificData.TrialFileName + "-euler-right_detailed_hand.txt";
    FileReader.Data0 = zeros(nDim, FileReader.Length0 );

    AnyKinMeasure& CMC1Flexion = ...BodyModel.Interface.Right.CMCFlexion;
    AnyKinMeasure& CMC1Abduction = ...BodyModel.Interface.Right.CMCAbduction;
    AnyKinMeasure& MCP1Flexion = ...BodyModel.Interface.Right.MCPFlexion;
    AnyKinMeasure& MCP1Abduction = ...BodyModel.Interface.Right.MCPAbduction;
    AnyKinMeasure& DIP1 = ...BodyModel.Interface.Right.DIP;
    AnyKinMeasure& MCP2 = ...BodyModel.Right.ShoulderArm.Seg.Hand.Finger2.Jnt.MCP;
    AnyKinMeasure& PIP2 = ...BodyModel.Right.ShoulderArm.Seg.Hand.Finger2.Jnt.PIP;
    AnyKinMeasure& DIP2 = ...BodyModel.Right.ShoulderArm.Seg.Hand.Finger2.Jnt.DIP;
    AnyKinMeasure& MCP3 = ...BodyModel.Right.ShoulderArm.Seg.Hand.Finger3.Jnt.MCP;
    AnyKinMeasure& PIP3 = ...BodyModel.Right.ShoulderArm.Seg.Hand.Finger3.Jnt.PIP;
    AnyKinMeasure& DIP3 = ...BodyModel.Right.ShoulderArm.Seg.Hand.Finger3.Jnt.DIP;
    AnyKinMeasure& MCP4 = ...BodyModel.Right.ShoulderArm.Seg.Hand.Finger4.Jnt.MCP;
    AnyKinMeasure& PIP4 = ...BodyModel.Right.ShoulderArm.Seg.Hand.Finger4.Jnt.PIP;
    AnyKinMeasure& DIP4 = ...BodyModel.Right.ShoulderArm.Seg.Hand.Finger4.Jnt.DIP;
    AnyKinMeasure& MCP5 = ...BodyModel.Right.ShoulderArm.Seg.Hand.Finger5.Jnt.MCP;
    AnyKinMeasure& PIP5 = ...BodyModel.Right.ShoulderArm.Seg.Hand.Finger5.Jnt.PIP;
    AnyKinMeasure& DIP5 = ...BodyModel.Right.ShoulderArm.Seg.Hand.Finger5.Jnt.DIP;
    Reaction.Type = repmat(nDim, Off);
  };
  #endif


  #endif

 #if MOCAP_FILTER_JOINT_ANGLES == ON

   AnyFunButterworthFilter JointAngleFilter =
   {
     DEFAULT_PARAMETER_FOLDER FilterSettings(
         NPARAM = 4,
         PARAM_1 = FilterOrder, PARAM_1_TYPE = AnyInt,
         PARAM_2 = SampleFreq, PARAM_2_TYPE = AnyVar,
         PARAM_3 = CutOffFreq, PARAM_3_TYPE = AnyVar,
         PARAM_4 = FilterForwardBackwardOnOff, PARAM_4_TYPE = AnySwitchVar
     ) = {
       Default.FilterOrder = 1;
       Default.SampleFreq = (Main.Studies.MarkerTracking.nStep-1)
          /(Main.Studies.MarkerTracking.tEnd-Main.Studies.MarkerTracking.tStart);
       Default.CutOffFreq = 10;
       Default.FilterForwardBackwardOnOff = On;
     };

     AutomaticInitialConditionOnOff = On;
     FilterForwardBackwardOnOff = FilterSettings.FilterForwardBackwardOnOff;
     N = FilterSettings.FilterOrder;
     Fs = FilterSettings.SampleFreq;
     Fc = {FilterSettings.CutOffFreq};
     Type = LowPass;
   };
  #endif

};
