Views = {
    AnyFolder SetViewMacros = {
       AnyOperationMacro KinematicView = {
         MacroStr = {"classoperation "+ CompleteNameOf(&Main.ModelSetup.Views.KinematicView) + strquote("Set View") };
       };
       AnyOperationMacro InverseDynamicView = {
         MacroStr = {"classoperation "+ CompleteNameOf(&Main.ModelSetup.Views.InverseDynamicView) + strquote("Set View") };
       };
    };
    AnyFolder DrawGroups = {
      AnyDrawGroup All_Markers ={
        Objects = ObjSearchRecursive("Main.ModelSetup.MocapDrivers","*", "AnyDrawObject");
      };
      AnyDrawGroup All_MarkerArrows = {
        Objects = ObjSearchRecursive("Main.HumanModel.BodyModel","Arrows.*", "AnyDrawVector");
      };
      AnyDrawGroup All_Human ={
        Objects = ObjSearchRecursive("Main.HumanModel","*", "AnyDrawObject");
      };
      AnyDrawGroup All_Environment ={
        Objects = ObjSearchRecursive("Main.EnvironmentModel","*", "AnyDrawObject");
      };
      AnyDrawGroup All ={
        Objects = ObjSearchRecursive("Main","*", "AnyDrawObject");
      };
      AnyDrawGroup All_Muscles =
      {
        Objects = arrcat( ObjSearchRecursive("Main.HumanModel.BodyModel","*", "AnyDrawMuscle"),
                          ObjSearchRecursive("Main.HumanModel.BodyModel.Trunk.Buckle", "*", "AnyDrawParamSurf"));
      };
      AnyDrawGroup ForceRelatedObjects= {
        Objects = arrcat(
            ObjSearchRecursive("Main.EnvironmentModel.ForcePlates", "CenterOfPressure.Line", "AnyDrawObject"),
            ObjSearchRecursive("Main.EnvironmentModel.ForcePlates", "ForcePlate.COP_ball", "AnyDrawObject"),
            ObjSearchRecursive("Main.EnvironmentModel.ForcePlates", "ForcePlate.PlateSurface.COP_ball", "AnyDrawObject"),
            ObjSearchRecursive("Main.EnvironmentModel.ForcePlates", "ForcePlate.PlateSurface.COP_ball", "AnyDrawObject"),
            ObjSearchRecursive("Main.HumanModel.BodyModel.Left.Leg.Seg.Foot.ConditionalContact_Nodes", "DrwSphere", "AnyDrawObject"),
            ObjSearchRecursive("Main.HumanModel.BodyModel.Right.Leg.Seg.Foot.ConditionalContact_Nodes", "DrwSphere", "AnyDrawObject")
        );
      };
    };//DrawGroups
//    AnyStandardModelViewDefinition ViewAll = {
//      ViewName = "View all";
//      DrawGroupSequence = {&.DrawGroups.All};
//      Hide = {Off};
//      Reset = {Off};
//      ShowModelDefined = {Off};
//    };
    AnyStandardModelViewDefinition KinematicView ={
      ViewName = "AnyMocap Kinematic View";
      DrawGroupSequence = {&.DrawGroups.All, &.DrawGroups.All_Muscles, &.DrawGroups.ForceRelatedObjects};
      Reset = {On,Off, On};
      Hide = {Off, On, On}; //Same behavior as not defining Hide.
      ShowModelDefined = {Off,Off, Off};
      ShowAutoGenerated = {Off,Off, Off}; //Same behavior as {Off, On}.
    };
    AnyStandardModelViewDefinition InverseDynamicView = {
      ViewName = "AnyMocap InverseDynamic View";
      DrawGroupSequence = {&.DrawGroups.All, &.DrawGroups.All_MarkerArrows};
      Reset = {On,Off}; //Same behavior as not defining Reset.
      Hide = {Off, On}; //Same behavior as not defining Hide.
      ShowModelDefined = {Off,Off};
      ShowAutoGenerated = {Off,Off}; //Same behavior as {Off, On}.
    };


};
