      AnyKinLinear Lin={
        Ref=0;
        AnyRefFrame &ref1=.ref1;
        AnyRefFrame &ref2=.ref2;
      };

      AnyKinRotational Rot={
        AnyRefFrame &ref1=.ref1;
        AnyRefFrame &ref2=.ref2;
        Type=RotAxesAngles;
      };


      AnyKinMeasureOrg lx={    AnyKinLinear &ref=.Lin;MeasureOrganizer ={0};   };
      AnyKinMeasureOrg ly={    AnyKinLinear &ref=.Lin;MeasureOrganizer ={1};   };
      AnyKinMeasureOrg lz={    AnyKinLinear &ref=.Lin;MeasureOrganizer ={2};   };
      AnyKinMeasureOrg rx={    AnyKinRotational &ref=.Rot;MeasureOrganizer ={0};   };
      AnyKinMeasureOrg ry={    AnyKinRotational &ref=.Rot;MeasureOrganizer ={1};   };
      AnyKinMeasureOrg rz={    AnyKinRotational &ref=.Rot;MeasureOrganizer ={2};   };

      AnyRecruitedActuator FxPos = {Type = NonNegative; AnyKinMeasure& ref1=.lx; AnyMuscleModel &ref2=.MusMdl; EXCLUDE_MUSCLE_METABOLISM   };
      AnyRecruitedActuator FyPos = {Type = NonNegative; AnyKinMeasure& ref1=.ly; AnyMuscleModel &ref2=.MusMdl; EXCLUDE_MUSCLE_METABOLISM   };
      AnyRecruitedActuator FzPos = {Type = NonNegative; AnyKinMeasure& ref1=.lz; AnyMuscleModel &ref2=.MusMdl; EXCLUDE_MUSCLE_METABOLISM   };
      AnyRecruitedActuator FxNeg = {Type = NonPositive; AnyKinMeasure& ref1=.lx; AnyMuscleModel &ref2=.MusMdl; EXCLUDE_MUSCLE_METABOLISM   };
      AnyRecruitedActuator FyNeg = {Type = NonPositive; AnyKinMeasure& ref1=.ly; AnyMuscleModel &ref2=.MusMdl; EXCLUDE_MUSCLE_METABOLISM   };
      AnyRecruitedActuator FzNeg = {Type = NonPositive; AnyKinMeasure& ref1=.lz; AnyMuscleModel &ref2=.MusMdl; EXCLUDE_MUSCLE_METABOLISM   };

      AnyRecruitedActuator MxPos = {Type = NonNegative; AnyKinMeasure& ref1=.rx; AnyMuscleModel &ref2=.MusMdl;   EXCLUDE_MUSCLE_METABOLISM   };
      AnyRecruitedActuator MyPos = {Type = NonNegative; AnyKinMeasure& ref1=.ry; AnyMuscleModel &ref2=.MusMdl;   EXCLUDE_MUSCLE_METABOLISM   };
      AnyRecruitedActuator MzPos = {Type = NonNegative; AnyKinMeasure& ref1=.rz; AnyMuscleModel &ref2=.MusMdl;   EXCLUDE_MUSCLE_METABOLISM   };
      AnyRecruitedActuator MxNeg = {Type = NonPositive; AnyKinMeasure& ref1=.rx; AnyMuscleModel &ref2=.MusMdl;   EXCLUDE_MUSCLE_METABOLISM   };
      AnyRecruitedActuator MyNeg = {Type = NonPositive; AnyKinMeasure& ref1=.ry; AnyMuscleModel &ref2=.MusMdl;   EXCLUDE_MUSCLE_METABOLISM   };
      AnyRecruitedActuator MzNeg = {Type = NonPositive; AnyKinMeasure& ref1=.rz; AnyMuscleModel &ref2=.MusMdl;   EXCLUDE_MUSCLE_METABOLISM   };
